// COMSOL Multiphysics 5.6.0.401 model "bicon_freespace_9_11_23.mph"
// Outline of the model tree

Parameters
  pitch = 0
  roll = 0
  yaw = 0

Coordinate systems
  pml1: PML "Perfectly Matched Layer 1" on no domains | ScalingType = Spherical

Geometry
  geom1 "Geometry 1" (3D, length unit m)
    imp1: Import
      type = cad
      filename = C:\Users\phys-simulation\Desktop\DarkRadioSimulations\3D Models\Bicon Antenna\bicon_arm_nate.ipt
    del1: Delete "Delete Entities 1" | input = imp1(1) boundaries 1-5
    cap2: CapFaces | input = del1(1) edges 1, 2, 4, 5
    imp2: Import
      type = cad
      filename = C:\Users\phys-simulation\Desktop\DarkRadioSimulations\3D Models\Bicon Antenna\bicon_arm_nate.ipt
    del2: Delete "Delete Entities 2" | input = imp2(1) boundaries 1-5
    mir1: Mirror | input = del2; pos = {-.04412, 0, 0}; axis = {1, 0, 0}
    cap3: CapFaces | input = mir1(1) edges 1, 2, 4, 5
    ext2: Extrude | extrudefrom = faces; inputface = cap3(1) boundaries 51; distance = .037470936235
    ext3: Extrude | extrudefrom = faces; inputface = cap2(1) boundaries 1; distance = .037470936235
    blk1: Block (disabled) | pos = {-.04412, 0, 0}; base = center; size = {12[ft], 8[ft], 10[ft]}
    sph1: Sphere | layername = Layer 1; layer = .2; r = 2
    dif1: Difference | input = sph1; input2 = ext2, ext3
    ext1: Extrude
      extrudefrom = faces
      inputface = dif1(1) boundaries 67
      specify = vertices
      distance = .0005
      vertex = dif1(1) points 92
    fin: Finalize "Form Union"

Materials
  mat1: Common "Air" on domains 1-10
    def "Basic"
      thermalexpansioncoefficient = alpha_p(pA,T)
      molarmass = 0.02897
      bulkviscosity = muB(T)
      relpermeability = 1
      relpermittivity = 1
      dynamicviscosity = eta(T)
      ratioofspecificheat = 1.4
      electricconductivity = 0[S/m]
      heatcapacity = Cp(T)
      density = rho(pA,T)
      thermalconductivity = k(T)
      soundspeed = cs(T)
      eta: Piecewise | arg = T; pieces = {200.0, 1600.0, -8.38278E-7+8.35717342E-8*T^1-7.69429583E-11*T^2+4.6437266E-14*T^3-1.06585607E-17*T^4}; argunit = K; fununit = Pa*s
      Cp: Piecewise | arg = T; pieces = {200.0, 1600.0, 1047.63657-0.372589265*T^1+9.45304214E-4*T^2-6.02409443E-7*T^3+1.2858961E-10*T^4}; argunit = K; fununit = J/(kg*K)
      rho: Analytic | expr = pA*0.02897/R_const[K*mol/J]/T; args = {pA, T}; dermethod = manual; argders = {{pA, d(pA*0.02897/R_const/T,pA)}, {T, d(pA*0.02897/R_const/T,T)}}; argunit = Pa,K; fununit = kg/m^3
      k: Piecewise | arg = T; pieces = {200.0, 1600.0, -0.00227583562+1.15480022E-4*T^1-7.90252856E-8*T^2+4.11702505E-11*T^3-7.43864331E-15*T^4}; argunit = K; fununit = W/(m*K)
      cs: Analytic | expr = sqrt(1.4*R_const[K*mol/J]/0.02897*T); args = T; dermethod = manual; argunit = K; fununit = m/s
      an1: Analytic | funcname = alpha_p; expr = -1/rho(pA,T)*d(rho(pA,T),T); args = {pA, T}; argunit = Pa,K; fununit = 1/K
      an2: Analytic "Analytic 2a" | funcname = muB; expr = 0.6*eta(T); args = T; argunit = K; fununit = Pa*s
    RefractiveIndex
      n = 1
      ki = 0
    NonlinearModel
      BA = (def.gamma+1)/2
  mat2: Common "Aluminum" on boundaries 13-78, 95-142
    def "Basic"
      relpermeability = 1
      heatcapacity = 900[J/(kg*K)]
      thermalconductivity = 238[W/(m*K)]
      electricconductivity = 3.774e7[S/m]
      relpermittivity = 1
      thermalexpansioncoefficient = 23e-6[1/K]
      density = 2700[kg/m^3]
    Enu "Young's modulus and Poisson's ratio"
      youngsmodulus = 70e9[Pa]
      poissonsratio = 0.33
    Murnaghan
      l = -2.5e11[Pa]
      m = -3.3e11[Pa]
      n = -3.5e11[Pa]
    Lame "Lamé parameters"
      lambLame = 5.1e10[Pa]
      muLame = 2.6e10[Pa]

Physics
  emw: ElectromagneticWaves "Electromagnetic Waves, Frequency Domain" on all domains
    dependent variable E = {Ex, Ey, Ez}
    BackgroundField.SolveFor = scatteredField
    BackgroundField.WaveType = LinearPolByAngle
    BackgroundField.Eampl = 1[V/m]
    BackgroundField.angleRoll = roll
    BackgroundField.anglePitch = pitch
    BackgroundField.angleYaw = yaw
    MeshControl.SizeControlParameter = Frequency
    MeshControl.PhysicsControlledMeshMaximumFrequency = 300[MHz]
    MeshControl.EnableMeshControl = true
    wee1: WaveEquationElectric (default)
    pec1: PerfectElectricConductor (default)
    init1: init "Initial Values 1" (default)
    imp1: Impedance "Impedance Boundary Condition 1" on boundaries 13-67, 72-78, 95-142
    sctr1: Scattering "Scattering Boundary Condition 1" on boundaries 5-8, 82, 83, 88, 93
    lport1: LumpedPort on boundaries 68-71
      PortType = UserDefined
      PortExcitation = off
      Zref = 180[ohm]
      hPort = 0.003702872474
      wPort = pi*.005
      ahPort = {1, 0, 0}
    ffd1: FarFieldDomain on domains 5
      ffc1: FarFieldCalculation on boundaries 9-12, 84, 85, 89, 92

Mesh
  mesh1 "Mesh 1"
    size: MeshSizeDefault | hmax = 0.59960; hmin = 0.017990; hcurve = 0.6; hnarrow = 0.5; hgrad = 1.5; custom = on
    size1: Size (disabled) on no boundaries
      hmax = 0.0031240
      hmin = 9.3720E-5
      hcurve = 0.6
      hnarrow = 0.5
      hgrad = 1.5
      custom = on
    map1: Map "Mapped 1" on boundaries 18-29, 31, 32, 45-59, 96-109, 122-136
      dis1: Distribution on edges 19, 20, 22, 23, 25, 26, 28, 29, 31, 32, 34, 35, 43-47, 49, 52-57, 59, 60, 62, 63, 65, 66, 68, 69, 71, 72, 86, 88, 93-116, 120-133, 199-228, 230, 231, 233, 234, 236, 237, 239, 240, 242, 243, 245, 257, 259, 264-274, 276-287, 291, 292, 295, 297, 299, 301, 303, 305
    map2: Map "Mapped 2" on no boundaries
      dis1: Distribution on no edges | numelem = 4
    map3: Map "Mapped 3" on boundaries 33-42, 110-119
      dis1: Distribution on edges 58, 61, 64, 67, 70, 74-78, 229, 232, 235, 238, 241, 245-249 | numelem = 3
    conv1: Convert on boundaries 18-29, 31-42, 45-59, 96-119, 122-136
    ftri1: FreeTri "Free Triangular 1" on boundaries 13-17, 30, 43, 44, 60-62, 77, 78, 95, 120, 121, 137-139, 142
      yscale = 2
      zscale = 2
      size1: Size on boundaries 13-17, 30, 43, 44, 60-62, 77, 78, 95, 120, 121, 137-139, 142
    ftet1: FreeTet "Free Tetrahedral 1" on domains 1-5, 7-10 | smoothcontrol = off; optcurved = on
      size1: Size on domains 1-5, 7, 8, 10 | hmin = 0.072

Studies
  std1 "Study 1"
    param: Parametric "Parametric Sweep"
      sweeptype = filled
      pname = {pitch, roll, yaw}
      plistarr = {"0. , 0.39269908, 0.78539816, 1.17809725, 1.57079633", "0. , 0.78539816, 1.57079633, 2.35619449, 3.14159265", "0. , 0.39269908, 0.78539816, 1.17809725, 1.57079633"}
      punit = {, , }
      keepsol = last
    freq: Frequency "Frequency Domain" | punit = MHz; plist = 75[MHz]

Solver configurations
  sol1 "Solution 1" (study std1)
    v1: Variables "Dependent Variables 1"
    s1: Stationary "Stationary Solver 1" | stol = 0.1
      p1: Parametric
        sweeptype = filled
        pname = {pitch, roll, yaw}
        plistarr = {"0. , 0.39269908, 0.78539816, 1.17809725, 1.57079633", "0. , 0.78539816, 1.57079633, 2.35619449, 3.14159265", "0. , 0.39269908, 0.78539816, 1.17809725, 1.57079633"}
        punit = {, , }
        pcontinuationmode = no
      fc1: FullyCoupled | linsolver = i1
      i1: Iterative "Suggested Iterative Solver (emw)" | itrestart = 300; prefuntype = right
        mg1: Multigrid | iter = 1

Datasets
  dset1: Solution | solution = sol1
  mesh1: Mesh | mesh = mesh1

Derived values
  gev1: EvalGlobal "S-Parameter (emw)" | data = dset1; table = tbl1; expr = emw.S11dB
  gev2: EvalGlobal "Lumped Port Voltage"
    data = dset1
    table = tbl2
    expr = {emw.Vport_1, }
    unit = {V, }
    descr = {Lumped port voltage, Antenna Factor}
  gev3: EvalGlobal "Antenna Factor"
    data = dset1
    table = tbl3
    expr = {20*log10(1/(abs(emw.Vport_1))), abs(emw.Vport_1)}
    unit = {, V}
    descr = {Antenna Factor, }
    dataseries = average

Tables
  tbl1: Table "Table 1: S-Parameter"
    freq (GHz) | S11 (1)
    0.075 | -1.7335
  tbl2: Table "Table 2: Lumped Port Voltage"
    // Global Evaluation 2 (emw.Vport_1)
    freq (MHz) | Lumped port voltage (V) | Antenna Factor
    25 | 0.20004+0.221542i | 12.0902-8.36358i
    28 | 0.239459+0.226298i | 11.1027-7.57148i
    31 | 0.279807+0.226013i | 10.2252-6.79447i
    34 | 0.320513+0.220869i | 9.43546-6.03379i
    37 | 0.361336+0.210967i | 8.71284-5.28462i
    40 | 0.402113+0.1963i | 8.04149-4.54141i
    43 | 0.442643+0.176746i | 7.41024-3.79899i
    46 | 0.482693+0.15206i | 6.81065-3.05183i
    49 | 0.52193+0.121866i | 6.23681-2.29382i
    52 | 0.559795+0.0854687i | 5.68664-1.51509i
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  tbl3: Table
    // Antenna Factor
    Average: Antenna Factor | Average: abs(emw.Vport_1) (V)
    22.7478 | 0.339419

Plots
  pg1: PlotGroup3D "Electric Field (emw)" | data = dset1
    mslc1: Multislice | expr = emw.normE
  pg2: PlotGroup3D "3D Plot Group 2: Mesh quality" | data = mesh1
    mesh1: Mesh | meshdomain = volume; elemtype2 = quad
  pg3: PlotGroup3D "3D Plot Group 3: Electric field" | data = dset1
    slc1: Slice | expr = emw.normE; quickplane = xy; quickznumber = 1; quickynumber = 3
    arwv1: ArrowVolume | expr = {emw.Ex, emw.Ey, emw.Ez}; arrowlength = normalized
  pg4: PlotGroup3D "3D Plot Group 3: Current Density" | data = dset1
    slc1: Slice
      expr = emw.normJ
      descr = Current density norm
      quickznumber = 1
      quickxnumber = 1
      quickynumber = 3
      shift = -0.45
    arwv1: ArrowVolume | expr = {emw.Jx, emw.Jy, emw.Jz}; descr = Current density; arrowlength = normalized
    arws1: ArrowSurface (disabled) | expr = {emw.Ex, emw.Ey, emw.Ez}; arrowlength = normalized
      sel1: Selection
  pg6: PlotGroup1D "1D Plot Group 6: Lumped port voltage" | data = none
    tblp1: Table "Table Graph 1" | table = tbl2
  pg7: PlotGroup3D "3D Plot Group 7" | data = dset1
    rp1: RadiationPattern | expr = emw.normEfar
  pg8: PlotGroup1D "1D Plot Group 8" | data = none
    tblp1: Table "Table Graph 1" | table = evl3
  pg9: PlotGroup1D "1D Plot Group 9" | data = none
    tblp1: Table "Table Graph 1" | table = tbl3

Exports
  tbl1: Table
    table = tbl2
    filename = C:\Users\phys-simulation\Desktop\DarkRadioSimulations\REU_19\bicon_freespace\bicon_freespace_LPV.txt