// COMSOL Multiphysics 6.1.0.357 model "shortDipoleMoveInBox_s11_9_20_23.mph"
// Dipole Antenna
// The dipole antenna is one of the most straightforward antenna configurations. It can be realized with two thin metallic rods that have a sinusoidal voltage difference applied between them. The length of the rods is chosen such that they are quarter wavelength elements at the operating frequency. Such an antenna has a well-known torus-like radiation pattern.
// Outline of the model tree

Parameters
  lda0 = 0.8[m]  // Operating wavelength
  arm_length = lda0/4  // Dipole antenna arm length
  r_antenna = arm_length/20  // Dipole antenna arm radius
  gap_size = arm_length/100  // Gap between arms
  boxX = 0.135[m]
  boxY = -0.122[m]
  boxZ = 0.958[m]
  alpha = 90.0
  beta = 0.0
  gamma = 90.0
  positionIdx = 5.0

Selections
  sel1: Explicit "Antenna" on no boundaries
  sel2: Explicit "Lumped port" on no boundaries
  sel3: Explicit on no boundaries

Coordinate systems
  pml1: PML "Perfectly Matched Layer 1" on no domains | ScalingType = Spherical

Geometry
  geom1 "Geometry 1" (3D, length unit m)
    cyl1: Cylinder
      pos = {-(arm_length+gap_size/2), 0, 0}
      axistype = x
      layername = Layer 1
      layer = arm_length
      layerside = off
      layerbottom = on
      layertop = on
      r = r_antenna
      h = 2*arm_length+gap_size
    blk1: Block | base = center; size = {3.0697, 2.4566, 3.6840}
    cone1: Cone "Cone door" (disabled)
      pos = {1.25, -1, 1.25}
      rot = 45
      axistype = y
      r = .1
      specifytop = radius
      rtop = .01
    cone2: Cone "Cone center" (disabled)
      pos = {0, -1, 0}
      rot = 45
      axistype = y
      r = .1
      specifytop = radius
      rtop = .01
    mov1: Move | input = blk1, cone1, cone2; displx = boxX; disply = boxY; displz = boxZ
    rot3: Rotate | input = mov1(1); specify = eulerang; rot = 0; eulerang = {alpha, beta, gamma}
    dif1: Difference | input = rot3; input2 = cyl1
    fin: Finalize "Form Union"

Materials
  mat1: Common "Air" on all domains
    def "Basic"
      thermalexpansioncoefficient = alpha_p(pA,T)
      molarmass = 0.02897[kg/mol]
      bulkviscosity = muB(T)
      relpermeability = 1
      relpermittivity = 1
      dynamicviscosity = eta(T)
      ratioofspecificheat = 1.4
      electricconductivity = 0[S/m]
      heatcapacity = Cp(T)
      density = rho(pA,T)
      thermalconductivity = k(T)
      soundspeed = cs(T)
      eta: Piecewise | arg = T; pieces = {200.0, 1600.0, -8.38278E-7+8.35717342E-8*T^1-7.69429583E-11*T^2+4.6437266E-14*T^3-1.06585607E-17*T^4}; argunit = K; fununit = Pa*s
      Cp: Piecewise | arg = T; pieces = {200.0, 1600.0, 1047.63657-0.372589265*T^1+9.45304214E-4*T^2-6.02409443E-7*T^3+1.2858961E-10*T^4}; argunit = K; fununit = J/(kg*K)
      rho: Analytic | expr = pA*0.02897/R_const[K*mol/J]/T; args = {pA, T}; fununit = kg/m^3; argunit = {Pa, K}
      k: Piecewise | arg = T; pieces = {200.0, 1600.0, -0.00227583562+1.15480022E-4*T^1-7.90252856E-8*T^2+4.11702505E-11*T^3-7.43864331E-15*T^4}; argunit = K; fununit = W/(m*K)
      cs: Analytic | expr = sqrt(1.4*R_const[K*mol/J]/0.02897*T); args = T; fununit = m/s; argunit = K
      an1: Analytic | funcname = alpha_p; expr = -1/rho(pA,T)*d(rho(pA,T),T); args = {pA, T}; fununit = 1/K; argunit = {Pa, K}
      an2: Analytic "Analytic 2a" | funcname = muB; expr = 0.6*eta(T); args = T; fununit = Pa*s; argunit = K
    RefractiveIndex
      n = 1
      ki = 0
    NonlinearModel
      BA = (def.gamma+1)/2
    idealGas
      Rs = R_const/Mn
      heatcapacity = Cp(T)
      ratioofspecificheat = 1.4
      molarmass = 0.02897
      Cp: Piecewise | arg = T; pieces = {200.0, 1600.0, 1047.63657-0.372589265*T^1+9.45304214E-4*T^2-6.02409443E-7*T^3+1.2858961E-10*T^4}; argunit = K; fununit = J/(kg*K)
  mat3: Common "Aluminum" on boundaries 7, 8, 11, 12, 15, 16
    def "Basic"
      relpermeability = 1
      heatcapacity = 900[J/(kg*K)]
      thermalconductivity = 238[W/(m*K)]
      electricconductivity = 3.774e7[S/m]
      relpermittivity = 1
      thermalexpansioncoefficient = 23e-6[1/K]
      density = 2700[kg/m^3]
    Enu "Young's modulus and Poisson's ratio"
      E = 70e9[Pa]
      nu = 0.33
    Murnaghan
      l = -2.5e11[Pa]
      m = -3.3e11[Pa]
      n = -3.5e11[Pa]
    Lame "Lamé parameters"
      lambLame = 5.1e10[Pa]
      muLame = 2.6e10[Pa]
  mat4: Common "Structural steel" on boundaries 1-5, 20
    def "Basic"
      relpermeability = 1000
      heatcapacity = 475[J/(kg*K)]
      thermalconductivity = 44.5[W/(m*K)]
      electricconductivity = 5.9e6[S/m]
      relpermittivity = 1000
      thermalexpansioncoefficient = 12.3e-6[1/K]
      density = 7850[kg/m^3]
    Enu "Young's modulus and Poisson's ratio"
      E = 200e9[Pa]
      nu = 0.30
    Murnaghan
      l = -3.0e11[Pa]
      m = -6.2e11[Pa]
      n = -7.2e11[Pa]
    Lame "Lamé parameters"
      lambLame = 1.15e11[Pa]
      muLame = 7.69e10[Pa]

Physics
  emw: ElectromagneticWaves "Electromagnetic Waves, Frequency Domain" on all domains
    dependent variable E = {Ex, Ey, Ez}
    wee1: WaveEquationElectric (default)
    pec1: PerfectElectricConductor (default)
    init1: init "Initial Values 1" (default) | E = {1, 1, 1}
    imp1: Impedance "Impedance Boundary Condition 1" on boundaries 7, 8, 11, 12, 15, 16
    lport1: LumpedPort on boundaries 11, 12
      PortType = UserDefined
      PortExcitation = on
      Zref = 73[ohm]
      hPort = gap_size
      wPort = 2*pi*r_antenna
      ahPort = {1, 0, 0}
    ffd1: FarFieldDomain (disabled) on no domains
      ffc1: FarFieldCalculation on no boundaries
    imp2: Impedance "wall drive" on boundaries 2, 3, 20 | Es = {0, 0, 0}
    imp3: Impedance "walls no drive" on boundaries 1, 4, 5 | Es = {0, 0, 0}

Mesh
  mesh1 "Mesh 1" (physics-controlled)

Studies
  std1 "Study 1"
    param: Parametric "Parametric Sweep"
      pname = {positionIdx, boxX, boxY, boxZ, alpha, beta, gamma}
      plistarr = {"0,1,2,3,4,5,6,7,8,9,10,11,12,13,14,15,16,17", "13.5,13.5,13.5,13.5,13.5,13.5,-31.5,-31.5,-31.5,-31.5,-31.5,-31.5,-66.5,-66.5,-66.5,-66.5,-66.5,-66.5", "18.8,12.8,-8.2,35.8,-0.2,-12.2,17.8,25.8,6.8,22.8,8.8,2.8,-8.2,32.8,-1.2,-15.2,31.8,10.8", "15.8,15.8,45.8,45.8,95.8,95.8,15.8,15.8,45.8,45.8,95.8,95.8,15.8,15.8,45.8,45.8,95.8,95.8", "90.0,-40.0,90.0,45.0,45.0,90.0,90.0,-45.0,-22.5,90.0,22.5,45.0,22.5,90.0,-15.0,105.0,105.0,90.0", "125,0,90,45,0,0,0,-45,0,0,0,0,45,90,0,90,90,125", "90.0,-60.0,90.0,45.0,45.0,90.0,90.0,-45.0,-22.5,90.0,22.5,45.0,22.5,90.0,-15.0,105.0,105.0,90.0"}
      punit = {, cm, cm, cm, , , }
      keepsol = all
    freq: Frequency "Frequency Domain"
      punit = MHz
      plist = range(315,0.833333333333,340)
      storesel = {sel3}
      awefunc = abs(comp1.emw.Vport_1)

Solver configurations
  sol1 "Solution 1" (study std1)
    v1: Variables "Dependent Variables 1"
    s1: Stationary "Stationary Solver 1" | stol = 0.01; linpmethod = sol
      p1: Parametric | pname = freq; plistarr = range(315,0.833333333333,340); punit = MHz; pcontinuationmode = no
      fc1: FullyCoupled | linsolver = i1
      i1: Iterative "Suggested Iterative Solver (emw)" | itrestart = 300; prefuntype = right
        mg1: Multigrid | iter = 1
  sol2 "Parametric Solutions 1" (study std1)

Datasets
  dset1: Solution | solution = sol1
  dset2: Solution | solution = sol2
  cpt1: CutPoint3D "Cut Point near field"
    data = dset2
    method = file
    filename = /drBigBoy/darkRadio/comsolSimulations/dipoleMoveInBox_AfCalc_6.27.22/comsol/cutPoints_dx.1_dtheta90deg_r-.4.txt
  cpt2: CutPoint3D "Cut Point all"
    data = dset2
    method = regulargrid
    regulargridx = 4
    regulargridy = 4
    regulargridz = 4

Derived values
  pev2: EvalPoint "avg E near" (disabled)
    data = cpt1
    table = tbl1
    hasouter = on
    expr = {abs(emw.Ex), abs(emw.Ey), abs(emw.Ez), abs(emw.normE)}
    unit = {V/m, V/m, V/m, V/m}
    summethod = average
  pev7: EvalPoint "all E near"
    data = cpt1
    table = tbl2
    hasouter = on
    expr = {abs(emw.Ex), abs(emw.Ey), abs(emw.Ez), abs(emw.normE)}
    unit = {V/m, V/m, V/m, V/m}
  pev6: EvalPoint "avg E all" (disabled)
    data = cpt2
    table = tbl3
    hasouter = on
    expr = {abs(emw.Ex), abs(emw.Ey), abs(emw.Ez), abs(emw.normE)}
    unit = {V/m, V/m, V/m, V/m}
    summethod = average
  pev8: EvalPoint "all E all"
    data = cpt2
    table = tbl4
    hasouter = on
    expr = {abs(emw.Ex), abs(emw.Ey), abs(emw.Ez), abs(emw.normE)}
    unit = {V/m, V/m, V/m, V/m}
  gev3: EvalGlobal "port voltage"
    data = dset2
    table = tbl7
    hasouter = on
    expr = abs(emw.Vport_1)
    unit = V
    dataseries = average
  gev4: EvalGlobal "AF 1/V" (disabled) | data = dset2; table = new; hasouter = on; expr = 20*log10(1/abs(emw.Vport_1))
  gev5: EvalGlobal "Global Evaluation 5" | data = dset2; table = tbl8; expr = abs(emw.S11); dataseries = average

Tables
  tbl6: Table
    // port voltage 1
    positionIdx | boxX (cm) | boxY (cm) | boxZ (cm) | alpha | beta | gamma | freq (MHz) | 20*log10(abs(1/emw.Vport_1)) | 20*log10(abs(1/emw.Vport_1))
    5 | 13.5 | -12.2 | 95.8 | 90 | 0 | 90 | 224.197 | 43.375 | 43.375
    5 | 13.5 | -12.2 | 95.8 | 90 | 0 | 90 | 224.645 | 30.8373 | 30.8373
    5 | 13.5 | -12.2 | 95.8 | 90 | 0 | 90 | 225.094 | 23.7486 | 23.7486
    5 | 13.5 | -12.2 | 95.8 | 90 | 0 | 90 | 225.544 | 15.3844 | 15.3844
    5 | 13.5 | -12.2 | 95.8 | 90 | 0 | 90 | 225.995 | 9.88363 | 9.88363
    5 | 13.5 | -12.2 | 95.8 | 90 | 0 | 90 | 226.447 | 7.85365 | 7.85365
    5 | 13.5 | -12.2 | 95.8 | 90 | 0 | 90 | 226.9 | 15.5865 | 15.5865
    5 | 13.5 | -12.2 | 95.8 | 90 | 0 | 90 | 227.354 | 19.031 | 19.031
    5 | 13.5 | -12.2 | 95.8 | 90 | 0 | 90 | 227.809 | 21.3026 | 21.3026
    5 | 13.5 | -12.2 | 95.8 | 90 | 0 | 90 | 228.264 | 23.2594 | 23.2594
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  tbl7: Table
    // port voltage
    Average: abs(emw.Vport_1) (V)
    0.0504572
  tbl8: Table
    // Global Evaluation 5
    Average: S11 (1) | Average: S11 (1) | Average: abs(emw.S11) (1)
    -0.0369582 | -0.994352+0.0528611i | 0.995761

Plots
  pg14: PlotGroup3D "Electric Field (emw)" | data = dset2
    mslc1: Multislice | expr = abs(emw.Ex)
  pg15: PlotGroup3D "3D Plot Group 15" | data = dset1
  pg16: PlotGroup3D "current" on boundaries 1-5, 20 | data = dset2
    mslc1: Multislice | expr = emw.normJ; descr = Current density norm
    surf1: Surface | expr = emw.normE
  pg17: PlotGroup1D "1D Plot Group 17" | data = none
    tblp1: Table "Table Graph 1" | table = tbl5
  pg18: PlotGroup1D "1D Plot Group 18" | data = none
    tblp1: Table "Table Graph 1" | table = tbl6
  pg19: PlotGroup1D "1D Plot Group 19" | data = none
    tblp1: Table "Table Graph 1" | table = tbl7