// COMSOL Multiphysics 5.6.0.401 model "empty_box_12.26.21.mph"
// Outline of the model tree

Selections
  sel1: Explicit "walls" on boundaries 1-6

Geometry
  geom1 "Geometry 1" (3D, length unit m)
    blk1: Block | base = center; size = {3.048, 2.4384, 3.6576}
    fin: Finalize "Form Union"

Materials
  mat1: Common "Air"
    def "Basic"
      thermalexpansioncoefficient = alpha_p(pA,T)
      molarmass = 0.02897
      bulkviscosity = muB(T)
      relpermeability = 1
      relpermittivity = 1
      dynamicviscosity = eta(T)
      ratioofspecificheat = 1.4
      electricconductivity = 0[S/m]
      heatcapacity = Cp(T)
      density = rho(pA,T)
      thermalconductivity = k(T)
      soundspeed = cs(T)
      eta: Piecewise | arg = T; pieces = {200.0, 1600.0, -8.38278E-7+8.35717342E-8*T^1-7.69429583E-11*T^2+4.6437266E-14*T^3-1.06585607E-17*T^4}; argunit = K; fununit = Pa*s
      Cp: Piecewise | arg = T; pieces = {200.0, 1600.0, 1047.63657-0.372589265*T^1+9.45304214E-4*T^2-6.02409443E-7*T^3+1.2858961E-10*T^4}; argunit = K; fununit = J/(kg*K)
      rho: Analytic | expr = pA*0.02897/R_const[K*mol/J]/T; args = {pA, T}; dermethod = manual; argders = {{pA, d(pA*0.02897/R_const/T,pA)}, {T, d(pA*0.02897/R_const/T,T)}}; argunit = Pa,K; fununit = kg/m^3
      k: Piecewise | arg = T; pieces = {200.0, 1600.0, -0.00227583562+1.15480022E-4*T^1-7.90252856E-8*T^2+4.11702505E-11*T^3-7.43864331E-15*T^4}; argunit = K; fununit = W/(m*K)
      cs: Analytic | expr = sqrt(1.4*R_const[K*mol/J]/0.02897*T); args = T; dermethod = manual; argunit = K; fununit = m/s
      an1: Analytic | funcname = alpha_p; expr = -1/rho(pA,T)*d(rho(pA,T),T); args = {pA, T}; argunit = Pa,K; fununit = 1/K
      an2: Analytic "Analytic 2a" | funcname = muB; expr = 0.6*eta(T); args = T; argunit = K; fununit = Pa*s
    RefractiveIndex
      n = 1
      ki = 0
    NonlinearModel
      BA = (def.gamma+1)/2
  mat2: Common "Air" on all domains
    // same settings as mat1
  mat3: Common "Structural steel" on selection sel1
    def "Basic"
      relpermeability = 1
      heatcapacity = 475[J/(kg*K)]
      thermalconductivity = 44.5[W/(m*K)]
      electricconductivity = 5.9e6[S/m]
      relpermittivity = 1
      thermalexpansioncoefficient = 12.3e-6[1/K]
      density = 7850[kg/m^3]
    Enu "Young's modulus and Poisson's ratio"
      youngsmodulus = 200e9[Pa]
      poissonsratio = 0.30
    Murnaghan
      l = -3.0e11[Pa]
      m = -6.2e11[Pa]
      n = -7.2e11[Pa]
    Lame "Lamé parameters"
      lambLame = 1.15e11[Pa]
      muLame = 7.69e10[Pa]

Physics
  emw: ElectromagneticWaves "Electromagnetic Waves, Frequency Domain" on all domains
    dependent variable E = {Ex, Ey, Ez}
    BackgroundField.SolveFor = fullField
    BackgroundField.WaveType = LinearPolByAngle
    wee1: WaveEquationElectric (default)
    pec1: PerfectElectricConductor (default)
    init1: init "Initial Values 1" (default)
    imp1: Impedance "Impedance Boundary Condition 1" on selection sel1 | Es = {1, 0, 0}

Mesh
  mesh1 "Mesh 1" (physics-controlled)
    size: MeshSizeDefault | hauto = 9

Studies
  std1 "Study 1"
    freq: Frequency "Frequency Domain" | punit = MHz; plist = range(50,0.501002004008,300)

Solver configurations
  sol1 "Solution 1" (study std1)
    v1: Variables "Dependent Variables 1"
    s1: Stationary "Stationary Solver 1" | stol = 0.005
      p1: Parametric | pname = freq; plistarr = range(50,0.501002004008,300); punit = MHz; pcontinuationmode = no
      fc1: FullyCoupled | linsolver = i1
      i1: Iterative "Suggested Iterative Solver (emw)" | itrestart = 300; prefuntype = right
        mg1: Multigrid | iter = 1

Datasets
  dset1: Solution | solution = sol1
  cpt4: CutPoint3D | data = dset1; method = file; filename = cutPoints.txt

Derived values
  pev1: EvalPoint "Point Evaluation 1" | data = cpt4; table = tbl8; expr = abs(emw.Ex)

Tables
  tbl1: Table
    // Point Evaluation 1 (emw.normE)
    freq (MHz) | abs(emw.Ex) (V/m), Point: (0, 0, 0) | Electric field norm (V/m), Point: (0, 0, 0)
    30 | 1.28839 | 1.28839
    30.5411 | 1.28839 | 1.28839
    31.0822 | 1.28839 | 1.28839
    31.6232 | 1.28839 | 1.28839
    32.1643 | 1.28839 | 1.28839
    32.7054 | 1.28839 | 1.28839
    33.2465 | 1.28839 | 1.28839
    33.7876 | 1.28839 | 1.28839
    34.3287 | 1.40046 | 1.40046
    34.8697 | 1.40046 | 1.40046
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  tbl2: Table
    // Point Evaluation 2 (emw.normE)
    freq (MHz) | Electric field norm (V/m), Point: (0, 0, 0.3)
    1 | 1.00025
    1.2993 | 1.00025
    1.5986 | 1.00025
    1.8979 | 1.00025
    2.1972 | 1.00025
    2.4965 | 1.00025
    2.7958 | 1.00025
    3.0951 | 1.00025
    3.39439 | 1.00025
    3.69369 | 1.00025
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  tbl3: Table
    // Surface Average 1 (emw.normE)
    freq (MHz) | Electric field norm (V/m)
    1 | 1.00026
    1.2993 | 1.00026
    1.5986 | 1.00026
    1.8979 | 1.00026
    2.1972 | 1.00026
    2.4965 | 1.00026
    2.7958 | 1.00026
    3.0951 | 1.00026
    3.39439 | 1.00026
    3.69369 | 1.00026
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  tbl4: Table
    // Surface Average 2 (emw.normE)
    freq (MHz) | Electric field norm (V/m)
    1 | 1.00025
    1.2993 | 1.00025
    1.5986 | 1.00025
    1.8979 | 1.00025
    2.1972 | 1.00025
    2.4965 | 1.00025
    2.7958 | 1.00025
    3.0951 | 1.00025
    3.39439 | 1.00025
    3.69369 | 1.00025
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  tbl5: Table
    // Point Evaluation 3 (emw.Ex)
    freq (MHz) | abs(emw.normE) (V/m), Point: (0, 1, 0) | abs(emw.Ex) (V/m), Point: (0, 1, 0) | abs(emw.Ey) (V/m), Point: (0, 1, 0) | abs(emw.Ez) (V/m), Point: (0, 1, 0)
    103.959 | 0.0746128 | 0.0746076 | 0.000531006 | 0.000703895
  tbl6: Table
    // Surface Average 3 (emw.normE)
    freq (MHz) | Electric field norm (V/m)
    30 | 1.28247
    30.5411 | 1.28247
    31.0822 | 1.28247
    31.6232 | 1.28247
    32.1643 | 1.28247
    32.7054 | 1.28247
    33.2465 | 1.28247
    33.7876 | 1.28247
    34.3287 | 1.39208
    34.8697 | 1.39208
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  tbl8: Table
    // Point Evaluation 1
    freq (MHz) | abs(emw.Ex) (V/m), Point: (-0.6, 0, 0.4) | abs(emw.Ex) (V/m), Point: (-0.5, 0, 0.4) | abs(emw.Ex) (V/m), Point: (-0.4, 0, 0.4) | abs(emw.Ex) (V/m), Point: (-0.3, 0, 0.4) | abs(emw.Ex) (V/m), Point: (-0.2, 0, 0.4) | abs(emw.Ex) (V/m), Point: (-0.1, 0, 0.4) | abs(emw.Ex) (V/m), Point: (-1.1102E-16, 0, 0.4) | abs(emw.Ex) (V/m), Point: (0.1, 0, 0.4) | abs(emw.Ex) (V/m), Point: (0.2, 0, 0.4) | abs(emw.Ex) (V/m), Point: (0.3, 0, 0.4) | abs(emw.Ex) (V/m), Point: (0.4, 0, 0.4)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
    50 | 2.21909 | 2.21914 | 2.21931 | 2.21933 | 2.21923 | 2.21913 | 2.21924 | 2.22019 | 2.21912 | 2.21899 | 2.22005
    50.501 | 2.21909 | 2.21914 | 2.21931 | 2.21933 | 2.21923 | 2.21913 | 2.21924 | 2.22019 | 2.21912 | 2.21899 | 2.22005
    51.002 | 2.21909 | 2.21914 | 2.21931 | 2.21933 | 2.21923 | 2.21913 | 2.21924 | 2.22019 | 2.21912 | 2.21899 | 2.22005
    51.503 | 2.21909 | 2.21914 | 2.21931 | 2.21933 | 2.21923 | 2.21913 | 2.21924 | 2.22019 | 2.21912 | 2.21899 | 2.22005
    52.004 | 2.21909 | 2.21914 | 2.21931 | 2.21933 | 2.21923 | 2.21913 | 2.21924 | 2.22019 | 2.21912 | 2.21899 | 2.22005
    52.505 | 2.45212 | 2.45208 | 2.45265 | 2.45271 | 2.4524 | 2.45233 | 2.45238 | 2.45354 | 2.45261 | 2.45219 | 2.45309
    53.006 | 2.45212 | 2.45208 | 2.45265 | 2.45271 | 2.4524 | 2.45233 | 2.45238 | 2.45354 | 2.45261 | 2.45219 | 2.45309
    53.507 | 2.45212 | 2.45208 | 2.45265 | 2.45271 | 2.4524 | 2.45233 | 2.45238 | 2.45354 | 2.45261 | 2.45219 | 2.45309
    54.008 | 2.67281 | 2.67279 | 2.6734 | 2.67346 | 2.67314 | 2.67305 | 2.67312 | 2.67448 | 2.67334 | 2.67289 | 2.67399
    54.509 | 2.67281 | 2.67279 | 2.6734 | 2.67346 | 2.67314 | 2.67305 | 2.67312 | 2.67448 | 2.67334 | 2.67289 | 2.67399
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
Plots
  pg1: PlotGroup3D "Electric Field (emw)" | data = dset1
    mslc1: Multislice | expr = emw.normE; descr = Electric field norm
    slc1: Slice (disabled) | expr = emw.normE
    con1: Contour (disabled) | expr = emw.normE
    mesh1: Mesh (disabled)
    scv1: ScatterVolume (disabled) | expr = {emw.Ex, emw.Ey, emw.Ez}

Exports
  tbl1: Table
    table = tbl1
    filename = C:\Users\phys-simulation\Desktop\DarkRadioSimulations\comsolSimulationsV2\biconRoomNoRes\analysis\EfieldInBoxCutPoint.txt
  tbl2: Table
    table = tbl2
    filename = C:\Users\phys-simulation\Desktop\Vasco\EfieldInBox\analysis\EfieldInBoxNormOffCenter.txt
  tbl3: Table
    table = tbl3
    filename = C:\Users\phys-simulation\Desktop\Vasco\EfieldInBox\analysis\surfaceEfieldAverageEmptyBox.txt
  tbl4: Table
    table = tbl4
    filename = C:\Users\phys-simulation\Desktop\Vasco\EfieldInBox\analysis\surfaceAvg27cm5EmptyBox.txt
  tbl7: Table
    table = tbl6
    filename = C:\Users\phys-simulation\Desktop\DarkRadioSimulations\comsolSimulationsV2\biconRoomNoRes\analysis\surfaceAvg300cmEmptyBox.txt
  tbl8: Table
    table = tbl1
    filename = C:\Users\phys-simulation\Desktop\Vasco\biconInBox\analysis\EfieldInBoxCutPoint.txt