// COMSOL Multiphysics 5.4.0.388 model "empty_box_fullwave_3.1.21.mph"
// Outline of the model tree

Coordinate systems
  pml1: PML "Perfectly Matched Layer 1" on no domains | ScalingType = Spherical

Geometry
  geom1 "Geometry 1" (3D, length unit m)
    imp1: Import (disabled)
      type = cad
      filename = C:\Users\phys-simulation\Desktop\DarkRadioSimulations\3D Models\Bicon Antenna\bicon_arm_nate.ipt
    del1: Delete "Delete Entities 1" (disabled) | input = imp1(1) boundaries 1-5
    cap1: CapFaces (disabled) | input = del1(1) edges 1, 2, 4, 5
    imp2: Import (disabled)
      type = cad
      filename = C:\Users\phys-simulation\Desktop\DarkRadioSimulations\3D Models\Bicon Antenna\bicon_arm_nate.ipt
    del2: Delete "Delete Entities 2" (disabled) | input = imp2(1) boundaries 1-5
    mir1: Mirror (disabled) | input = del2; pos = {-.04412, 0, 0}; axis = {1, 0, 0}
    cap2: CapFaces (disabled) | input = mir1(1) edges 1, 2, 4, 5
    ext2: Extrude (disabled) | extrudefrom = faces; inputface = cap2(1) boundaries 51; distance = .037971436235
    ext3: Extrude (disabled) | extrudefrom = faces; inputface = cap1(1) boundaries 1; distance = .037971436235
    blk1: Block | pos = {-.04412, 0, 0}; base = center; size = {10[ft], 8[ft], 12[ft]}
    dif1: Difference (disabled) | input = blk1; input2 = ext2, ext3
    ext1: Extrude (disabled)
      extrudefrom = faces
      inputface = dif1(1) boundaries 61
      specify = vertices
      distance = .0005
      vertex = dif1(1) points 87
    fin: Finalize "Form Union"

Materials
  mat1: Common "Air" on domains 1
    def "Basic"
      thermalexpansioncoefficient = alpha_p(pA,T)
      molarmass = 0.02897
      bulkviscosity = muB(T)
      relpermeability = 1
      relpermittivity = 1
      dynamicviscosity = eta(T)
      ratioofspecificheat = 1.4
      electricconductivity = 0[S/m]
      heatcapacity = Cp(T)
      density = rho(pA,T)
      thermalconductivity = k(T)
      soundspeed = cs(T)
      eta: Piecewise | arg = T; pieces = {200.0, 1600.0, -8.38278E-7+8.35717342E-8*T^1-7.69429583E-11*T^2+4.6437266E-14*T^3-1.06585607E-17*T^4}; argunit = K; fununit = Pa*s
      Cp: Piecewise | arg = T; pieces = {200.0, 1600.0, 1047.63657-0.372589265*T^1+9.45304214E-4*T^2-6.02409443E-7*T^3+1.2858961E-10*T^4}; argunit = K; fununit = J/(kg*K)
      rho: Analytic | expr = pA*0.02897/R_const[K*mol/J]/T; args = {pA, T}; dermethod = manual; argders = {{pA, d(pA*0.02897/R_const/T,pA)}, {T, d(pA*0.02897/R_const/T,T)}}; argunit = Pa,K; fununit = kg/m^3
      k: Piecewise | arg = T; pieces = {200.0, 1600.0, -0.00227583562+1.15480022E-4*T^1-7.90252856E-8*T^2+4.11702505E-11*T^3-7.43864331E-15*T^4}; argunit = K; fununit = W/(m*K)
      cs: Analytic | expr = sqrt(1.4*R_const[K*mol/J]/0.02897*T); args = T; dermethod = manual; argunit = K; fununit = m/s
      an1: Analytic | funcname = alpha_p; expr = -1/rho(pA,T)*d(rho(pA,T),T); args = {pA, T}; argunit = Pa,K; fununit = 1/K
      an2: Analytic "Analytic 2a" | funcname = muB; expr = 0.6*eta(T); args = T; argunit = K; fununit = Pa*s
    RefractiveIndex
      n = 1
      ki = 0
    NonlinearModel
      BA = (def.gamma+1)/2
  mat2: Common "Aluminum" on no boundaries
    def "Basic"
      relpermeability = 1
      heatcapacity = 900[J/(kg*K)]
      thermalconductivity = 238[W/(m*K)]
      electricconductivity = 3.56e7[S/m]
      relpermittivity = 1
      thermalexpansioncoefficient = 23e-6[1/K]
      density = 2700[kg/m^3]
    Enu "Young's modulus and Poisson's ratio"
      youngsmodulus = 70e9[Pa]
      poissonsratio = 0.33
    Murnaghan
      l = -2.5e11[Pa]
      m = -3.3e11[Pa]
      n = -3.5e11[Pa]
    Lame "Lamé parameters"
      lambLame = 5.1e10[Pa]
      muLame = 2.6e10[Pa]
  mat3: Common "Galvanized steel" on boundaries 1-6
    def "Basic"
      relpermeability = 1
      heatcapacity = 475[J/(kg*K)]
      thermalconductivity = 44.5[W/(m*K)]
      electricconductivity = 10000[S/m]
      relpermittivity = 1
      thermalexpansioncoefficient = 12.3e-6[1/K]
      density = 7850[kg/m^3]
    Enu "Young's modulus and Poisson's ratio"
      youngsmodulus = 200e9[Pa]
      poissonsratio = 0.30
    Murnaghan
      l = -3.0e11[Pa]
      m = -6.2e11[Pa]
      n = -7.2e11[Pa]
    Lame "Lamé parameters"
      lambLame = 1.15e11[Pa]
      muLame = 7.69e10[Pa]

Physics
  emw: ElectromagneticWaves "Electromagnetic Waves, Frequency Domain" on all domains
    dependent variable E = {Ex, Ey, Ez}
    BackgroundField.SolveFor = fullField
    BackgroundField.WaveType = LinearPolByAngle
    BackgroundField.Eampl = 1[V/m]
    BackgroundField.anglePitch = pi/2
    MeshControl.EnableMeshControl = 1
    MeshControl.SizeControlParameter = Frequency
    MeshControl.PhysicsControlledMeshMaximumFrequency = 300[MHz]
    wee1: WaveEquationElectric (default)
    pec1: PerfectElectricConductor (default)
    init1: init "Initial Values 1" (default) | E = {0, 0, 0}
    imp2: Impedance "Impedance Boundary Condition 2" on boundaries 1-6 | Es = {1, 0, 0}
    imp1: Impedance "Impedance Boundary Condition 1" (disabled) on no boundaries
    imp3: Impedance "Impedance Boundary Condition steel no drive" on boundaries 1, 6
    sctr1: Scattering "Scattering Boundary Condition 1" (disabled) on no boundaries
    lport1: LumpedPort (disabled) on no boundaries
      PortType = UserDefined
      PortExcitation = off
      Zref = 180[ohm]
      hPort = 0.003702872474
      wPort = pi*.005
      ahPort = {1, 0, 0}
    efb1: ElectricField (disabled) on boundaries 1-6 | E0 = {0, 0, 0}
    ffd1: FarFieldDomain (disabled) on domains 1
      ffc1: FarFieldCalculation on no boundaries

Mesh
  mesh1 "Mesh 1"
    size: MeshSizeDefault | hmax = 0.59960; hmin = 0.017990; hcurve = 0.6; hnarrow = 0.5; hgrad = 1.5; custom = on
    size1: Size (disabled) on no boundaries
      hmax = 0.0031240
      hmin = 9.3720E-5
      hcurve = 0.6
      hnarrow = 0.5
      hgrad = 1.5
      custom = on
    map1: Map "Mapped 1" on no boundaries
      dis1: Distribution on no edges
    map2: Map "Mapped 2" on no boundaries
      dis1: Distribution on no edges | numelem = 4
    map3: Map "Mapped 3" on no boundaries
      dis1: Distribution on no edges | numelem = 3
    conv1: Convert on no boundaries
    ftri1: FreeTri "Free Triangular 1" on no boundaries | yscale = 2; zscale = 2
      size1: Size on no boundaries
    ftet1: FreeTet "Free Tetrahedral 1" on domains 1 | smoothcontrol = off; optcurved = on
      size1: Size on domains 1 | hmin = 0.0658

Studies
  std1 "Study 1"
    freq: Frequency "Frequency Domain" | punit = MHz; plist = range(10[MHz],(300[MHz]-(10[MHz]))/999,300[MHz])

Solver configurations
  sol1 "Solution 1" (study std1)
    v1: Variables "Dependent Variables 1"
    s1: Stationary "Stationary Solver 1"
      p1: Parametric
        pname = freq
        plistarr = range(10[MHz],(300[MHz]-(10[MHz]))/999,300[MHz])
        punit = MHz
        pcontinuationmode = no
      fc1: FullyCoupled | linsolver = i1
      i1: Iterative "Suggested Iterative Solver (emw)" | itrestart = 300; prefuntype = right
        mg1: Multigrid | iter = 1

Datasets
  dset1: Solution | solution = sol1
  mesh1: Mesh | mesh = mesh1
  cpt1: CutPoint3D | data = dset1; pointx = -.04412; pointy = 0; pointz = .03

Derived values
  gev1: EvalGlobal "S-Parameter (emw)" | data = dset1; table = tbl1; expr = emw.S11dB
  gev2: EvalGlobal "Lumped Port Voltage" | data = dset1; table = tbl2; expr = emw.Vport_1; descr = Lumped port voltage
  gev3: EvalGlobal "Antenna Factor"
    data = dset1
    table = tbl4
    expr = 10*log10(1/(abs(emw.Vport_1)))
    descr = Antenna Factor
  gev4: EvalGlobal "Magnitude LPV" | data = dset1; table = tbl5; expr = abs(emw.Vport_1)
  pev1: EvalPoint "Ex center" | data = cpt1; table = tbl6; expr = abs(emw.Ex)
  pev2: EvalPoint "20 log Ex center" | data = cpt1; table = tbl7; expr = 20*log(abs(emw.Ex))

Tables
  tbl1: Table "Table 1: S-Parameter"
    freq (GHz) | S11 (1)
    0.075 | -1.7335
  tbl2: Table "Table 2: Lumped Port Voltage"
    // Global Evaluation 2 (emw.Vport_1)
    freq (MHz) | Lumped port voltage (V)
    25 | -8.79358e-05-0.000116314i
    25.5 | -9.32503e-05-0.000120713i
    26 | -9.89175e-05-0.000124624i
    26.5 | -0.000105664-0.000129068i
    27 | -0.00011134-0.000132953i
    27.5 | -0.000117631-0.00013567i
    28 | -0.00012261-0.000137741i
    28.5 | -0.000127766-0.000139197i
    29 | -0.00013438-0.00014147i
    29.5 | -0.000139396-0.000142918i
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  tbl4: Table
    // Antenna Factor (10*log10(1/(abs(emw.Vport_1))))
    freq (MHz) | Antenna Factor
    30 | 45.7092
    30.3 | 44.0646
    30.6 | 43.8309
    30.9 | 43.7156
    31.2 | 43.6636
    31.5 | 43.6548
    31.8 | 43.6722
    32.1 | 43.7114
    32.4 | 43.7679
    32.7 | 43.8359
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  tbl6: Table
    // Ex center (abs(emw.Ex))
    freq (MHz) | abs(emw.Ex) (V/m), Point: (-0.04412, 0, 0.03)
    10 | 1.02693
    10.2903 | 1.02693
    10.5806 | 1.02693
    10.8709 | 1.02693
    11.1612 | 1.02693
    11.4515 | 1.02693
    11.7417 | 1.02693
    12.032 | 1.02693
    12.3223 | 1.02693
    12.6126 | 1.02693
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  tbl7: Table
    // 20 log Ex center ()
    freq (MHz) | 20*log(abs(emw.Ex)), Point: (-0.04412, 0, 0.03)
    10 | 0.53152
    10.2903 | 0.53152
    10.5806 | 0.53152
    10.8709 | 0.638551
    11.1612 | 0.638551
    11.4515 | 0.638551
    11.7417 | 0.638551
    12.032 | 0.77444
    12.3223 | 0.77444
    12.6126 | 0.77444
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
Plots
  pg1: PlotGroup3D "Electric Field (emw)" | data = dset1
    mslc1: Multislice | expr = emw.normE
  pg2: PlotGroup3D "3D Plot Group 2: Mesh quality" | data = mesh1
    mesh1: Mesh | meshdomain = volume; elemtype2 = quad
  pg3: PlotGroup3D "3D Plot Group 3: Electric field" | data = dset1
    slc1: Slice | expr = emw.normE; quickplane = xy; quickznumber = 1; quickynumber = 3; shift = 0.15
    arwv1: ArrowVolume | expr = {emw.Ex, emw.Ey, emw.Ez}; arrowlength = normalized
  pg4: PlotGroup3D "3D Plot Group 3: Current Density" | data = dset1
    slc1: Slice
      expr = emw.normJ
      descr = Current density norm
      quickznumber = 1
      quickxnumber = 1
      quickynumber = 3
      shift = -1.8288
    arwv1: ArrowVolume | expr = {emw.Jx, emw.Jy, emw.Jz}; descr = Current density; arrowlength = normalized
    arws1: ArrowSurface (disabled) | expr = {emw.Ex, emw.Ey, emw.Ez}; arrowlength = normalized
      sel1: Selection
  pg6: PlotGroup1D "1D Plot Group 6: Lumped port voltage" | data = none
    tblp1: Table "Table Graph 1" | table = tbl2
  pg7: PlotGroup3D "3D Plot Group 7" | data = dset1
    rp1: RadiationPattern | expr = emw.normEfar
  pg8: PlotGroup1D "1D Plot Group 8" | data = none
    tblp1: Table "Table Graph 1" | table = tbl1
  pg9: PlotGroup1D "1D Plot Group 9" | data = none
    tblp1: Table "Table Graph 1" | table = tbl3
  pg10: PlotGroup1D "1D Plot Group 10" | data = none
    tblp1: Table "Table Graph 1" | table = tbl4
  pg11: PlotGroup1D "1D Plot Group 11" | data = none
    tblp1: Table "Table Graph 1" | table = tbl5
  pg12: PlotGroup1D "1D Plot Group 12" | data = none
    tblp1: Table "Table Graph 1" | table = tbl6
  pg13: PlotGroup1D "1D Plot Group 13" | data = none
    tblp1: Table "Table Graph 1" | table = tbl7

Exports
  tbl1: Table
    table = tbl2
    filename = C:\Users\phys-simulation\Desktop\DarkRadioSimulations\REU_19\bicon_box_orientation\bicon_box_orientation_LPV_551pts.txt