// COMSOL Multiphysics 5.4.0.388 model "bicon_box_only_12.6.20.mph"
// Outline of the model tree

Coordinate systems
  pml1: PML "Perfectly Matched Layer 1" on no domains | ScalingType = Spherical

Geometry
  geom1 "Geometry 1" (3D, length unit m)
    blk1: Block | pos = {-.04412, 0, 0}; base = center; size = {10[ft], 8[ft], 12[ft]}
    fin: Finalize "Form Union"

Materials
  mat1: Common "Air" on domains 1
    def "Basic"
      thermalexpansioncoefficient = alpha_p(pA,T)
      molarmass = 0.02897
      bulkviscosity = muB(T)
      relpermeability = 1
      relpermittivity = 1
      dynamicviscosity = eta(T)
      ratioofspecificheat = 1.4
      electricconductivity = 0[S/m]
      heatcapacity = Cp(T)
      density = rho(pA,T)
      thermalconductivity = k(T)
      soundspeed = cs(T)
      eta: Piecewise | arg = T; pieces = {200.0, 1600.0, -8.38278E-7+8.35717342E-8*T^1-7.69429583E-11*T^2+4.6437266E-14*T^3-1.06585607E-17*T^4}; argunit = K; fununit = Pa*s
      Cp: Piecewise | arg = T; pieces = {200.0, 1600.0, 1047.63657-0.372589265*T^1+9.45304214E-4*T^2-6.02409443E-7*T^3+1.2858961E-10*T^4}; argunit = K; fununit = J/(kg*K)
      rho: Analytic | expr = pA*0.02897/R_const[K*mol/J]/T; args = {pA, T}; dermethod = manual; argders = {{pA, d(pA*0.02897/R_const/T,pA)}, {T, d(pA*0.02897/R_const/T,T)}}; argunit = Pa,K; fununit = kg/m^3
      k: Piecewise | arg = T; pieces = {200.0, 1600.0, -0.00227583562+1.15480022E-4*T^1-7.90252856E-8*T^2+4.11702505E-11*T^3-7.43864331E-15*T^4}; argunit = K; fununit = W/(m*K)
      cs: Analytic | expr = sqrt(1.4*R_const[K*mol/J]/0.02897*T); args = T; dermethod = manual; argunit = K; fununit = m/s
      an1: Analytic | funcname = alpha_p; expr = -1/rho(pA,T)*d(rho(pA,T),T); args = {pA, T}; argunit = Pa,K; fununit = 1/K
      an2: Analytic "Analytic 2a" | funcname = muB; expr = 0.6*eta(T); args = T; argunit = K; fununit = Pa*s
    RefractiveIndex
      n = 1
      ki = 0
    NonlinearModel
      BA = (def.gamma+1)/2
  mat2: Common "Aluminum" on no boundaries
    def "Basic"
      relpermeability = 1
      heatcapacity = 900[J/(kg*K)]
      thermalconductivity = 238[W/(m*K)]
      electricconductivity = 3.774e7[S/m]
      relpermittivity = 1
      thermalexpansioncoefficient = 23e-6[1/K]
      density = 2700[kg/m^3]
    Enu "Young's modulus and Poisson's ratio"
      youngsmodulus = 70e9[Pa]
      poissonsratio = 0.33
    Murnaghan
      l = -2.5e11[Pa]
      m = -3.3e11[Pa]
      n = -3.5e11[Pa]
    Lame "Lamé parameters"
      lambLame = 5.1e10[Pa]
      muLame = 2.6e10[Pa]
  mat3: Common "Galvanized steel" on boundaries 1-6
    def "Basic"
      relpermeability = 1
      heatcapacity = 475[J/(kg*K)]
      thermalconductivity = 44.5[W/(m*K)]
      electricconductivity = 5.9e6[S/m]
      relpermittivity = 1
      thermalexpansioncoefficient = 12.3e-6[1/K]
      density = 7850[kg/m^3]
    Enu "Young's modulus and Poisson's ratio"
      youngsmodulus = 200e9[Pa]
      poissonsratio = 0.30
    Murnaghan
      l = -3.0e11[Pa]
      m = -6.2e11[Pa]
      n = -7.2e11[Pa]
    Lame "Lamé parameters"
      lambLame = 1.15e11[Pa]
      muLame = 7.69e10[Pa]

Physics
  emw: ElectromagneticWaves "Electromagnetic Waves, Frequency Domain" on all domains
    dependent variable E = {Ex, Ey, Ez}
    BackgroundField.SolveFor = scatteredField
    BackgroundField.WaveType = LinearPolByAngle
    BackgroundField.Eampl = 100[V/m]
    BackgroundField.anglePitch = pi/2
    MeshControl.EnableMeshControl = 1
    MeshControl.SizeControlParameter = Frequency
    MeshControl.PhysicsControlledMeshMaximumFrequency = 300[MHz]
    wee1: WaveEquationElectric (default)
    pec1: PerfectElectricConductor (default)
    init1: init "Initial Values 1" (default)
    imp2: Impedance "Impedance Boundary Condition 2" on boundaries 1-6

Mesh
  mesh1 "Mesh 1"
    size: MeshSizeDefault | hmax = 0.59960; hmin = 0.017990; hcurve = 0.6; hnarrow = 0.5; hgrad = 1.5; custom = on
    size1: Size (disabled) on no boundaries
      hmax = 0.0031240
      hmin = 9.3720E-5
      hcurve = 0.6
      hnarrow = 0.5
      hgrad = 1.5
      custom = on
    map1: Map "Mapped 1" on no boundaries
      dis1: Distribution on no edges
    map2: Map "Mapped 2" on no boundaries
      dis1: Distribution on no edges | numelem = 4
    map3: Map "Mapped 3" on no boundaries
      dis1: Distribution on no edges | numelem = 3
    conv1: Convert on no boundaries
    ftri1: FreeTri "Free Triangular 1" on no boundaries | yscale = 2; zscale = 2
      size1: Size on no boundaries
    ftet1: FreeTet "Free Tetrahedral 1" on domains 1 | smoothcontrol = off; optcurved = on
      size1: Size on domains 1 | hmin = 0.0658

Studies
  std1 "Study 1"
    freq: Frequency "Frequency Domain" | punit = MHz; plist = range(25[MHz],1[MHz],300[MHz])

Solver configurations
  sol1 "Solution 1" (study std1)
    v1: Variables "Dependent Variables 1"
    s1: Stationary "Stationary Solver 1" | stol = 0.01
      p1: Parametric | pname = freq; plistarr = range(25[MHz],1[MHz],300[MHz]); punit = MHz; pcontinuationmode = no
      fc1: FullyCoupled | linsolver = i1
      i1: Iterative "Suggested Iterative Solver (emw)" | itrestart = 300; prefuntype = right
        mg1: Multigrid | iter = 1

Datasets
  dset1: Solution | solution = sol1
  mesh1: Mesh | mesh = mesh1
  cpt1: CutPoint3D | data = dset1; pointx = -.04412; pointy = 0; pointz = 0
  cln1: CutLine3D | data = dset1; genpoints = {{-.54262, 0, 0}, {.45738, 0, 0}}

Derived values
  gev1: EvalGlobal "S-Parameter (emw)" | data = dset1; table = tbl1; expr = emw.S11dB
  gev2: EvalGlobal "Lumped Port Voltage" | data = dset1; table = tbl2; expr = emw.Vport_1; descr = Lumped port voltage
  gev3: EvalGlobal "Antenna Factor"
    data = dset1
    table = tbl4
    expr = 10*log10(1/(abs(emw.Vport_1)))
    descr = Antenna Factor
  gev4: EvalGlobal "magnitude v" | data = dset1; table = tbl5; expr = abs(emw.Vport_1)
  pev1: EvalPoint "magnitude E_x" | data = cpt1; table = tbl7; expr = abs(emw.Ex)
  pev2: EvalPoint "Mag E_x 1m line" | data = dset1

Tables
  tbl1: Table "Table 1: S-Parameter"
    freq (GHz) | S11 (1)
    0.075 | -1.7335
  tbl2: Table "Table 2: Lumped Port Voltage"
    // Global Evaluation 2 (emw.Vport_1)
    freq (MHz) | Lumped port voltage (V) | Lumped port voltage (V)
    25 | -8.79358e-05-0.000116314i | -1.8461e-05-1.95076e-05i
    25.5 | -9.32503e-05-0.000120713i | -1.86607e-05-3.44991e-05i
    26 | -9.89175e-05-0.000124624i | -2.01206e-05-3.61717e-05i
    26.5 | -0.000105664-0.000129068i | -2.1012e-05-3.69486e-05i
    27 | -0.00011134-0.000132953i | -2.15763e-05-3.72147e-05i
    27.5 | -0.000117631-0.00013567i | -2.19028e-05-3.71251e-05i
    28 | -0.00012261-0.000137741i | -2.21173e-05-3.67965e-05i
    28.5 | -0.000127766-0.000139197i | -2.22133e-05-3.62869e-05i
    29 | -0.00013438-0.00014147i | -2.22084e-05-3.56435e-05i
    29.5 | -0.000139396-0.000142918i | -2.21503e-05-3.49098e-05i
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  tbl4: Table
    // Antenna Factor (10*log10(1/(abs(emw.Vport_1))))
    freq (MHz) | Antenna Factor
    30 | 45.7092
    30.3 | 44.0646
    30.6 | 43.8309
    30.9 | 43.7156
    31.2 | 43.6636
    31.5 | 43.6548
    31.8 | 43.6722
    32.1 | 43.7114
    32.4 | 43.7679
    32.7 | 43.8359
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  tbl5: Table
    // magnitude v (abs(emw.Vport_1))
    freq (MHz) | abs(emw.Vport_1) (V)
    10 | 4.43685e-05
    10.3 | 4.57858e-05
    10.6 | 4.75715e-05
    10.9 | 4.92878e-05
    11.2 | 5.09463e-05
    11.5 | 5.25569e-05
    11.8 | 5.42735e-05
    12.1 | 5.57334e-05
    12.4 | 5.7105e-05
    12.7 | 5.84162e-05
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  tbl7: Table
    // Point Evaluation 1 (emw.Ex)
    freq (MHz) | abs(emw.Ex) (V/m), Point: (-0.04412, 0, 0)
    25 | 0.0550706
    26 | 0.0578919
    27 | 0.0624181
    28 | 0.0671406
    29 | 0.0720353
    30 | 0.0771017
    31 | 0.0823399
    32 | 0.0877495
    33 | 0.0933306
    34 | 0.0990831
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
Plots
  pg1: PlotGroup3D "Electric Field (emw)" | data = dset1
    mslc1: Multislice | expr = emw.normE
  pg2: PlotGroup3D "3D Plot Group 2: Mesh quality" | data = mesh1
    mesh1: Mesh | meshdomain = volume; elemtype2 = quad
  pg3: PlotGroup3D "3D Plot Group 3: Electric field" | data = dset1
    slc1: Slice | expr = emw.normE; quickplane = xy; quickznumber = 1; quickynumber = 3; shift = 0.15
    arwv1: ArrowVolume | expr = {emw.Ex, emw.Ey, emw.Ez}; arrowlength = normalized
  pg4: PlotGroup3D "3D Plot Group 3: Current Density" | data = dset1
    slc1: Slice
      expr = emw.normJ
      descr = Current density norm
      quickznumber = 1
      quickxnumber = 1
      quickynumber = 3
      shift = -1.8288
    arwv1: ArrowVolume | expr = {emw.Jx, emw.Jy, emw.Jz}; descr = Current density; arrowlength = normalized
    arws1: ArrowSurface (disabled) | expr = {emw.Ex, emw.Ey, emw.Ez}; arrowlength = normalized
      sel1: Selection
  pg6: PlotGroup1D "1D Plot Group 6: Lumped port voltage" | data = none
    tblp1: Table "Table Graph 1" | table = tbl2
  pg7: PlotGroup3D "3D Plot Group 7" | data = dset1
    rp1: RadiationPattern | expr = emw.normEfar
  pg8: PlotGroup1D "1D Plot Group 8" | data = none
    tblp1: Table "Table Graph 1" | table = tbl1
  pg9: PlotGroup1D "1D Plot Group 9" | data = none
    tblp1: Table "Table Graph 1" | table = tbl3
  pg10: PlotGroup1D "1D Plot Group 10" | data = none
    tblp1: Table "Table Graph 1" | table = tbl4
  pg11: PlotGroup1D "1D Plot Group 11" | data = none
    tblp1: Table "Table Graph 1" | table = tbl7
  pg12: PlotGroup3D "3D Plot Group 12" | data = dset1
    slc1: Slice | expr = emw.normB; quickxnumber = 2

Exports
  tbl1: Table
    table = tbl2
    filename = C:\Users\phys-simulation\Desktop\DarkRadioSimulations\REU_19\bicon_box_orientation\bicon_box_orientation_LPV_551pts.txt