// COMSOL Multiphysics 5.4.0.388 model "biconFreespace.mph"
// Outline of the model tree

Parameters
  Radius = .0025[m]

Selections
  sel1: Explicit "Antenna Boundaries" on boundaries 13-64, 85-136
  sel2: Explicit "Feed Point" on boundaries 65-68

Coordinate systems
  pml1: PML "Perfectly Matched Layer 1" on domains 1-4, 6-9 | ScalingType = Spherical

Geometry
  geom1 "Geometry 1" (3D, length unit m)
    imp1: Import
      type = cad
      filename = C:\Users\phys-simulation\Desktop\DarkRadioSimulations\3D Models\Bicon Antenna\bicon_arm_no_trans_line.ipt
      knit = surface
    mov1: Move | input = imp1; displx = .04; disply = 0; displz = 0
    mir1: Mirror | input = mov1; keep = on; axis = {1, 0, 0}
    cyl1: Cylinder | pos = {-(0.004/2), 0, 0}; axistype = x; r = Radius; h = 0.004
    ext1: Extrude
      extrudefrom = faces
      inputface = mir1(1) boundaries 1
      specify = vertices
      distance = .015
      vertex = cyl1(1) points 7
    ext2: Extrude
      extrudefrom = faces
      inputface = mov1(1) boundaries 1
      specify = vertices
      distance = 1
      vertex = cyl1(1) points 2
    sph1: Sphere | layername = Layer 1; layer = 0.2; r = 2
    dif1: Difference | input = sph1; input2 = cyl1, ext1, ext2
    fin: Finalize "Form Union"

Materials
  mat1: Common "Air" on all domains
    def "Basic"
      thermalexpansioncoefficient = alpha_p(pA,T)
      molarmass = 0.02897
      bulkviscosity = muB(T)
      relpermeability = 1
      relpermittivity = 1
      dynamicviscosity = eta(T)
      ratioofspecificheat = 1.4
      electricconductivity = 0[S/m]
      heatcapacity = Cp(T)
      density = rho(pA,T)
      thermalconductivity = k(T)
      soundspeed = cs(T)
      eta: Piecewise | arg = T; pieces = {200.0, 1600.0, -8.38278E-7+8.35717342E-8*T^1-7.69429583E-11*T^2+4.6437266E-14*T^3-1.06585607E-17*T^4}; argunit = K; fununit = Pa*s
      Cp: Piecewise | arg = T; pieces = {200.0, 1600.0, 1047.63657-0.372589265*T^1+9.45304214E-4*T^2-6.02409443E-7*T^3+1.2858961E-10*T^4}; argunit = K; fununit = J/(kg*K)
      rho: Analytic | expr = pA*0.02897/R_const[K*mol/J]/T; args = {pA, T}; dermethod = manual; argders = {{pA, d(pA*0.02897/R_const/T,pA)}, {T, d(pA*0.02897/R_const/T,T)}}; argunit = Pa,K; fununit = kg/m^3
      k: Piecewise | arg = T; pieces = {200.0, 1600.0, -0.00227583562+1.15480022E-4*T^1-7.90252856E-8*T^2+4.11702505E-11*T^3-7.43864331E-15*T^4}; argunit = K; fununit = W/(m*K)
      cs: Analytic | expr = sqrt(1.4*R_const[K*mol/J]/0.02897*T); args = T; dermethod = manual; argunit = K; fununit = m/s
      an1: Analytic | funcname = alpha_p; expr = -1/rho(pA,T)*d(rho(pA,T),T); args = {pA, T}; argunit = Pa,K; fununit = 1/K
      an2: Analytic "Analytic 2a" | funcname = muB; expr = 0.6*eta(T); args = T; argunit = K; fununit = Pa*s
    RefractiveIndex
      n = 1
      ki = 0
    NonlinearModel
      BA = (def.gamma+1)/2
  mat2: Common "Aluminum" on selection sel1
    def "Basic"
      relpermeability = 1
      heatcapacity = 900[J/(kg*K)]
      thermalconductivity = 238[W/(m*K)]
      electricconductivity = 3.774e7[S/m]
      relpermittivity = 1
      thermalexpansioncoefficient = 23e-6[1/K]
      density = 2700[kg/m^3]
    Enu "Young's modulus and Poisson's ratio"
      youngsmodulus = 70e9[Pa]
      poissonsratio = 0.33
    Murnaghan
      l = -2.5e11[Pa]
      m = -3.3e11[Pa]
      n = -3.5e11[Pa]
    Lame "Lamé parameters"
      lambLame = 5.1e10[Pa]
      muLame = 2.6e10[Pa]

Physics
  emw: ElectromagneticWaves "Electromagnetic Waves, Frequency Domain" on all domains
    dependent variable E = {Ex, Ey, Ez}
    BackgroundField.SolveFor = scatteredField
    BackgroundField.WaveType = LinearPolByAngle
    BackgroundField.anglePitch = pi/2
    MeshControl.SizeControlParameter = Frequency
    MeshControl.PhysicsControlledMeshMaximumFrequency = 300[MHz]
    wee1: WaveEquationElectric (default)
    pec1: PerfectElectricConductor (default)
    init1: init "Initial Values 1" (default)
    lport1: LumpedPort on selection sel2
      PortType = UserDefined
      PortExcitation = off
      Zref = 180[ohm]
      hPort = 0.004
      wPort = 2*pi*Radius
      ahPort = {1, 0, 0}
    imp1: Impedance "Impedance Boundary Condition 1" on selection sel1
    sctr1: Scattering "Scattering Boundary Condition 1" on boundaries 5-8, 72, 73, 78, 83
    ffd1: FarFieldDomain on domains 5
      ffc1: FarFieldCalculation on boundaries 9-12, 74, 75, 79, 82

Mesh
  mesh1 "Mesh 1" (physics-controlled)

Studies
  std1 "Study 1"
    freq: Frequency "Frequency Domain" | punit = MHz; plist = range(25,5,300)

Solver configurations
  sol1 "Solution 1" (study std1)
    v1: Variables "Dependent Variables 1"
    s1: Stationary "Stationary Solver 1" | stol = 0.01
      p1: Parametric | pname = freq; plistarr = range(25,5,300); punit = MHz; pcontinuationmode = no
      fc1: FullyCoupled | linsolver = i1
      i1: Iterative "Suggested Iterative Solver (emw)" | itrestart = 300; prefuntype = right
        mg1: Multigrid | iter = 1

Datasets
  dset1: Solution | solution = sol1

Derived values
  gev1: EvalGlobal "lpv" | data = dset1; table = tbl1; expr = abs(emw.Vport_1); unit = V; descr = LPV
  gev2: EvalGlobal "AF"
    data = dset1
    table = tbl3
    expr = {, (20*log10(1/(abs(emw.Vport_1))))+5.6, }
    descr = {, Antenna Factor, }
  gev3: EvalGlobal "real AF" | data = dset1; table = tbl4; expr = 20*log10(1/(abs(emw.Vport_1))); descr = AF

Tables
  tbl1: Table
    // Global Evaluation 1 (emw.Vport_1)
    freq (MHz) | Lumped port voltage (V) | abs(emw.Vport_1) (V)
    25 | 0.273267+0.344558i | 0.439767
    30 | 0.358444+0.356288i | 0.505395
    35 | 0.441532+0.349365i | 0.563033
    40 | 0.520064+0.325092i | 0.613312
    45 | 0.588495+0.285942i | 0.654285
    50 | 0.644798+0.236353i | 0.686752
    55 | 0.688723+0.180213i | 0.71191
    60 | 0.720746+0.120581i | 0.730763
    65 | 0.741792+0.0598422i | 0.744202
    70 | 0.753-0.000216241i | 0.753
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  tbl4: Table
    // Global Evaluation 3 (10*log10(1/(abs(emw.Vport_1))))
    freq (MHz) | AF
    25 | 10.0824
    30 | 8.46182
    35 | 7.09522
    40 | 5.9235
    45 | 4.9767
    50 | 4.23106
    55 | 3.67068
    60 | 3.28218
    65 | 3.0474
    70 | 2.94492
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
Plots
  pg1: PlotGroup3D "Electric Field (emw)" | data = dset1
    mslc1: Multislice | expr = emw.normE
  pg2: PolarGroup "2D Far Field (emw)" | data = dset1
    rp1: RadiationPattern | expr = emw.normEfar; phidisc = 180
  pg3: PlotGroup3D "3D Far Field (emw)" | data = dset1
    rp1: RadiationPattern | expr = emw.normEfar; thetadisc = 45; phidisc = 45; directivity = on
  pg4: PlotGroup1D "1D Plot Group 4" | data = none
    tblp1: Table "Table Graph 1" | table = tbl3
  pg5: PlotGroup1D "1D Plot Group 5" | data = none
    tblp1: Table "Table Graph 1" | table = tbl4

Exports
  tbl1: Table "AF" | table = tbl3; filename = C:\Users\phys-simulation\Desktop\Vasco\Bicon\Analysis\bicon4mmAFRerun.txt
  tbl2: Table | table = tbl4; filename = C:\Users\phys-simulation\Desktop\Vasco\Bicon\Analysis\bicon4mmRerunRealAF.txt