// COMSOL Multiphysics 5.6.0.401 model "biconRoomLowRes_9.10.21_v5.6_PaulsRoom.mph"
// Outline of the model tree

Parameters
  Radius = .0025[m]

Selections
  sel1: Explicit "Antenna Boundaries" on boundaries 17-36, 139-152, 154-166, 176-180, 187-205, 256-282, 365-370
  sel2: Explicit "Feed Point" on boundaries 182-185
  sel3: Explicit "objects" on boundaries 6-180, 187-372
  sel4: Explicit "walls" on boundaries 1-5, 373
  sel5: Explicit "problem edges" on edges 132, 135, 138, 210, 212, 214, 216-218, 231-233, 428-430, 588, 591, 594, 733, 735, 737, 739-741, 754-756, 928-930

Geometry
  geom1 "Geometry 1" (3D, length unit m)
    blk1: Block | base = center; size = {3.048, 2.4384, 3.6576}
    imp2: Import
      type = cad
      filename = C:\Users\phys-simulation\Desktop\DarkRadioSimulations\comsolSimulationsV2\biconRoomLowRes\COMSOL\Pauls LowRes Room with Bicon - 2-23-2021.stp
    del1: Delete "Delete Entities 1" | input = imp2.fullRoomSolid3 domains 1; imp2.fulldoordoor_baseSolid1 domains 1
    del3: Delete "Delete Entities 3"
      input = imp2.fulllightSolid2_16 domains 1; imp2.fulllightSolid2_18 domains 1; imp2.fulllightSolid2_19 domains 1; imp2.fulllightSolid2_17 domains 1; imp2.fulllightSolid2_29 domains 1; imp2.fulllightSolid2_28 domains 1; imp2.fulllightSolid2_27 domains 1; imp2.fulllightSolid2_26 domains 1; imp2.fulllightSolid2_23 domains 1; imp2.fulllightSolid2_22 domains 1; imp2.fulllightSolid2_24 domains 1; imp2.fulllightSolid2_21 domains 1; imp2.fulllightSolid2_11 domains 1; imp2.fulllightSolid2_13 domains 1; imp2.fulllightSolid2_12 domains 1; imp2.fulllightSolid2_14 domains 1; imp2.fulllightSolid2_1 domains 1; imp2.fulllightSolid2_3 domains 1; imp2.fulllightSolid2_2 domains 1; imp2.fulllightSolid2_4 domains 1; imp2.fulllightSolid2_6 domains 1; imp2.fulllightSolid2_7 domains 1; imp2.fulllightSolid2_9 domains 1; imp2.fulllightSolid2_8 domains 1
    del2: Delete "Delete Entities 2"
      input = imp2.fullgusset_framegusset_roofFloorgusset_plate_leftRightSolid1_3 domains 1; imp2.fullgusset_framegusset_plateSolid1_2 domains 1; imp2.fullgusset_framegusset_roofFloorgusset_plate_leftRightSolid1 domains 1; imp2.fullgusset_framegusset_plateSolid1_3 domains 1; imp2.fullgusset_framegusset_plateSolid1_4 domains 1; imp2.fullgusset_framegusset_plateSolid1_5 domains 1; imp2.fullgusset_framegusset_roofFloorgusset_plate_leftRight_1Solid1 domains 1; imp2.fullgusset_framegusset_roofFloorgusset_plate_leftRight_1Solid1_2 domains 1; imp2.fullgusset_framegusset_roofFloorgusset_plate_leftRightSolid1_2 domains 1; imp2.fullgusset_framegusset_roofFloorgusset_plate_leftRight_1Solid1_3 domains 1; imp2.fullgusset_framegusset_plateSolid1_6 domains 1; imp2.fullgusset_framegusset_plateSolid1_7 domains 1; imp2.fullgusset_framegusset_plateSolid1 domains 1; imp2.fullgusset_framegusset_plateSolid1_1 domains 1; imp2.fulldoor_rimSolid1 domains 1; imp2.fullgusset_framegusset_roofFloorgusset_plate_cornerSolid1_5 domains 1; imp2.fullgusset_framegusset_roofFloorgusset_plate_cornerSolid1_1 domains 1; imp2.fullgusset_framegusset_roofFloorgusset_plate_cornerSolid1_6 domains 1; imp2.fullgusset_framegusset_roofFloorgusset_plate_cornerSolid1_2 domains 1; imp2.fullgusset_framegusset_roofFloorgusset_plate_leftRightSolid1_1 domains 1; imp2.fullgusset_framegusset_roofFloorgusset_plate_leftRight_1Solid1_1 domains 1; imp2.fullgusset_framegusset_roofFloorgusset_plate_cornerSolid1 domains 1; imp2.fullgusset_framegusset_roofFloorgusset_plate_cornerSolid1_7 domains 1; imp2.fullgusset_framegusset_roofFloorgusset_plate_cornerSolid1_3 domains 1; imp2.fullgusset_framegusset_roofFloorgusset_plate_cornerSolid1_4 domains 1
    ext1: Extrude (disabled)
      extrudefrom = faces
      inputface = imp2.bicon_mbicon_arm_nateSolid1 boundaries 1
      specify = vertices
      distance = 1
      vertex = imp2.bicon_mbicon_arm_nateSolid1_1 points 80
    cyl1: Cylinder | pos = {-(0.004/2), 0, 0}; axistype = x; r = Radius; h = 0.004
    dif1: Difference
      input = blk1
      input2 = del1, del2, imp2.bicon_mbicon_arm_nateSolid1, imp2.bicon_mbicon_arm_nateSolid1_1, imp2.fulldoordoor_handleSolid1, imp2.fulldoordoor_handlesolid1, imp2.fulllightSolid2, imp2.fulllightSolid2_10, imp2.fulllightSolid2_15, imp2.fulllightSolid2_20, imp2.fulllightSolid2_25, imp2.fulllightSolid2_5, imp2.fulloutletsswitchboxSolid1
    fin: Finalize "Form Union"

Materials
  mat1: Common "Air" on all domains
    def "Basic"
      thermalexpansioncoefficient = alpha_p(pA,T)
      molarmass = 0.02897
      bulkviscosity = muB(T)
      relpermeability = 1
      relpermittivity = 1
      dynamicviscosity = eta(T)
      ratioofspecificheat = 1.4
      electricconductivity = 0[S/m]
      heatcapacity = Cp(T)
      density = rho(pA,T)
      thermalconductivity = k(T)
      soundspeed = cs(T)
      eta: Piecewise | arg = T; pieces = {200.0, 1600.0, -8.38278E-7+8.35717342E-8*T^1-7.69429583E-11*T^2+4.6437266E-14*T^3-1.06585607E-17*T^4}; argunit = K; fununit = Pa*s
      Cp: Piecewise | arg = T; pieces = {200.0, 1600.0, 1047.63657-0.372589265*T^1+9.45304214E-4*T^2-6.02409443E-7*T^3+1.2858961E-10*T^4}; argunit = K; fununit = J/(kg*K)
      rho: Analytic | expr = pA*0.02897/R_const[K*mol/J]/T; args = {pA, T}; dermethod = manual; argders = {{pA, d(pA*0.02897/R_const/T,pA)}, {T, d(pA*0.02897/R_const/T,T)}}; argunit = Pa,K; fununit = kg/m^3
      k: Piecewise | arg = T; pieces = {200.0, 1600.0, -0.00227583562+1.15480022E-4*T^1-7.90252856E-8*T^2+4.11702505E-11*T^3-7.43864331E-15*T^4}; argunit = K; fununit = W/(m*K)
      cs: Analytic | expr = sqrt(1.4*R_const[K*mol/J]/0.02897*T); args = T; dermethod = manual; argunit = K; fununit = m/s
      an1: Analytic | funcname = alpha_p; expr = -1/rho(pA,T)*d(rho(pA,T),T); args = {pA, T}; argunit = Pa,K; fununit = 1/K
      an2: Analytic "Analytic 2a" | funcname = muB; expr = 0.6*eta(T); args = T; argunit = K; fununit = Pa*s
    RefractiveIndex
      n = 1
      ki = 0
    NonlinearModel
      BA = (def.gamma+1)/2
  mat2: Common "Aluminum" on selection sel3
    def "Basic"
      relpermeability = 1
      heatcapacity = 900[J/(kg*K)]
      thermalconductivity = 238[W/(m*K)]
      electricconductivity = 3.56e7[S/m]
      relpermittivity = 1
      thermalexpansioncoefficient = 23e-6[1/K]
      density = 2700[kg/m^3]
    Enu "Young's modulus and Poisson's ratio"
      youngsmodulus = 70e9[Pa]
      poissonsratio = 0.33
    Murnaghan
      l = -2.5e11[Pa]
      m = -3.3e11[Pa]
      n = -3.5e11[Pa]
    Lame "Lamé parameters"
      lambLame = 5.1e10[Pa]
      muLame = 2.6e10[Pa]
  mat3: Common "Structural steel" on selection sel4
    def "Basic"
      relpermeability = 1
      heatcapacity = 475[J/(kg*K)]
      thermalconductivity = 44.5[W/(m*K)]
      electricconductivity = 5.9e6[S/m]
      relpermittivity = 1
      thermalexpansioncoefficient = 12.3e-6[1/K]
      density = 7850[kg/m^3]
    Enu "Young's modulus and Poisson's ratio"
      youngsmodulus = 200e9[Pa]
      poissonsratio = 0.30
    Murnaghan
      l = -3.0e11[Pa]
      m = -6.2e11[Pa]
      n = -7.2e11[Pa]
    Lame "Lamé parameters"
      lambLame = 1.15e11[Pa]
      muLame = 7.69e10[Pa]

Physics
  emw: ElectromagneticWaves "Electromagnetic Waves, Frequency Domain" on all domains
    dependent variable E = {Ex, Ey, Ez}
    BackgroundField.SolveFor = fullField
    BackgroundField.WaveType = LinearPolByAngle
    BackgroundField.anglePitch = pi/2
    MeshControl.SizeControlParameter = Frequency
    MeshControl.PhysicsControlledMeshMaximumFrequency = 300[MHz]
    wee1: WaveEquationElectric (default)
    pec1: PerfectElectricConductor (default)
    init1: init "Initial Values 1" (default)
    lport1: LumpedPort on selection sel2
      PortType = UserDefined
      PortExcitation = off
      Zref = 180[ohm]
      hPort = 0.004
      wPort = 2*pi*Radius
      ahPort = {1, 0, 0}
    imp1: Impedance "Impedance Boundary Condition 1" on selection sel3
    imp2: Impedance "Impedance Boundary Condition 2" on selection sel4 | Es = {1, 0, 0}

Mesh
  mesh1 "Mesh 1" (physics-controlled)

Studies
  std1 "Study 1"
    freq: Frequency "Frequency Domain" | punit = MHz; plist = 73.7

Solver configurations
  sol1 "Solution 1" (study std1)
    v1: Variables "Dependent Variables 1"
    s1: Stationary "Stationary Solver 1"
      p1: Parametric | pname = freq; plistarr = 73.7; punit = MHz; pcontinuationmode = no
      fc1: FullyCoupled | linsolver = i1
      i1: Iterative "Suggested Iterative Solver (emw)" | itrestart = 300; prefuntype = right
        mg1: Multigrid | iter = 1

Datasets
  dset1: Solution | solution = sol1

Derived values
  gev1: EvalGlobal "lpv" | data = dset1; table = tbl1; expr = abs(emw.Vport_1); unit = V; descr = LPV
  gev3: EvalGlobal "lpv dB" | data = dset1; table = tbl4; expr = 20*log10(abs(emw.Vport_1))
  gev2: EvalGlobal "AF" | data = dset1; table = tbl3; expr = 20*log10(1/(abs(emw.Vport_1))); descr = Antenna Factor

Tables
  tbl1: Table
    // Global Evaluation 1 (emw.Vport_1)
    freq (MHz) | LPV (V)
    73.7 | 9.10839
  tbl3: Table
    // AF (10*log10(1/(abs(emw.Vport_1))))
    freq (MHz) | Antenna Factor
    73.7 | -19.1823
  tbl4: Table
    // lpv dB (20*log10(abs(emw.Vport_1)))
    freq (MHz) | 20*log10(abs(emw.Vport_1))
    73.7 | 19.1888

Plots
  pg1: PlotGroup3D "Electric Field (emw)" | data = dset1
    mslc1: Multislice | expr = emw.normE
  pg2: PolarGroup "2D Far Field (emw)" | data = dset1
    rp1: RadiationPattern | expr = emw.normEfar; phidisc = 180
  pg3: PlotGroup3D "3D Far Field (emw)" | data = dset1
    rp1: RadiationPattern | expr = emw.normEfar; thetadisc = 45; phidisc = 45; directivity = on
  pg4: PlotGroup1D "1D Plot Group 4" | data = none
    tblp1: Table "Table Graph 1" | table = tbl1
  pg5: PlotGroup1D "1D Plot Group 5" | data = none
    tblp1: Table "Table Graph 1" | table = tbl3
  pg6: PlotGroup1D "1D Plot Group 6" | data = none
    tblp1: Table "Table Graph 1" | table = tbl4

Exports
  tbl1: Table "AF" | table = tbl3; filename = C:\Users\phys-simulation\Desktop\Vasco\Bicon\Analysis\bicon4mmAFRerun.txt
  tbl2: Table | table = tbl1; filename = C:\Users\phys-simulation\Desktop\Vasco\biconInBox\analysis\biconInBoxlpv.txt