// COMSOL Multiphysics 5.4.0.388 model "dipole_antenna_freespace.mph"
// Dipole Antenna
// modeldescr_rf/dipole_antenna
// The dipole antenna is one of the most straightforward antenna configurations. It can be realized with two thin metallic rods that have a sinusoidal voltage difference applied between them. The length of the rods is chosen such that they are quarter wavelength elements at the operating frequency. Such an antenna has a well-known torus-like radiation pattern.
// Outline of the model tree

Parameters
  lda0 = 3[m]  // Operating wavelength
  arm_length = lda0/4  // Dipole antenna arm length
  r_antenna = arm_length/20  // Dipole antenna arm radius
  gap_size = .0025[m]  // Gap between arms
  E_field = 0.169[V/m]  // Applied electric field at boundary

Selections
  sel1: Explicit "Antenna" on no boundaries

Coordinate systems
  pml1: PML "Perfectly Matched Layer 1" on domains 1-4, 6-9 | ScalingType = Spherical

Geometry
  geom1 "Geometry 1" (3D, length unit m)
    sph1: Sphere | layername = Layer 1; layer = 0.5*arm_length; r = 5*arm_length
    cyl1: Cylinder
      pos = {0, 0, -(arm_length+gap_size/2)}
      layername = Layer 1
      layer = arm_length
      layerside = off
      layerbottom = on
      layertop = on
      r = r_antenna
      h = (2*arm_length+gap_size)
    dif1: Difference | input = sph1; input2 = cyl1
    fin: Finalize "Form Union"

Materials
  mat1: Common "Air" on all domains
    def "Basic"
      thermalexpansioncoefficient = alpha_p(pA,T)
      molarmass = 0.02897
      bulkviscosity = muB(T)
      relpermeability = 1
      relpermittivity = 1
      dynamicviscosity = eta(T)
      ratioofspecificheat = 1.4
      electricconductivity = 0[S/m]
      heatcapacity = Cp(T)
      density = rho(pA,T)
      thermalconductivity = k(T)
      soundspeed = cs(T)
      eta: Piecewise | arg = T; pieces = {200.0, 1600.0, -8.38278E-7+8.35717342E-8*T^1-7.69429583E-11*T^2+4.6437266E-14*T^3-1.06585607E-17*T^4}; argunit = K; fununit = Pa*s
      Cp: Piecewise | arg = T; pieces = {200.0, 1600.0, 1047.63657-0.372589265*T^1+9.45304214E-4*T^2-6.02409443E-7*T^3+1.2858961E-10*T^4}; argunit = K; fununit = J/(kg*K)
      rho: Analytic | expr = pA*0.02897/R_const[K*mol/J]/T; args = {pA, T}; dermethod = manual; argders = {{pA, d(pA*0.02897/R_const/T,pA)}, {T, d(pA*0.02897/R_const/T,T)}}; argunit = Pa,K; fununit = kg/m^3
      k: Piecewise | arg = T; pieces = {200.0, 1600.0, -0.00227583562+1.15480022E-4*T^1-7.90252856E-8*T^2+4.11702505E-11*T^3-7.43864331E-15*T^4}; argunit = K; fununit = W/(m*K)
      cs: Analytic | expr = sqrt(1.4*R_const[K*mol/J]/0.02897*T); args = T; dermethod = manual; argunit = K; fununit = m/s
      an1: Analytic | funcname = alpha_p; expr = -1/rho(pA,T)*d(rho(pA,T),T); args = {pA, T}; argunit = Pa,K; fununit = 1/K
      an2: Analytic "Analytic 2a" | funcname = muB; expr = 0.6*eta(T); args = T; argunit = K; fununit = Pa*s
    RefractiveIndex
      n = 1
      ki = 0
    NonlinearModel
      BA = (def.gamma+1)/2
  mat2: Common "Aluminum" on boundaries 13-20, 28-30, 39-41
    def "Basic"
      relpermeability = 1
      heatcapacity = 900[J/(kg*K)]
      thermalconductivity = 238[W/(m*K)]
      electricconductivity = 3.774e7[S/m]
      relpermittivity = 1
      thermalexpansioncoefficient = 23e-6[1/K]
      density = 2700[kg/m^3]
    Enu "Young's modulus and Poisson's ratio"
      youngsmodulus = 70e9[Pa]
      poissonsratio = 0.33
    Murnaghan
      l = -2.5e11[Pa]
      m = -3.3e11[Pa]
      n = -3.5e11[Pa]
    Lame "Lamé parameters"
      lambLame = 5.1e10[Pa]
      muLame = 2.6e10[Pa]

Physics
  emw: ElectromagneticWaves "Electromagnetic Waves, Frequency Domain" on all domains
    dependent variable E = {Ex, Ey, Ez}
    BackgroundField.SolveFor = scatteredField
    BackgroundField.WaveType = LinearPolByAngle
    wee1: WaveEquationElectric (default)
    pec1: PerfectElectricConductor (default)
    init1: init "Initial Values 1" (default) | E = {0, 0, 0}
    imp1: Impedance "Impedance Boundary Condition 1" on boundaries 13-15, 18-20, 28, 30, 39, 41
    lport1: LumpedPort on boundaries 16, 17, 29, 40
      PortType = UserDefined
      PortExcitation = off
      hPort = gap_size
      wPort = 2*pi*r_antenna
      ahPort = {0, 0, 1}
    ffd1: FarFieldDomain on domains 5
      ffc1: FarFieldCalculation on boundaries 9-12, 26, 27, 34, 37
    efb1: ElectricField (disabled) on boundaries 9-12, 26, 27, 34, 37 | E0 = {0, 0, E_field}

Mesh
  mesh1 "Mesh 1" (physics-controlled)

Studies
  std1 "Study 1"
    param2: Parametric "Parametric Sweep 2"
      pname = gap_size
      plistarr = .001,.002,.003,.004,.005,.006,.007,.008,.009,.01
      punit = m
    param: Parametric "Parametric Sweep" (disabled) | pname = E_field; plistarr = range(0.1,0.05,0.5); punit = V/m
    freq: Frequency "Frequency Domain" | punit = GHz; plist = 83[MHz]

Solver configurations
  sol1 "Solution 1" (study std1)
    v1: Variables "Dependent Variables 1"
    s1: Stationary "Stationary Solver 1" | stol = 0.01
      p1: Parametric | pname = freq; plistarr = 83[MHz]; punit = GHz; pcontinuationmode = no
      fc1: FullyCoupled | linsolver = i1
      i1: Iterative "Suggested Iterative Solver (emw)" | itrestart = 300; prefuntype = right
        mg1: Multigrid | iter = 1
  sol2 "Parametric Solutions 1" (study std1)

Datasets
  dset1: Solution | solution = sol1; phase = 30
  cpt1: CutPoint3D | data = dset1; pointx = 0; pointy = 0; pointz = 0
  dset2: Solution | solution = sol2

Derived values
  gev1: EvalGlobal "S-Parameter (emw)" | data = dset1; table = tbl1; expr = emw.S11dB
  gev2: EvalGlobal "Lumped Port Impedance"
    data = dset1
    table = tbl2
    expr = emw.Zport_1
    unit = Ω
    descr = Lumped port impedance
  gev3: EvalGlobal "Lumped Port Voltage"
    data = dset2
    table = tbl3
    expr = abs(emw.Vport_1)
    unit = V
    descr = Lumped port voltage

Tables
  rp1: Table "Directivity"
    // Radiation pattern
    θ (deg) | φ (deg) | Directivity | Directivity (dB)
    90 | 160 | 1.60808 | 2.06309
  tbl2: Table "Table 2: Lumped port impedance"
    // Global Evaluation 2 (emw.Zport_1)
    freq (GHz) | Lumped port impedance (Ω)
    0.0749481 | 120.209+28.4884i
  tbl3: Table
    // Lumped Port Voltage (emw.Vport_1)
    gap_size (m) | freq (GHz) | Lumped port voltage (V)
    0.001 | 0.083 | 0.444783
    0.002 | 0.083 | 0.445906
    0.003 | 0.083 | 0.446739
    0.004 | 0.083 | 0.447395
    0.005 | 0.083 | 0.448038
    0.006 | 0.083 | 0.44866
    0.007 | 0.083 | 0.449107
    0.008 | 0.083 | 0.449524
    0.009 | 0.083 | 0.450124
    0.01 | 0.083 | 0.450493
  rp2: Table "Directivity 1"
    // Radiation pattern
    θ (deg) | φ (deg) | Directivity | Directivity (dB)
    90 | 48 | 1.62784 | 2.11612

Plots
  pg1: PlotGroup3D "Electric Field (emw)" | data = dset1
    mslc1: Multislice | expr = emw.normE; descr = Electric field norm; xnumber = 0; znumber = 0
      sel1: Selection
    arwv1: ArrowVolume
      expr = {emw.Ex, emw.Ey, emw.Ez}
      xnumber = 21
      ynumber = 1
      znumber = 21
      arrowlength = logarithmic
      sel1: Selection
  pg2: PolarGroup "2D Far Field (emw)" | data = dset1
    rp1: RadiationPattern | expr = emw.normEfar; phidisc = 180
  pg3: PlotGroup3D "3D Far Field (emw)" | data = dset1
    rp1: RadiationPattern | expr = emw.normEfar; thetadisc = 45; phidisc = 45; directivity = on; table = rp1
  pg4: PlotGroup3D "3D Plot Group 4: Isosurface" | data = dset1
    iso1: Isosurface
      expr = 20*log10(emw.normE)
      isoexprmin = -4.03650100243
      isoexprmax = 44.9218310871
      actuallevels = {-2.40455659945, 0.859332206522, 4.12322101249, 7.38710981846, 10.6509986244, 13.9148874304, 17.1787762364, 20.4426650423, 23.7065538482918, 26.9704426543, 30.2343314602, 33.4982202662, 36.7621090722, 40.0259978781, 43.2898866841}
      actuallevelslegend = 
        {-2.40455659945, 0.859332206522, 4.12322101249, 7.38710981846, 10.6509986244, 13.9148874304, 17.1787762364, 20.4426650423, 23.7065538482918, 26.9704426543, 30.2343314602, 33.4982202662, 36.7621090722, 40.0259978781, 43.2898866841}
        {-2.40455659945, 0.859332206522, 4.12322101249, 7.38710981846, 10.6509986244, 13.9148874304, 17.1787762364, 20.4426650423, 23.7065538482918, 26.9704426543, 30.2343314602, 33.4982202662, 36.7621090722, 40.0259978781, 43.2898866841}
      filt1: Filter | expr = y>0
      sel1: Selection
  pg6: PlotGroup1D "1D Plot Group 6: cut point E field sweep" | data = cpt1
    ptgr1: PointGraph | data = cpt1; expr = emw.normE
  pg7: PlotGroup1D "1D Plot Group 7" | data = none
    tblp1: Table "Table Graph 1" | table = tbl3
  pg8: PlotGroup3D "Electric Field (emw) 1" | data = dset2
    mslc1: Multislice | expr = emw.normE
  pg9: PolarGroup "2D Far Field (emw) 1" | data = dset2
    rp1: RadiationPattern | expr = emw.normEfar; phidisc = 180
  pg10: PlotGroup3D "3D Far Field (emw) 1" | data = dset2
    rp1: RadiationPattern | expr = emw.normEfar; thetadisc = 45; phidisc = 45; directivity = on; table = rp2

Exports
  tbl1: Table
    table = tbl3
    filename = C:\Users\phys-simulation\Desktop\Joseph\comsol\Data\dipole_freespace_LPV_planewave_short.txt