// COMSOL Multiphysics 5.6.0.401 model "dipoleMoveInBox_1.10.23.mph"
// Dipole Antenna
// modeldescr_rf/dipole_antenna
// The dipole antenna is one of the most straightforward antenna configurations. It can be realized with two thin metallic rods that have a sinusoidal voltage difference applied between them. The length of the rods is chosen such that they are quarter wavelength elements at the operating frequency. Such an antenna has a well-known torus-like radiation pattern.
// Outline of the model tree

Parameters
  lda0 = 4[m]  // Operating wavelength
  arm_length = .65  // Dipole antenna arm length
  r_antenna = arm_length/20  // Dipole antenna arm radius
  gap_size = arm_length/100  // Gap between arms
  boxX = .7[m]
  boxY = 0[m]
  boxZ = .9[m]
  boxTheta = 0
  boxPhi = 0

Selections
  sel1: Explicit "Antenna" on boundaries 6-10, 15-19
  sel2: Explicit "Lumped port" on boundaries 11-14
  sel3: Explicit on boundaries 11-14

Coordinate systems
  pml1: PML "Perfectly Matched Layer 1" on no domains | ScalingType = Spherical

Geometry
  geom1 "Geometry 1" (3D, length unit m)
    cyl1: Cylinder
      pos = {-(arm_length+gap_size/2), 0, 0}
      axistype = x
      layername = Layer 1
      layer = arm_length
      layerside = off
      layerbottom = on
      layertop = on
      r = r_antenna
      h = 2*arm_length+gap_size
    blk1: Block | pos = {boxX, boxY, boxZ}; base = center; size = {3.0697, 2.4566, 3.6840}
    dif1: Difference | input = blk1; input2 = cyl1
    rot1: Rotate | input = dif1; rot = boxTheta
    rot2: Rotate | input = rot1; axistype = y; rot = boxPhi
    fin: Finalize "Form Union"

Materials
  mat1: Common "Air" on all domains
    def "Basic"
      thermalexpansioncoefficient = alpha_p(pA,T)
      molarmass = 0.02897[kg/mol]
      bulkviscosity = muB(T)
      relpermeability = 1
      relpermittivity = 1
      dynamicviscosity = eta(T)
      ratioofspecificheat = 1.4
      electricconductivity = 0[S/m]
      heatcapacity = Cp(T)
      density = rho(pA,T)
      thermalconductivity = k(T)
      soundspeed = cs(T)
      eta: Piecewise | arg = T; pieces = {200.0, 1600.0, -8.38278E-7+8.35717342E-8*T^1-7.69429583E-11*T^2+4.6437266E-14*T^3-1.06585607E-17*T^4}; argunit = K; fununit = Pa*s
      Cp: Piecewise | arg = T; pieces = {200.0, 1600.0, 1047.63657-0.372589265*T^1+9.45304214E-4*T^2-6.02409443E-7*T^3+1.2858961E-10*T^4}; argunit = K; fununit = J/(kg*K)
      rho: Analytic | expr = pA*0.02897/R_const[K*mol/J]/T; args = {pA, T}; argunit = Pa,K; fununit = kg/m^3
      k: Piecewise | arg = T; pieces = {200.0, 1600.0, -0.00227583562+1.15480022E-4*T^1-7.90252856E-8*T^2+4.11702505E-11*T^3-7.43864331E-15*T^4}; argunit = K; fununit = W/(m*K)
      cs: Analytic | expr = sqrt(1.4*R_const[K*mol/J]/0.02897*T); args = T; argunit = K; fununit = m/s
      an1: Analytic | funcname = alpha_p; expr = -1/rho(pA,T)*d(rho(pA,T),T); args = {pA, T}; argunit = Pa,K; fununit = 1/K
      an2: Analytic "Analytic 2a" | funcname = muB; expr = 0.6*eta(T); args = T; argunit = K; fununit = Pa*s
    RefractiveIndex
      n = 1
      ki = 0
    NonlinearModel
      BA = (def.gamma+1)/2
    idealGas
      Rs = R_const/Mn
      heatcapacity = Cp(T)
      ratioofspecificheat = 1.4
      molarmass = 0.02897
      Cp: Piecewise | arg = T; pieces = {200.0, 1600.0, 1047.63657-0.372589265*T^1+9.45304214E-4*T^2-6.02409443E-7*T^3+1.2858961E-10*T^4}; argunit = K; fununit = J/(kg*K)
  mat3: Common "Aluminum" on boundaries 6-19
    def "Basic"
      relpermeability = 1
      heatcapacity = 900[J/(kg*K)]
      thermalconductivity = 238[W/(m*K)]
      electricconductivity = 3.774e7[S/m]
      relpermittivity = 1
      thermalexpansioncoefficient = 23e-6[1/K]
      density = 2700[kg/m^3]
    Enu "Young's modulus and Poisson's ratio"
      youngsmodulus = 70e9[Pa]
      poissonsratio = 0.33
    Murnaghan
      l = -2.5e11[Pa]
      m = -3.3e11[Pa]
      n = -3.5e11[Pa]
    Lame "Lamé parameters"
      lambLame = 5.1e10[Pa]
      muLame = 2.6e10[Pa]
  mat4: Common "Structural steel" on boundaries 1-5, 20
    def "Basic"
      relpermeability = 1000
      heatcapacity = 475[J/(kg*K)]
      thermalconductivity = 44.5[W/(m*K)]
      electricconductivity = 5.9e6[S/m]
      relpermittivity = 1000
      thermalexpansioncoefficient = 12.3e-6[1/K]
      density = 7850[kg/m^3]
    Enu "Young's modulus and Poisson's ratio"
      youngsmodulus = 200e9[Pa]
      poissonsratio = 0.30
    Murnaghan
      l = -3.0e11[Pa]
      m = -6.2e11[Pa]
      n = -7.2e11[Pa]
    Lame "Lamé parameters"
      lambLame = 1.15e11[Pa]
      muLame = 7.69e10[Pa]

Physics
  emw: ElectromagneticWaves "Electromagnetic Waves, Frequency Domain" on all domains
    dependent variable E = {Ex, Ey, Ez}
    wee1: WaveEquationElectric (default)
    pec1: PerfectElectricConductor (default)
    init1: init "Initial Values 1" (default) | E = {1, 1, 1}
    imp1: Impedance "Impedance Boundary Condition 1" on selection sel1
    lport1: LumpedPort on boundaries 11-14
      PortType = UserDefined
      PortExcitation = off
      hPort = gap_size
      wPort = 2*pi*r_antenna
      ahPort = {1, 0, 0}
    ffd1: FarFieldDomain (disabled) on domains 1
      ffc1: FarFieldCalculation on no boundaries
    imp2: Impedance "wall drive" on boundaries 1-5, 20 | Es = {1, 1, 1}

Mesh
  mesh1 "Mesh 1" (physics-controlled)

Studies
  std1 "Study 1"
    param: Parametric "Parametric Sweep"
      pname = {boxX, boxY, boxZ, boxTheta, boxPhi}
      plistarr = {"-.15,-.15,-.15,-.15,-.15,-.15,.3,.3,.3,.3,.3,.3,.65,.65,.65,.65,.65,.65", "-.2, -.2,-.2,.35,.35,.35,-.2, -.2,-.2,.35,.35,.35,-.2, -.2,-.2,.35,.35,.35", ".1, .7, 1.1,.1, .7, 1.1,.1, .7, 1.1,.1, .7, 1.1,.1, .7, 1.1,.1, .7, 1.1", "80, 50, 5, 150, 120, 78, 23, 27, 135, 22, 42, 54, 168, 78, 138, 81, 151, 74", "50, 26, 88, 64, 30, 43, 30, 85, 21, 29, 82, 80, 88, 32, 6, 64, 48, 88"}
      punit = {m, m, m, , }
      keepsol = all
    freq: Frequency "Frequency Domain"
      punit = MHz
      plist = range(50,0.501002004008,300)
      storesel = {sel3}
      awe = on
      awefunc = abs(comp1.emw.Vport_1)

Solver configurations
  sol1 "Solution 1" (study std1)
    v1: Variables "Dependent Variables 1"
    aw1: AWE "AWE Solver 1" | pname = freq; plist = range(50,0.501002004008,300); awefunc = abs(comp1.emw.Vport_1)
      i1: Iterative "Suggested Iterative Solver (emw)" | itrestart = 300; prefuntype = right
        mg1: Multigrid | iter = 1
  sol2 "Parametric Solutions 1" (study std1)

Datasets
  dset1: Solution | solution = sol1
  dset2: Solution | solution = sol2
  cpt1: CutPoint3D "Cut Point near field"
    data = dset2
    method = file
    filename = /drBigBoy/darkRadio/comsolSimulations/dipoleMoveInBox_AfCalc_6.27.22/comsol/cutPoints_dx.1_dtheta90deg_r-.4.txt
  cpt2: CutPoint3D "Cut Point all"
    data = dset2
    method = regulargrid
    regulargridx = 2
    regulargridy = 2
    regulargridz = 2

Derived values
  pev2: EvalPoint "avg E near"
    data = cpt1
    table = tbl1
    hasouter = on
    expr = {abs(emw.Ex), abs(emw.Ey), abs(emw.Ez), abs(emw.normE)}
    unit = {V/m, V/m, V/m, V/m}
    summethod = average
  pev6: EvalPoint "avg E all"
    data = cpt2
    table = tbl2
    hasouter = on
    expr = {abs(emw.Ex), abs(emw.Ey), abs(emw.Ez), abs(emw.normE)}
    unit = {V/m, V/m, V/m, V/m}
    summethod = average
  gev3: EvalGlobal "port voltage" | data = dset2; table = tbl3; hasouter = on; expr = abs(emw.Vport_1); unit = V
  pev3: EvalPoint "AF (E near/V)"
    data = cpt1
    table = tbl4
    hasouter = on
    expr = {20*log10(abs(emw.Ex/emw.Vport_1)), 20*log10(abs(emw.normE/emw.Vport_1))}
    summethod = average
  pev4: EvalPoint "AF (E all/V)"
    data = cpt2
    table = tbl5
    hasouter = on
    expr = {20*log10(abs(emw.Ex/emw.Vport_1)), 20*log10(abs(emw.normE/emw.Vport_1))}
    summethod = average
  gev4: EvalGlobal "AF 1/V" | data = dset2; table = tbl3; hasouter = on; expr = 20*log10(1/abs(emw.Vport_1))

Tables
  tbl4: Table
    // AF (E near/V)
    filename = /drBigBoy/darkRadio/comsolSimulations/dipoleMoveInBox_AfCalc_1.10.32/data/tempFolder/AF_E_near.txt
    boxX (m) | boxY (m) | boxZ (m) | freq (MHz) | Point average: 20*log10(abs(emw.Ex/emw.Vport_1)) | Point average: 20*log10(abs(emw.normE/emw.Vport_1))
    -0.15 | 0.35 | 0 | 80 | 8.42708 | 25.6697
    -0.15 | 0.35 | 0 | 83.1579 | 7.44909 | 18.85
    -0.15 | 0.35 | 0 | 86.3158 | 6.24303 | 16.0483
    -0.15 | 0.35 | 0 | 89.4737 | 5.20527 | 14.8164
    -0.15 | 0.35 | 0 | 92.6316 | 4.44426 | 13.4296
    -0.15 | 0.35 | 0 | 95.7895 | 3.36361 | 12.3341
    -0.15 | 0.35 | 0 | 98.9474 | 2.62797 | 11.7569
    -0.15 | 0.35 | 0 | 102.105 | 1.89401 | 11.3395
    -0.15 | 0.35 | 0 | 105.263 | 1.39399 | 11.2264
    -0.15 | 0.35 | 0 | 108.421 | 1.22275 | 11.9067
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  tbl5: Table
    // AF (E all/V)
    filename = /drBigBoy/darkRadio/comsolSimulations/dipoleMoveInBox_AfCalc_1.10.32/data/tempFolder/AF_E_all.txt
    boxX (m) | boxY (m) | boxZ (m) | freq (MHz) | Point average: 20*log10(abs(emw.Ex/emw.Vport_1)) | Point average: 20*log10(abs(emw.normE/emw.Vport_1))
    -0.15 | 0.35 | 0 | 80 | -3.46844 | 17.6888
    -0.15 | 0.35 | 0 | 83.1579 | -4.29979 | 9.44302
    -0.15 | 0.35 | 0 | 86.3158 | -2.40047 | 6.58218
    -0.15 | 0.35 | 0 | 89.4737 | -1.71354 | 6.20771
    -0.15 | 0.35 | 0 | 92.6316 | -3.78513 | 2.97474
    -0.15 | 0.35 | 0 | 95.7895 | -4.21845 | 1.45882
    -0.15 | 0.35 | 0 | 98.9474 | -4.55245 | 0.52077
    -0.15 | 0.35 | 0 | 102.105 | -5.31855 | 0.22465
    -0.15 | 0.35 | 0 | 105.263 | -5.49158 | 1.09522
    -0.15 | 0.35 | 0 | 108.421 | -3.5656 | 3.13928
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  tbl6: Table
    // AF (1/V)
    filename = /drBigBoy/darkRadio/comsolSimulations/dipoleMoveInBox_AfCalc_1.10.32/data/tempFolder/AF_Vn1.txt
    boxX (m) | boxY (m) | boxZ (m) | freq (MHz)
    -0.15 | 0.35 | 0 | 60
    -0.15 | 0.35 | 0.7 | 60
    -0.15 | 0 | 0 | 60
    -0.15 | 0 | 0.7 | 60
    0 | 0.35 | 0 | 60
    0 | 0.35 | 0.7 | 60
    0 | 0 | 0 | 60
    0 | 0 | 0.7 | 60

Plots
  pg14: PlotGroup3D "Electric Field (emw)" | data = dset2
    mslc1: Multislice | expr = emw.normE