// COMSOL Multiphysics 5.6.0.401 model "dipoleFreeSpace_6.28.22.mph"
// Dipole Antenna
// modeldescr_rf/dipole_antenna
// The dipole antenna is one of the most straightforward antenna configurations. It can be realized with two thin metallic rods that have a sinusoidal voltage difference applied between them. The length of the rods is chosen such that they are quarter wavelength elements at the operating frequency. Such an antenna has a well-known torus-like radiation pattern.
// Outline of the model tree

Parameters
  lda0 = 4[m]  // Operating wavelength
  arm_length = .65  // Dipole antenna arm length
  r_antenna = arm_length/20  // Dipole antenna arm radius
  gap_size = arm_length/100  // Gap between arms

Selections
  sel1: Explicit "Antenna" on boundaries 13-15, 18-20, 28, 30, 39, 41

Coordinate systems
  pml1: PML "Perfectly Matched Layer 1" on domains 1-4, 6-9 | ScalingType = Spherical

Geometry
  geom1 "Geometry 1" (3D, length unit m)
    sph1: Sphere | layername = Layer 1; layer = 0.5*arm_length; r = 2.4*arm_length
    cyl1: Cylinder
      pos = {0, 0, -(arm_length+gap_size/2)}
      layername = Layer 1
      layer = arm_length
      layerside = off
      layerbottom = on
      layertop = on
      r = r_antenna
      h = 2*arm_length+gap_size
    dif1: Difference | input = sph1; input2 = cyl1
    fin: Finalize "Form Union"

Materials
  mat1: Common "Air" on all domains
    def "Basic"
      thermalexpansioncoefficient = alpha_p(pA,T)
      molarmass = 0.02897[kg/mol]
      bulkviscosity = muB(T)
      relpermeability = 1
      relpermittivity = 1
      dynamicviscosity = eta(T)
      ratioofspecificheat = 1.4
      electricconductivity = 0[S/m]
      heatcapacity = Cp(T)
      density = rho(pA,T)
      thermalconductivity = k(T)
      soundspeed = cs(T)
      eta: Piecewise | arg = T; pieces = {200.0, 1600.0, -8.38278E-7+8.35717342E-8*T^1-7.69429583E-11*T^2+4.6437266E-14*T^3-1.06585607E-17*T^4}; argunit = K; fununit = Pa*s
      Cp: Piecewise | arg = T; pieces = {200.0, 1600.0, 1047.63657-0.372589265*T^1+9.45304214E-4*T^2-6.02409443E-7*T^3+1.2858961E-10*T^4}; argunit = K; fununit = J/(kg*K)
      rho: Analytic | expr = pA*0.02897/R_const[K*mol/J]/T; args = {pA, T}; argunit = Pa,K; fununit = kg/m^3
      k: Piecewise | arg = T; pieces = {200.0, 1600.0, -0.00227583562+1.15480022E-4*T^1-7.90252856E-8*T^2+4.11702505E-11*T^3-7.43864331E-15*T^4}; argunit = K; fununit = W/(m*K)
      cs: Analytic | expr = sqrt(1.4*R_const[K*mol/J]/0.02897*T); args = T; argunit = K; fununit = m/s
      an1: Analytic | funcname = alpha_p; expr = -1/rho(pA,T)*d(rho(pA,T),T); args = {pA, T}; argunit = Pa,K; fununit = 1/K
      an2: Analytic "Analytic 2a" | funcname = muB; expr = 0.6*eta(T); args = T; argunit = K; fununit = Pa*s
    RefractiveIndex
      n = 1
      ki = 0
    NonlinearModel
      BA = (def.gamma+1)/2
    idealGas
      Rs = R_const/Mn
      heatcapacity = Cp(T)
      ratioofspecificheat = 1.4
      molarmass = 0.02897
      Cp: Piecewise | arg = T; pieces = {200.0, 1600.0, 1047.63657-0.372589265*T^1+9.45304214E-4*T^2-6.02409443E-7*T^3+1.2858961E-10*T^4}; argunit = K; fununit = J/(kg*K)
  mat2: Common "Copper" on selection sel1
    def "Basic"
      relpermeability = 1
      electricconductivity = 5.998e7[S/m]
      thermalexpansioncoefficient = 17e-6[1/K]
      heatcapacity = 385[J/(kg*K)]
      relpermittivity = 1
      density = 8960[kg/m^3]
      thermalconductivity = 400[W/(m*K)]
    Enu "Young's modulus and Poisson's ratio"
      youngsmodulus = 110e9[Pa]
      poissonsratio = 0.35
    linzRes "Linearized resistivity"
      rho0 = 1.72e-8[ohm*m]
      alpha = 0.0039[1/K]
      Tref = 298[K]

Physics
  emw: ElectromagneticWaves "Electromagnetic Waves, Frequency Domain" on all domains
    dependent variable E = {Ex, Ey, Ez}
    BackgroundField.SolveFor = scatteredField
    BackgroundField.WaveType = LinearPolByAngle
    wee1: WaveEquationElectric (default)
    pec1: PerfectElectricConductor (default)
    init1: init "Initial Values 1" (default)
    imp1: Impedance "Impedance Boundary Condition 1" on selection sel1
    lport1: LumpedPort on boundaries 16, 17, 29, 40
      PortType = UserDefined
      PortExcitation = off
      Zref = 180[ohm]
      hPort = gap_size
      wPort = 2*pi*r_antenna
      ahPort = {0, 0, 1}
    ffd1: FarFieldDomain on domains 5
      ffc1: FarFieldCalculation on boundaries 9-12, 26, 27, 34, 37

Mesh
  mesh1 "Mesh 1" (physics-controlled)

Studies
  std1 "Study 1"
    freq: Frequency "Frequency Domain" | punit = MHz; plist = range(30,2.72727272727,300)

Solver configurations
  sol1 "Solution 1" (study std1)
    v1: Variables "Dependent Variables 1"
    s1: Stationary "Stationary Solver 1" | stol = 0.01
      p1: Parametric | pname = freq; plistarr = range(30,2.72727272727,300); punit = MHz; pcontinuationmode = no
      fc1: FullyCoupled | linsolver = i1
      i1: Iterative "Suggested Iterative Solver (emw)" | itrestart = 300; prefuntype = right
        mg1: Multigrid | iter = 1

Datasets
  dset1: Solution | solution = sol1

Derived values
  gev1: EvalGlobal "S-parameter (emw)" | data = dset1; table = tbl1; expr = emw.S11dB
  gev2: EvalGlobal "Global Evaluation 2"
    data = dset1
    table = tbl2
    expr = emw.Zport_1
    unit = Ω
    descr = Lumped port impedance
  gev3: EvalGlobal "AF" | data = dset1; table = tbl3; expr = 20*log10(1/abs(emw.Vport_1))

Tables
  tbl1: Table
    freq (GHz) | S11 (1)
    0.0749481 | -7.14153
  rp1: Table "Beam width"
    // Radiation pattern
    freq (GHz) | Beam width (deg) | Null-to-null beam width (deg)
    0.074948 | 75.4758 | 180
  rp2: Table "Directivity"
    // Radiation pattern
    θ (deg) | φ (deg) | Directivity | Directivity (dB)
    90 | 104 | 1.68185 | 2.25788
  tbl2: Table
    // Global Evaluation 2
    freq (GHz) | Lumped port impedance (Ω)
    0.0749481 | 119.791+29.4069i
  tbl3: Table
    // AF
    freq (MHz) | 20*log10(1/abs(emw.Vport_1))
    30 | 14.2379
    32.7273 | 13.4458
    35.4545 | 12.7111
    38.1818 | 12.0177
    40.9091 | 11.3593
    43.6364 | 10.7315
    46.3636 | 10.1312
    49.0909 | 9.55656
    51.8182 | 9.00671
    54.5455 | 8.48126
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
Plots
  pg1: PlotGroup3D "Electric Field (emw)" on domains 5 | data = dset1
    mslc1: Multislice | expr = emw.normE; xnumber = 0; znumber = 0
    arwv1: ArrowVolume
      expr = {emw.Ex, emw.Ey, emw.Ez}
      xnumber = 21
      ynumber = 1
      znumber = 21
      arrowlength = logarithmic
    slc1: Slice | expr = 20*log10(emw.normH); quickplane = xy; quickznumber = 1
      tran1: Transparency | transparency = 0.25
  pg2: PolarGroup "2D Far Field (emw)" | data = dset1; rmin = -20; rmax = 0
    rp1: RadiationPattern | expr = emw.normdBEfar; phidisc = 180; legends = H-plane
    rp2: RadiationPattern
      expr = emw.normdBEfar
      phidisc = 180
      beamwidth = on
      leveldown = 3
      normal = {0, 1, 0}
      table = rp1
      legends = E-plane
  pg3: PlotGroup3D "3D Far Field (emw)" | data = dset1
    rp1: RadiationPattern
      expr = emw.normEfar
      thetadisc = 45
      phidisc = 45
      directivity = on
      directivityexpr = emw.normEfar^2
      table = rp2
  pg4: PlotGroup3D "3D Plot Group 4" | data = dset1
    iso1: Isosurface | expr = 20*log10(emw.normE)
      filt1: Filter | expr = y>0
      sel1: Selection on domains 5
  pg5: PlotGroup1D "1D Plot Group 5" | data = none
    tblp1: Table "Table Graph 1" | table = tbl3