// COMSOL Multiphysics 5.6.0.401 model "dipoleMoveInBox_6.28.22.mph"
// Dipole Antenna
// modeldescr_rf/dipole_antenna
// The dipole antenna is one of the most straightforward antenna configurations. It can be realized with two thin metallic rods that have a sinusoidal voltage difference applied between them. The length of the rods is chosen such that they are quarter wavelength elements at the operating frequency. Such an antenna has a well-known torus-like radiation pattern.
// Outline of the model tree

Parameters
  lda0 = 4[m]  // Operating wavelength
  arm_length = .65  // Dipole antenna arm length
  r_antenna = arm_length/20  // Dipole antenna arm radius
  gap_size = arm_length/100  // Gap between arms
  boxX = .7[m]
  boxY = 0[m]
  boxZ = .9[m]

Selections
  sel1: Explicit "Antenna" on boundaries 6-10, 15-19
  sel2: Explicit "Lumped port" on boundaries 11-14
  sel3: Explicit on boundaries 11-14

Coordinate systems
  pml1: PML "Perfectly Matched Layer 1" on no domains | ScalingType = Spherical

Geometry
  geom1 "Geometry 1" (3D, length unit m)
    cyl1: Cylinder
      pos = {-(arm_length+gap_size/2), 0, 0}
      axistype = x
      layername = Layer 1
      layer = arm_length
      layerside = off
      layerbottom = on
      layertop = on
      r = r_antenna
      h = 2*arm_length+gap_size
    blk1: Block | pos = {boxX, boxY, boxZ}; base = center; size = {3.0697, 2.4566, 3.6840}
    dif1: Difference | input = blk1; input2 = cyl1
    fin: Finalize "Form Union"

Materials
  mat1: Common "Air" on all domains
    def "Basic"
      thermalexpansioncoefficient = alpha_p(pA,T)
      molarmass = 0.02897[kg/mol]
      bulkviscosity = muB(T)
      relpermeability = 1
      relpermittivity = 1
      dynamicviscosity = eta(T)
      ratioofspecificheat = 1.4
      electricconductivity = 0[S/m]
      heatcapacity = Cp(T)
      density = rho(pA,T)
      thermalconductivity = k(T)
      soundspeed = cs(T)
      eta: Piecewise | arg = T; pieces = {200.0, 1600.0, -8.38278E-7+8.35717342E-8*T^1-7.69429583E-11*T^2+4.6437266E-14*T^3-1.06585607E-17*T^4}; argunit = K; fununit = Pa*s
      Cp: Piecewise | arg = T; pieces = {200.0, 1600.0, 1047.63657-0.372589265*T^1+9.45304214E-4*T^2-6.02409443E-7*T^3+1.2858961E-10*T^4}; argunit = K; fununit = J/(kg*K)
      rho: Analytic | expr = pA*0.02897/R_const[K*mol/J]/T; args = {pA, T}; argunit = Pa,K; fununit = kg/m^3
      k: Piecewise | arg = T; pieces = {200.0, 1600.0, -0.00227583562+1.15480022E-4*T^1-7.90252856E-8*T^2+4.11702505E-11*T^3-7.43864331E-15*T^4}; argunit = K; fununit = W/(m*K)
      cs: Analytic | expr = sqrt(1.4*R_const[K*mol/J]/0.02897*T); args = T; argunit = K; fununit = m/s
      an1: Analytic | funcname = alpha_p; expr = -1/rho(pA,T)*d(rho(pA,T),T); args = {pA, T}; argunit = Pa,K; fununit = 1/K
      an2: Analytic "Analytic 2a" | funcname = muB; expr = 0.6*eta(T); args = T; argunit = K; fununit = Pa*s
    RefractiveIndex
      n = 1
      ki = 0
    NonlinearModel
      BA = (def.gamma+1)/2
    idealGas
      Rs = R_const/Mn
      heatcapacity = Cp(T)
      ratioofspecificheat = 1.4
      molarmass = 0.02897
      Cp: Piecewise | arg = T; pieces = {200.0, 1600.0, 1047.63657-0.372589265*T^1+9.45304214E-4*T^2-6.02409443E-7*T^3+1.2858961E-10*T^4}; argunit = K; fununit = J/(kg*K)
  mat3: Common "Aluminum" on boundaries 6-19
    def "Basic"
      relpermeability = 1
      heatcapacity = 900[J/(kg*K)]
      thermalconductivity = 238[W/(m*K)]
      electricconductivity = 3.774e7[S/m]
      relpermittivity = 1
      thermalexpansioncoefficient = 23e-6[1/K]
      density = 2700[kg/m^3]
    Enu "Young's modulus and Poisson's ratio"
      youngsmodulus = 70e9[Pa]
      poissonsratio = 0.33
    Murnaghan
      l = -2.5e11[Pa]
      m = -3.3e11[Pa]
      n = -3.5e11[Pa]
    Lame "Lamé parameters"
      lambLame = 5.1e10[Pa]
      muLame = 2.6e10[Pa]
  mat4: Common "Structural steel" on boundaries 1-5, 20
    def "Basic"
      relpermeability = 1
      heatcapacity = 475[J/(kg*K)]
      thermalconductivity = 44.5[W/(m*K)]
      electricconductivity = 5.9e6[S/m]
      relpermittivity = 1000
      thermalexpansioncoefficient = 12.3e-6[1/K]
      density = 7850[kg/m^3]
    Enu "Young's modulus and Poisson's ratio"
      youngsmodulus = 200e9[Pa]
      poissonsratio = 0.30
    Murnaghan
      l = -3.0e11[Pa]
      m = -6.2e11[Pa]
      n = -7.2e11[Pa]
    Lame "Lamé parameters"
      lambLame = 1.15e11[Pa]
      muLame = 7.69e10[Pa]

Physics
  emw: ElectromagneticWaves "Electromagnetic Waves, Frequency Domain" on all domains
    dependent variable E = {Ex, Ey, Ez}
    wee1: WaveEquationElectric (default)
    pec1: PerfectElectricConductor (default)
    init1: init "Initial Values 1" (default) | E = {1, 1, 1}
    imp1: Impedance "Impedance Boundary Condition 1" on selection sel1
    lport1: LumpedPort on boundaries 11-14
      PortType = UserDefined
      PortExcitation = off
      hPort = gap_size
      wPort = 2*pi*r_antenna
      ahPort = {1, 0, 0}
    ffd1: FarFieldDomain (disabled) on domains 1
      ffc1: FarFieldCalculation on no boundaries
    imp2: Impedance "wall drive" on boundaries 1-5, 20 | Es = {1, 1, 1}

Mesh
  mesh1 "Mesh 1" (physics-controlled)

Studies
  std1 "Study 1"
    param: Parametric "Parametric Sweep" (disabled)
      sweeptype = filled
      pname = {boxX, boxY, boxZ}
      plistarr = {"- .15, .3, .65", "-.2, .35", ".1, .7, 1.1"}
      punit = {m, m, m}
    freq: Frequency "Frequency Domain"
      punit = MHz
      plist = range(50,0.25025025025,300)
      usestoresel = selection
      storesel = {sel3}
      awe = on
      awefunc = abs(emw.Vport1)

Solver configurations
  sol1 "Solution 1" (study std1)
    v1: Variables "Dependent Variables 1"
    aw1: AWE "AWE Solver 1" | pname = freq; plist = range(50,0.25025025025,300); awefunc = abs(emw.Vport1)
      i1: Iterative "Suggested Iterative Solver (emw)" | itrestart = 300; prefuntype = right
        mg1: Multigrid | iter = 1
  sol2 "Parametric Solutions 1" (study std1)
  sol11 "Parametric Solutions 2" (study std1)

Datasets
  dset1: Solution | solution = sol1
  cpt1: CutPoint3D
    data = dset3
    method = file
    filename = /drBigBoy/darkRadio/comsolSimulations/dipoleMoveInBox_AfCalc_6.27.22/comsol/cutPoints_dx.1_dtheta90deg_r-.4.txt
  dset2: Solution | solution = sol2
  dset3: Solution | solution = sol11

Derived values
  pev2: EvalPoint "avg E vec"
    data = cpt1
    table = tbl4
    expr = {abs(emw.Ex), abs(emw.Ey), abs(emw.Ez), abs(emw.normE)}
    unit = {V/m, V/m, V/m, V/m}
    descr = {, "Electric field, y component", , }
  gev3: EvalGlobal "port voltage" | data = dset3; table = tbl5; expr = abs(emw.Vport_1); unit = V
  pev3: EvalPoint "AF"
    data = cpt1
    table = tbl6
    expr = {20*log10(abs(emw.Ex/emw.Vport_1)), 20*log10(abs(emw.normE/emw.Vport_1))}
    summethod = average

Tables
  rp1: Table "Beam width"
    // Radiation pattern
    freq (GHz) | Beam width (deg) | Null-to-null beam width (deg)
    0.074948 | 75.4758 | 180
  rp2: Table "Directivity"
    // Radiation pattern
    θ (deg) | φ (deg) | Directivity | Directivity (dB)
    90 | 104 | 1.68185 | 2.25788
  tbl2: Table
    // Global Evaluation 2
    freq (GHz) | Lumped port impedance (Ω)
    0.0749481 | 119.791+29.4069i
  tbl3: Table "E norm avg"
    // avgE
    boxX (m) | boxY (m) | boxZ (m) | freq (MHz) | Point average: abs(emw.normE) (V/m)
    -0.3 | 0.6 | 0 | 50 | 4.27195
    -0.3 | 0.6 | 0 | 60.4167 | 15.108
    -0.3 | 0.6 | 0 | 70.8333 | 69.4508
    -0.3 | 0.6 | 0 | 81.25 | 14.5135
    -0.3 | 0.6 | 0 | 91.6667 | 5.71089
    -0.3 | 0.6 | 0 | 102.083 | 6.30344
    -0.3 | 0.6 | 0 | 112.5 | 3.39717
    -0.3 | 0.6 | 0 | 122.917 | 5.28832
    -0.3 | 0.6 | 0 | 133.333 | 18.31
    -0.3 | 0.6 | 0 | 143.75 | 6.93226
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  tbl4: Table "E vec avg"
    // avg E vec
    boxX (m) | boxY (m) | boxZ (m) | freq (MHz) | Point average: abs(emw.Ex) (V/m) | Point average: Electric field, y component (V/m) | Point average: abs(emw.Ez) (V/m) | Point average: abs(emw.normE) (V/m)
    -0.15 | -0.2 | 0.1 | 50 | 1.98125 | 3.31923 | 2.06677 | 4.60193
    -0.15 | -0.2 | 0.1 | 50.8361 | 1.98125 | 3.31923 | 2.06677 | 4.60193
    -0.15 | -0.2 | 0.1 | 51.6722 | 1.98125 | 3.31923 | 2.06677 | 4.60193
    -0.15 | -0.2 | 0.1 | 52.5084 | 1.98125 | 3.31923 | 2.06677 | 4.60193
    -0.15 | -0.2 | 0.1 | 53.3445 | 1.98125 | 3.31923 | 2.06677 | 4.60193
    -0.15 | -0.2 | 0.1 | 54.1806 | 1.98125 | 3.31923 | 2.06677 | 4.60193
    -0.15 | -0.2 | 0.1 | 55.0167 | 1.98125 | 3.31923 | 2.06677 | 4.60193
    -0.15 | -0.2 | 0.1 | 55.8528 | 1.98125 | 3.31923 | 2.06677 | 4.60193
    -0.15 | -0.2 | 0.1 | 56.689 | 2.68208 | 5.41372 | 2.60979 | 6.84408
    -0.15 | -0.2 | 0.1 | 57.5251 | 2.68208 | 5.41372 | 2.60979 | 6.84408
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  tbl5: Table
    // Global Evaluation 3
    boxX (m) | boxY (m) | boxZ (m) | freq (MHz) | abs(emw.Vport_1) (V)
    -0.15 | -0.2 | 0.1 | 50 | 0.28043
    -0.15 | -0.2 | 0.1 | 50.8361 | 0.28043
    -0.15 | -0.2 | 0.1 | 51.6722 | 0.28043
    -0.15 | -0.2 | 0.1 | 52.5084 | 0.28043
    -0.15 | -0.2 | 0.1 | 53.3445 | 0.28043
    -0.15 | -0.2 | 0.1 | 54.1806 | 0.28043
    -0.15 | -0.2 | 0.1 | 55.0167 | 0.28043
    -0.15 | -0.2 | 0.1 | 55.8528 | 0.28043
    -0.15 | -0.2 | 0.1 | 56.689 | 0.447043
    -0.15 | -0.2 | 0.1 | 57.5251 | 0.447043
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  tbl6: Table
    // AF
    boxX (m) | boxY (m) | boxZ (m) | freq (MHz) | Point average: 20*log10(abs(emw.Ex/emw.Vport_1)) | Point average: 20*log10(abs(emw.normE/emw.Vport_1))
    -0.15 | -0.2 | 0.1 | 50 | 16.7094 | 24.0578
    -0.15 | -0.2 | 0.1 | 50.8361 | 16.7094 | 24.0578
    -0.15 | -0.2 | 0.1 | 51.6722 | 16.7094 | 24.0578
    -0.15 | -0.2 | 0.1 | 52.5084 | 16.7094 | 24.0578
    -0.15 | -0.2 | 0.1 | 53.3445 | 16.7094 | 24.0578
    -0.15 | -0.2 | 0.1 | 54.1806 | 16.7094 | 24.0578
    -0.15 | -0.2 | 0.1 | 55.0167 | 16.7094 | 24.0578
    -0.15 | -0.2 | 0.1 | 55.8528 | 16.7094 | 24.0578
    -0.15 | -0.2 | 0.1 | 56.689 | 15.2706 | 23.4563
    -0.15 | -0.2 | 0.1 | 57.5251 | 15.2706 | 23.4563
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
Plots
  pg1: PlotGroup3D "Electric Field (emw)" on domains 1 | data = dset1
    mslc1: Multislice | expr = emw.normE
    arwv1: ArrowVolume (disabled)
      expr = {emw.Ex, emw.Ey, emw.Ez}
      xnumber = 21
      ynumber = 1
      znumber = 21
      arrowlength = logarithmic
    slc1: Slice (disabled) | expr = 20*log10(emw.normH); quickplane = xy; quickznumber = 1
      tran1: Transparency | transparency = 0.25
  pg2: PolarGroup "2D Far Field (emw)" (disabled) | data = dset1; rmin = -20; rmax = 0
    rp1: RadiationPattern | expr = emw.normdBEfar; phidisc = 180; legends = H-plane
    rp2: RadiationPattern
      expr = emw.normdBEfar
      phidisc = 180
      beamwidth = on
      leveldown = 3
      normal = {0, 1, 0}
      table = rp1
      legends = E-plane
  pg3: PlotGroup3D "3D Far Field (emw)" (disabled) | data = dset1
    rp1: RadiationPattern
      expr = emw.normEfar
      thetadisc = 45
      phidisc = 45
      directivity = on
      directivityexpr = emw.normEfar^2
      table = rp2
  pg4: PlotGroup3D "3D Plot Group 4" (disabled) | data = dset1
    iso1: Isosurface | expr = 20*log10(emw.normE)
      filt1: Filter | expr = y>0
      sel1: Selection on domains 1
  pg5: PlotGroup1D "1D Plot Group 5" | data = none
    tblp1: Table "Table Graph 1" | table = tbl3
  pg6: PlotGroup1D "1D Plot Group 6" | data = none
    tblp1: Table "Table Graph 1" | table = tbl4
  pg7: PlotGroup1D "1D Plot Group 7" | data = none
    tblp1: Table "Table Graph 1" | table = tbl5
  pg8: PlotGroup1D "1D Plot Group 8" | data = none
    tblp1: Table "Table Graph 1" | table = tbl6
  pg9: PlotGroup3D "Electric Field (emw) 1" | data = dset2
    mslc1: Multislice | expr = emw.normE
  pg10: PlotGroup3D "Electric Field (emw) 2" | data = dset3
    mslc1: Multislice | expr = emw.normE