// COMSOL Multiphysics 5.6.0.401 model "dipoleDriveBox_2.3.22.mph"
// Outline of the model tree

Parameters
  Radius = .0025[m]
  portN = (3.6576/2 - .87) [m]
  portW = -(3.048/2 - .6) [m]
  portV = -(2.4384/2 - .57) [m]
  biconX = 0[m]
  biconY = .014[m]
  biconZ = 0[m]

Selections
  sel1: Explicit "Antenna Boundaries" on no boundaries
  sel2: Explicit "Feed Point" on no boundaries
  sel3: Explicit "features" on no boundaries
  sel4: Explicit "walls" on no boundaries
  sel5: Explicit "problem edges" on no edges
  sel6: Explicit "aluminun features" on no boundaries
  sel8: Explicit "braces" on no domains
  sel9: Explicit "steel" on boundaries 1-5
  sel10: Explicit "aluminum features" on no boundaries
  sel11: Explicit "for imp bound 1" on boundaries 6-10, 15-19

Geometry
  geom1 "Geometry 1" (3D, length unit m)
    imp3: Import (disabled)
      type = cad
      filename = C:\Users\phys-simulation\Desktop\DarkRadioSimulations\3D Models\Bicon Antenna\bicon_arm_no_trans_line.ipt
    mov1: Move (disabled) | input = imp3; displx = .044018772; disply = 0; displz = 0
    mir1: Mirror (disabled) | input = mov1; keep = on; axis = {1, 0, 0}
    cyl1: Cylinder (disabled) | pos = {-(0.004/2), 0, 0}; axistype = x; r = .0025; h = 0.004
    ext2: Extrude (disabled)
      extrudefrom = faces
      inputface = mir1(1) boundaries 1
      specify = vertices
      distance = 1
      vertex = cyl1(1) points 5
    ext3: Extrude (disabled)
      extrudefrom = faces
      inputface = mov1(1) boundaries 1
      specify = vertices
      distance = 1
      vertex = cyl1(1) points 6
    mov2: Move (disabled) | input = cyl1, ext2, ext3; displx = biconX; disply = biconY; displz = biconZ
    cyl2: Cylinder "Cylinder 2 (tickle dip)" | pos = {portW + .001/2, portV, portN}; axistype = x; r = .001; h = .15
    mir2: Mirror | input = cyl2; keep = on; pos = {portW, portV, portN}; axis = {1, 0, 0}
    cyl3: Cylinder | pos = {portW - .0005, portV, portN}; axistype = x; r = .001; h = .001
    blk1: Block | base = center; size = {3.048, 2.4384, 3.6576}
    dif1: Difference | input = blk1; input2 = cyl2, cyl3, mir2, mov2(1), mov2(2), mov2(3)
    fin: Finalize "Form Union"

Materials
  mat1: Common "Air" on all domains
    def "Basic"
      thermalexpansioncoefficient = alpha_p(pA,T)
      molarmass = 0.02897
      bulkviscosity = muB(T)
      relpermeability = 1
      relpermittivity = 1
      dynamicviscosity = eta(T)
      ratioofspecificheat = 1.4
      electricconductivity = 0[S/m]
      heatcapacity = Cp(T)
      density = rho(pA,T)
      thermalconductivity = k(T)
      soundspeed = cs(T)
      eta: Piecewise | arg = T; pieces = {200.0, 1600.0, -8.38278E-7+8.35717342E-8*T^1-7.69429583E-11*T^2+4.6437266E-14*T^3-1.06585607E-17*T^4}; argunit = K; fununit = Pa*s
      Cp: Piecewise | arg = T; pieces = {200.0, 1600.0, 1047.63657-0.372589265*T^1+9.45304214E-4*T^2-6.02409443E-7*T^3+1.2858961E-10*T^4}; argunit = K; fununit = J/(kg*K)
      rho: Analytic | expr = pA*0.02897/R_const[K*mol/J]/T; args = {pA, T}; dermethod = manual; argders = {{pA, d(pA*0.02897/R_const/T,pA)}, {T, d(pA*0.02897/R_const/T,T)}}; argunit = Pa,K; fununit = kg/m^3
      k: Piecewise | arg = T; pieces = {200.0, 1600.0, -0.00227583562+1.15480022E-4*T^1-7.90252856E-8*T^2+4.11702505E-11*T^3-7.43864331E-15*T^4}; argunit = K; fununit = W/(m*K)
      cs: Analytic | expr = sqrt(1.4*R_const[K*mol/J]/0.02897*T); args = T; dermethod = manual; argunit = K; fununit = m/s
      an1: Analytic | funcname = alpha_p; expr = -1/rho(pA,T)*d(rho(pA,T),T); args = {pA, T}; argunit = Pa,K; fununit = 1/K
      an2: Analytic "Analytic 2a" | funcname = muB; expr = 0.6*eta(T); args = T; argunit = K; fununit = Pa*s
    RefractiveIndex
      n = 1
      ki = 0
    NonlinearModel
      BA = (def.gamma+1)/2
  mat2: Common "Aluminum" on boundaries 6-10, 15-19
    def "Basic"
      relpermeability = 1
      heatcapacity = 900[J/(kg*K)]
      thermalconductivity = 238[W/(m*K)]
      electricconductivity = 3.56e7[S/m]
      relpermittivity = 1
      thermalexpansioncoefficient = 23e-6[1/K]
      density = 2700[kg/m^3]
    Enu "Young's modulus and Poisson's ratio"
      youngsmodulus = 70e9[Pa]
      poissonsratio = 0.33
    Murnaghan
      l = -2.5e11[Pa]
      m = -3.3e11[Pa]
      n = -3.5e11[Pa]
    Lame "Lamé parameters"
      lambLame = 5.1e10[Pa]
      muLame = 2.6e10[Pa]
  mat3: Common "Structural steel" on boundaries 1-5, 20
    def "Basic"
      relpermeability = 1
      heatcapacity = 475[J/(kg*K)]
      thermalconductivity = 44.5[W/(m*K)]
      electricconductivity = 5.9e6[S/m]
      relpermittivity = 1
      thermalexpansioncoefficient = 12.3e-6[1/K]
      density = 7850[kg/m^3]
    Enu "Young's modulus and Poisson's ratio"
      youngsmodulus = 200e9[Pa]
      poissonsratio = 0.30
    Murnaghan
      l = -3.0e11[Pa]
      m = -6.2e11[Pa]
      n = -7.2e11[Pa]
    Lame "Lamé parameters"
      lambLame = 1.15e11[Pa]
      muLame = 7.69e10[Pa]

Physics
  emw: ElectromagneticWaves "Electromagnetic Waves, Frequency Domain" on all domains
    dependent variable E = {Ex, Ey, Ez}
    BackgroundField.SolveFor = fullField
    BackgroundField.WaveType = LinearPolByAngle
    BackgroundField.anglePitch = pi/2
    MeshControl.SizeControlParameter = Frequency
    MeshControl.PhysicsControlledMeshMaximumFrequency = 300[MHz]
    wee1: WaveEquationElectric (default)
    pec1: PerfectElectricConductor (default)
    init1: init "Initial Values 1" (default)
    lport1: LumpedPort (disabled) on no boundaries
      PortType = UserDefined
      PortExcitation = off
      Zref = 180[ohm]
      hPort = 0.004
      wPort = 2*pi*Radius
      ahPort = {1, 0, 0}
    imp1: Impedance "Impedance Boundary Condition 1" on selection sel11
    imp2: Impedance "Impedance Boundary Condition 2" on boundaries 1-5, 20 | Es = {0, 0, 0}
    lport2: LumpedPort on boundaries 11-14
      PortType = UserDefined
      PortExcitation = on
      hPort = .001
      wPort = 2*pi*0.001
      ahPort = {1, 0, 0}
      SourceType = Power
      P0 = .001[W]

Mesh
  mesh1 "Mesh 1" (physics-controlled)

Studies
  std1 "Study 1"
    freq: Frequency "Frequency Domain" | punit = MHz; plist = range(30,0.5,300)

Solver configurations
  sol1 "Solution 1" (study std1)
    v1: Variables "Dependent Variables 1"
    s1: Stationary "Stationary Solver 1" | stol = 0.005
      p1: Parametric | pname = freq; plistarr = range(30,0.5,300); punit = MHz; pcontinuationmode = no
      fc1: FullyCoupled | linsolver = i1
      i1: Iterative "Suggested Iterative Solver (emw)" | itrestart = 300; prefuntype = right
        mg1: Multigrid | iter = 1

Datasets
  dset1: Solution | solution = sol1
  cpt1: CutPoint3D
    data = dset1
    method = regulargrid
    pointx = range(0,0.1,0.2)
    pointy = .4
    pointz = 0
    filename = /home/dradmin/Desktop/DarkRadioSimulations/COMSOL simulations/2 dipoles in box/cutPoints_dx.1_dtheta90deg_r-.4.txt
    regulargridx = 25
    regulargridy = 25
    regulargridz = 25

Derived values
  gev1: EvalGlobal "lpv" | data = dset1; table = tbl1; expr = {abs(emw.Vport_1), (emw.Vport_1)}
  pev1: EvalPoint "abs Ex"
    data = cpt1
    table = tbl16
    expr = {20*log10(abs(emw.Ex)), 20*log10(abs(emw.Ey)), 20*log10(abs(emw.Ez))}
    summethod = average
  pev2: EvalPoint "Ex complex" | data = cpt1; table = tbl12; expr = (emw.Ex)
  gev5: EvalGlobal "tickleVSWR" | data = dset1; table = tbl7; expr = emw.VSWR_2; descr = Voltage standing wave ratio
  gev6: EvalGlobal "tickleImpedance" | data = dset1; table = tbl8; expr = {abs(emw.Zport_2), (emw.Zport_2)}
  gev7: EvalGlobal "s21" | data = dset1; table = tbl9; expr = {abs(emw.S12), emw.S12}; descr = {, S12}
  gev8: EvalGlobal "s22" | data = dset1; table = tbl10; expr = {abs(emw.S22), emw.S22}; descr = {, S22}

Tables
  tbl1: Table
    // Global Evaluation 1 (emw.Vport_1)
    freq (MHz) | abs(emw.Vport_1) (V) | (emw.Vport_1) (V)
    100 | 0.00644348 | 0.0021193-0.00608499i
    150 | 0.0371789 | 0.0369923-0.00372075i
  tbl3: Table
    // AF (10*log10(1/(abs(emw.Vport_1))))
    freq (MHz) | Antenna Factor
    73.7 | -19.1823
  tbl4: Table
    // lpv dB (20*log10(abs(emw.Vport_1)))
    freq (MHz) | 20*log10(abs(emw.Vport_1))
    30 | -86.1706
    35 | -82.6164
    40 | -78.9882
    42 | -77.5019
    44 | -75.9884
    46 | -74.4423
    48 | -72.857
    50 | -71.2247
    50.5 | -70.8082
    51 | -70.3881
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  tbl5: Table
    // Global Evaluation 4
    biconX (m) | biconY (m) | biconZ (m) | freq (MHz) | 10 * log10( abs(emw.Pport_1) /.001)
    -0.698 | -0.3122 | -1.204 | 60 | -68.1311
    -0.698 | -0.3122 | -1.204 | 62.2222 | -65.1136
    -0.698 | -0.3122 | -1.204 | 64.4444 | -61.822
    -0.698 | -0.3122 | -1.204 | 66.6667 | -58.0943
    -0.698 | -0.3122 | -1.204 | 68.8889 | -53.6183
    -0.698 | -0.3122 | -1.204 | 71.1111 | -47.6901
    -0.698 | -0.3122 | -1.204 | 73.3333 | -39.8795
    -0.698 | -0.3122 | -1.204 | 75.5556 | -42.4756
    -0.698 | -0.3122 | -1.204 | 77.7778 | -47.0258
    -0.698 | -0.3122 | -1.204 | 80 | -49.7728
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  tbl7: Table
    // Global Evaluation 5
    freq (MHz) | Voltage standing wave ratio (1)
    100 | 15709.4
    150 | 999.112
  tbl8: Table
    // Global Evaluation 6
    freq (MHz) | abs(emw.Zport_2) (Ω) | (emw.Zport_2) (Ω)
    100 | 1353.31 | 1.10525-1353.3i
    150 | 860.659 | 14.3801-860.539i
  tbl9: Table
    // s21
    freq (MHz) | abs(emw.S12) (1) | S12 (1)
    100 | 0.0107391 | 0.00353216-0.0101416i
    150 | 0.0619649 | 0.0616538-0.00620125i
  tbl10: Table
    // s22
    freq (MHz) | abs(emw.S22) (1) | S22 (1)
    100 | 0.999873 | 0.997146-0.0737855i
    150 | 0.998 | 0.991288-0.115556i
  tbl11: Table
    // lpv complex
    freq (MHz) | (emw.Vport_1) (V)
    30 | -2.6556e-05-4.13509e-05i
    35 | -4.6686e-05-5.74031e-05i
    40 | -8.09373e-05-7.79268e-05i
    42 | -0.000100726-8.73465e-05i
    44 | -0.00012538-9.72924e-05i
    46 | -0.000156215-0.000107485i
    48 | -0.000194959-0.000117421i
    50 | -0.000243916-0.000126223i
    50.5 | -0.000258092-0.000128091i
    51 | -0.000273154-0.000129764i
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  tbl12: Table
    // Ex complex
    freq (MHz) | (emw.Ex) (V/m), Point: (-0.6, 0, 0.4) | (emw.Ex) (V/m), Point: (-0.5, 0, 0.4) | (emw.Ex) (V/m), Point: (-0.4, 0, 0.4) | (emw.Ex) (V/m), Point: (-0.3, 0, 0.4) | (emw.Ex) (V/m), Point: (-0.2, 0, 0.4) | (emw.Ex) (V/m), Point: (-0.1, 0, 0.4) | (emw.Ex) (V/m), Point: (-1.1102E-16, 0, 0.4) | (emw.Ex) (V/m), Point: (0.1, 0, 0.4) | (emw.Ex) (V/m), Point: (0.2, 0, 0.4) | (emw.Ex) (V/m), Point: (0.3, 0, 0.4) | (emw.Ex) (V/m), Point: (0.4, 0, 0.4)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
    100 | -0.0066913+0.00387079i | -0.00700226+0.00401582i | -0.00725152+0.0041597i | -0.00742516+0.00430907i | -0.00755026+0.00446888i | -0.00758874+0.00461767i | -0.00760941+0.00477489i | -0.00762055+0.00493212i | -0.00762053+0.0050868i | -0.00758665+0.0052295i | -0.00762989+0.0053784i
    150 | -0.00513426+0.00358803i | -0.00442136+0.00198767i | -0.00380888+0.000263573i | -0.00266438-0.00164547i | -0.00130056-0.00325982i | 0.000908503-0.00564148i | 0.00312049-0.00769685i | 0.00560642-0.00974475i | 0.00823142-0.0116164i | 0.0109685-0.0136367i | 0.0137726-0.0153483i
  tbl13: Table
    // Power receive bicon (dBm) 1
    freq (MHz) | abs(emw.Pport_1) (W)
    100 | 1.15329e-07
    150 | 3.83965e-06
  tbl15: Table
    // Power receive bicon (W)
    biconX (m) | freq (MHz) | abs(emw.Pport_1) (W)
    0 | 100 | 1.8392e-07
    0 | 150 | 2.93841e-06
    0.7 | 100 | 1.15329e-07
    0.7 | 150 | 3.83965e-06
  tbl16: Table
    // abs Ex
    freq (MHz) | Point average: 20*log10(abs(emw.Ex)) | Point average: 20*log10(abs(emw.Ey)) | Point average: 20*log10(abs(emw.Ez))
    30 | -88.1309 | -86.9174 | -86.9982
    30.5 | -88.1659 | -86.8561 | -86.9376
    31 | -88.1943 | -86.79 | -86.8773
    31.5 | -88.1582 | -86.7228 | -86.8164
    32 | -88.0264 | -86.6589 | -86.7541
    32.5 | -87.8176 | -86.5888 | -86.691
    33 | -87.6078 | -86.5231 | -86.6317
    33.5 | -87.2212 | -86.4529 | -86.5635
    34 | -86.8726 | -86.3825 | -86.4997
    34.5 | -86.5051 | -86.3096 | -86.4402
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
Plots
  pg1: PlotGroup3D "Electric Field (emw)" | data = dset1
    mslc1: Multislice | expr = abs(emw.Ez); xnumber = 4; znumber = 3
  pg20: PlotGroup1D "1D Plot Group 20" | data = none; title = Tickle Dipole Drive Box
    tblp1: Table "Table Graph 1" | table = tbl16

Exports
  tbl1: Table "AF" | table = tbl3; filename = C:\Users\phys-simulation\Desktop\Vasco\Bicon\Analysis\bicon4mmAFRerun.txt
  tbl2: Table | table = tbl1; filename = C:\Users\phys-simulation\Desktop\Vasco\biconInBox\analysis\biconInBoxlpv.txt
  tbl3: Table "lpv"
    table = tbl1
    filename = C:\Users\phys-simulation\Desktop\DarkRadioSimulations\comsolSimulationsV2\biconRoomFullFeature\analysis\comsolLPVFullFeature.txt