// COMSOL Multiphysics 5.6.0.401 model "empty_box_12.26.21.mph"
// Outline of the model tree

Selections
  sel1: Explicit "walls" on boundaries 1-6

Geometry
  geom1 "Geometry 1" (3D, length unit m)
    blk1: Block | base = center; size = {3.048, 2.4384, 3.6576}
    fin: Finalize "Form Union"

Materials
  mat1: Common "Air"
    def "Basic"
      thermalexpansioncoefficient = alpha_p(pA,T)
      molarmass = 0.02897
      bulkviscosity = muB(T)
      relpermeability = 1
      relpermittivity = 1
      dynamicviscosity = eta(T)
      ratioofspecificheat = 1.4
      electricconductivity = 0[S/m]
      heatcapacity = Cp(T)
      density = rho(pA,T)
      thermalconductivity = k(T)
      soundspeed = cs(T)
      eta: Piecewise | arg = T; pieces = {200.0, 1600.0, -8.38278E-7+8.35717342E-8*T^1-7.69429583E-11*T^2+4.6437266E-14*T^3-1.06585607E-17*T^4}; argunit = K; fununit = Pa*s
      Cp: Piecewise | arg = T; pieces = {200.0, 1600.0, 1047.63657-0.372589265*T^1+9.45304214E-4*T^2-6.02409443E-7*T^3+1.2858961E-10*T^4}; argunit = K; fununit = J/(kg*K)
      rho: Analytic | expr = pA*0.02897/R_const[K*mol/J]/T; args = {pA, T}; dermethod = manual; argders = {{pA, d(pA*0.02897/R_const/T,pA)}, {T, d(pA*0.02897/R_const/T,T)}}; argunit = Pa,K; fununit = kg/m^3
      k: Piecewise | arg = T; pieces = {200.0, 1600.0, -0.00227583562+1.15480022E-4*T^1-7.90252856E-8*T^2+4.11702505E-11*T^3-7.43864331E-15*T^4}; argunit = K; fununit = W/(m*K)
      cs: Analytic | expr = sqrt(1.4*R_const[K*mol/J]/0.02897*T); args = T; dermethod = manual; argunit = K; fununit = m/s
      an1: Analytic | funcname = alpha_p; expr = -1/rho(pA,T)*d(rho(pA,T),T); args = {pA, T}; argunit = Pa,K; fununit = 1/K
      an2: Analytic "Analytic 2a" | funcname = muB; expr = 0.6*eta(T); args = T; argunit = K; fununit = Pa*s
    RefractiveIndex
      n = 1
      ki = 0
    NonlinearModel
      BA = (def.gamma+1)/2
  mat2: Common "Air" on all domains
    // same settings as mat1
  mat3: Common "Structural steel" on selection sel1
    def "Basic"
      relpermeability = 1
      heatcapacity = 475[J/(kg*K)]
      thermalconductivity = 44.5[W/(m*K)]
      electricconductivity = 5.9e6[S/m]
      relpermittivity = 1
      thermalexpansioncoefficient = 12.3e-6[1/K]
      density = 7850[kg/m^3]
    Enu "Young's modulus and Poisson's ratio"
      youngsmodulus = 200e9[Pa]
      poissonsratio = 0.30
    Murnaghan
      l = -3.0e11[Pa]
      m = -6.2e11[Pa]
      n = -7.2e11[Pa]
    Lame "Lamé parameters"
      lambLame = 1.15e11[Pa]
      muLame = 7.69e10[Pa]

Physics
  emw: ElectromagneticWaves "Electromagnetic Waves, Frequency Domain" on all domains
    dependent variable E = {Ex, Ey, Ez}
    BackgroundField.SolveFor = fullField
    BackgroundField.WaveType = LinearPolByAngle
    wee1: WaveEquationElectric (default)
    pec1: PerfectElectricConductor (default)
    init1: init "Initial Values 1" (default)
    imp1: Impedance "Impedance Boundary Condition 1" on selection sel1 | Es = {1, 1, 1}

Mesh
  mesh1 "Mesh 1" (physics-controlled)
    size: MeshSizeDefault | hauto = 9

Studies
  std1 "Study 1"
    freq: Frequency "Frequency Domain" | punit = MHz; plist = range(35,0.501002004008,300)

Solver configurations
  sol1 "Solution 1" (study std1)
    v1: Variables "Dependent Variables 1"
    s1: Stationary "Stationary Solver 1" | stol = 0.005
      p1: Parametric | pname = freq; plistarr = range(35,0.501002004008,300); punit = MHz; pcontinuationmode = no
      fc1: FullyCoupled | linsolver = i1
      i1: Iterative "Suggested Iterative Solver (emw)" | itrestart = 300; prefuntype = right
        mg1: Multigrid | iter = 1

Datasets
  dset1: Solution | solution = sol1
  cpt4: CutPoint3D "Cut Point Grid 5^3"
    data = dset1
    method = regulargrid
    filename = cutPoints.txt
    regulargridx = 25
    regulargridy = 25
    regulargridz = 25

Derived values
  pev1: EvalPoint "Point Evaluation Ex"
    data = cpt4
    table = tbl8
    expr = {, 20*log10(abs(emw.Ex)), 20*log10(abs(emw.Ey)), 20*log10(abs(emw.Ez))}
    summethod = average
    dataseriesmethod = summation
  pev2: EvalPoint "Point E norm" (disabled) | data = cpt4; table = tbl9; expr = abs(emw.normE)
  av1: AvVolume "Volume Average 1" on domains 1 | data = dset1; table = tbl11; expr = 20*log10(abs(emw.Ex))

Tables
  tbl1: Table
    // Point Evaluation 1 (emw.normE)
    freq (MHz) | abs(emw.Ex) (V/m), Point: (0, 0, 0) | Electric field norm (V/m), Point: (0, 0, 0)
    30 | 1.28839 | 1.28839
    30.5411 | 1.28839 | 1.28839
    31.0822 | 1.28839 | 1.28839
    31.6232 | 1.28839 | 1.28839
    32.1643 | 1.28839 | 1.28839
    32.7054 | 1.28839 | 1.28839
    33.2465 | 1.28839 | 1.28839
    33.7876 | 1.28839 | 1.28839
    34.3287 | 1.40046 | 1.40046
    34.8697 | 1.40046 | 1.40046
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  tbl2: Table
    // Point Evaluation 2 (emw.normE)
    freq (MHz) | Electric field norm (V/m), Point: (0, 0, 0.3)
    1 | 1.00025
    1.2993 | 1.00025
    1.5986 | 1.00025
    1.8979 | 1.00025
    2.1972 | 1.00025
    2.4965 | 1.00025
    2.7958 | 1.00025
    3.0951 | 1.00025
    3.39439 | 1.00025
    3.69369 | 1.00025
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  tbl3: Table
    // Surface Average 1 (emw.normE)
    freq (MHz) | Electric field norm (V/m)
    1 | 1.00026
    1.2993 | 1.00026
    1.5986 | 1.00026
    1.8979 | 1.00026
    2.1972 | 1.00026
    2.4965 | 1.00026
    2.7958 | 1.00026
    3.0951 | 1.00026
    3.39439 | 1.00026
    3.69369 | 1.00026
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  tbl4: Table
    // Surface Average 2 (emw.normE)
    freq (MHz) | Electric field norm (V/m)
    1 | 1.00025
    1.2993 | 1.00025
    1.5986 | 1.00025
    1.8979 | 1.00025
    2.1972 | 1.00025
    2.4965 | 1.00025
    2.7958 | 1.00025
    3.0951 | 1.00025
    3.39439 | 1.00025
    3.69369 | 1.00025
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  tbl5: Table
    // Point Evaluation 3 (emw.Ex)
    freq (MHz) | abs(emw.normE) (V/m), Point: (0, 1, 0) | abs(emw.Ex) (V/m), Point: (0, 1, 0) | abs(emw.Ey) (V/m), Point: (0, 1, 0) | abs(emw.Ez) (V/m), Point: (0, 1, 0)
    103.959 | 0.0746128 | 0.0746076 | 0.000531006 | 0.000703895
  tbl6: Table
    // Surface Average 3 (emw.normE)
    freq (MHz) | Electric field norm (V/m)
    30 | 1.28247
    30.5411 | 1.28247
    31.0822 | 1.28247
    31.6232 | 1.28247
    32.1643 | 1.28247
    32.7054 | 1.28247
    33.2465 | 1.28247
    33.7876 | 1.28247
    34.3287 | 1.39208
    34.8697 | 1.39208
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  tbl8: Table
    // Point Evaluation 1
    freq (MHz) | Point average: 20*log10(abs(emw.Ex)) | Point average: 20*log10(abs(emw.Ey)) | Point average: 20*log10(abs(emw.Ez))
    50 | 3.71022 | 5.72278 | 3.11559
    50.501 | 3.71022 | 5.72278 | 3.11559
    51.002 | 3.71022 | 5.72278 | 3.11559
    51.503 | 3.71022 | 5.72278 | 3.11559
    52.004 | 4.07261 | 6.4376 | 3.4008
    52.505 | 4.07261 | 6.4376 | 3.4008
    53.006 | 4.07261 | 6.4376 | 3.4008
    53.507 | 4.47854 | 7.2822 | 3.71693
    54.008 | 4.47854 | 7.2822 | 3.71693
    54.509 | 4.81969 | 8.03665 | 3.97949
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  tbl9: Table
    // Point E norm
    freq (MHz) | Point average: abs(emw.normE) (V/m)
    50 | 1.60043
    50.501 | 1.60043
    51.002 | 1.60043
    51.503 | 1.60043
    52.004 | 1.60043
    52.505 | 1.71028
    53.006 | 1.71028
    53.507 | 1.71028
    54.008 | 1.8136
    54.509 | 1.8136
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  tbl11: Table
    // Volume Average 1
    freq (MHz) | 20*log10(abs(emw.Ex))
    50 | 3.70049
    50.501 | 3.70049
    51.002 | 3.70049
    51.503 | 3.70049
    52.004 | 3.70049
    52.505 | 4.19998
    53.006 | 4.19998
    53.507 | 4.19998
    54.008 | 4.63887
    54.509 | 4.63887
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  tbl12: Table
    // random point
    freq (MHz) | Point average: (abs(emw.normE)) (V/m) | Point average: (abs(emw.Ex)) (V/m) | Point average: (abs(emw.Ey)) (V/m) | Point average: (abs(emw.Ez)) (V/m) | Point average: (abs(emw.normE)) (V/m) | Point average: (abs(emw.Ex)) (V/m) | Point average: (abs(emw.Ey)) (V/m) | Point average: (abs(emw.Ez)) (V/m)
    50 | 3.05732 | 1.60053 | 2.09584 | 1.48072 | 2.76324 | 1.46997 | 1.93356 | 1.31758
    50.501 | 3.05732 | 1.60053 | 2.09584 | 1.48072 | 2.76324 | 1.46997 | 1.93356 | 1.31758
    51.002 | 3.05732 | 1.60053 | 2.09584 | 1.48072 | 2.76324 | 1.46997 | 1.93356 | 1.31758
    51.503 | 3.05732 | 1.60053 | 2.09584 | 1.48072 | 2.76324 | 1.46997 | 1.93356 | 1.31758
    52.004 | 3.2842 | 1.6793 | 2.30896 | 1.53719 | 2.93606 | 1.52849 | 2.11078 | 1.35232
    52.505 | 3.2842 | 1.6793 | 2.30896 | 1.53719 | 2.93606 | 1.52849 | 2.11078 | 1.35232
    53.006 | 3.2842 | 1.6793 | 2.30896 | 1.53719 | 2.93606 | 1.52849 | 2.11078 | 1.35232
    53.507 | 3.5766 | 1.7725 | 2.58988 | 1.60258 | 3.15806 | 1.598 | 2.34107 | 1.39253
    54.008 | 3.5766 | 1.7725 | 2.58988 | 1.60258 | 3.15806 | 1.598 | 2.34107 | 1.39253
    54.509 | 3.86215 | 1.85508 | 2.87006 | 1.65921 | 3.37466 | 1.65982 | 2.56823 | 1.42741
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
Plots
  pg1: PlotGroup3D "Electric Field (emw)" | data = dset1
    mslc1: Multislice | expr = emw.normE; descr = Electric field norm
    slc1: Slice (disabled) | expr = emw.normE
    con1: Contour (disabled) | expr = emw.normE
    mesh1: Mesh (disabled)
    scv1: ScatterVolume (disabled) | expr = {emw.Ex, emw.Ey, emw.Ez}
  pg2: PlotGroup1D "1D Plot Group 2" | data = none
    tblp1: Table "Table Graph 1" | table = tbl8; xaxisdata = auto
  pg3: PlotGroup1D "1D Plot Group 3" | data = none
    tblp1: Table "Table Graph 1" | table = tbl9
  pg4: PlotGroup1D "1D Plot Group 4" | data = none
    tblp1: Table "Table Graph 1" | table = tbl11

Exports
  tbl1: Table
    table = tbl1
    filename = C:\Users\phys-simulation\Desktop\DarkRadioSimulations\comsolSimulationsV2\biconRoomNoRes\analysis\EfieldInBoxCutPoint.txt
  tbl2: Table
    table = tbl2
    filename = C:\Users\phys-simulation\Desktop\Vasco\EfieldInBox\analysis\EfieldInBoxNormOffCenter.txt
  tbl3: Table
    table = tbl3
    filename = C:\Users\phys-simulation\Desktop\Vasco\EfieldInBox\analysis\surfaceEfieldAverageEmptyBox.txt
  tbl4: Table
    table = tbl4
    filename = C:\Users\phys-simulation\Desktop\Vasco\EfieldInBox\analysis\surfaceAvg27cm5EmptyBox.txt
  tbl7: Table
    table = tbl6
    filename = C:\Users\phys-simulation\Desktop\DarkRadioSimulations\comsolSimulationsV2\biconRoomNoRes\analysis\surfaceAvg300cmEmptyBox.txt
  tbl8: Table
    table = tbl1
    filename = C:\Users\phys-simulation\Desktop\Vasco\biconInBox\analysis\EfieldInBoxCutPoint.txt