// COMSOL Multiphysics 5.6.0.401 model "vivaldiRecieveBox.mph"
// Vivaldi Antenna
// modeldescr_rf/vivaldi_antenna
// A tapered slot antenna, also known as a Vivaldi antenna, is useful for wideband applications. In this example, an exponential function is used for the taper profile. The objective is to compute the far-field pattern and the impedance of the structure. Good matching is observed over a wide frequency band.
// Outline of the model tree

Parameters
  thickness = 60[mil]  // Substrate thickness
  w_slot = 0.5[mm]  // Slot with
  r_sphere = 100[mm]
  sideBox = 1000[mm]
  boxX = 0[mm]
  boxY = 0[mm]
  boxZ = 0[mm]

Coordinate systems
  pml1: PML "Perfectly Matched Layer 1" on no domains | ScalingType = Spherical

Geometry
  geom1 "Geometry 1" (3D, length unit mm)
    blk1: Block "Substrate" | base = center; size = {110, 80, thickness}
    blk2: Block "Feed line" | pos = {-26, -20+w_slot/4, 0}; base = center; size = {3.2, 40+w_slot/2, thickness}
    wp1: WorkPlane | quickz = thickness/2; unite = on
      pc1: ParametricCurve | parmax = 70; coord = {s-15, exp(0.044*s)-1+w_slot/2}
      mir1: Mirror | input = pc1; keep = on; axis = {0, 1}
      r1: Rectangle | pos = {-35, -w_slot/2}; size = {20, w_slot}
      c1: Circle | pos = {-40.5, 0}; r = 12
      uni1: Union | input = c1, r1; intbnd = off; edge = all
    sph1: Sphere "PML" (disabled) | layername = Layer 1; layer = 30; r = r_sphere
    blk3: Block | pos = {boxX, boxY, boxZ}; base = center; size = {sideBox, sideBox, sideBox}
    fin: Finalize "Form Union"

Materials
  mat1: Common "Air" on all domains
    def "Basic"
      thermalexpansioncoefficient = alpha_p(pA,T)
      molarmass = 0.02897[kg/mol]
      bulkviscosity = muB(T)
      relpermeability = 1
      relpermittivity = 1
      dynamicviscosity = eta(T)
      ratioofspecificheat = 1.4
      electricconductivity = 0[S/m]
      heatcapacity = Cp(T)
      density = rho(pA,T)
      thermalconductivity = k(T)
      soundspeed = cs(T)
      eta: Piecewise | arg = T; pieces = {200.0, 1600.0, -8.38278E-7+8.35717342E-8*T^1-7.69429583E-11*T^2+4.6437266E-14*T^3-1.06585607E-17*T^4}; argunit = K; fununit = Pa*s
      Cp: Piecewise | arg = T; pieces = {200.0, 1600.0, 1047.63657-0.372589265*T^1+9.45304214E-4*T^2-6.02409443E-7*T^3+1.2858961E-10*T^4}; argunit = K; fununit = J/(kg*K)
      rho: Analytic | expr = pA*0.02897/R_const[K*mol/J]/T; args = {pA, T}; argunit = Pa,K; fununit = kg/m^3
      k: Piecewise | arg = T; pieces = {200.0, 1600.0, -0.00227583562+1.15480022E-4*T^1-7.90252856E-8*T^2+4.11702505E-11*T^3-7.43864331E-15*T^4}; argunit = K; fununit = W/(m*K)
      cs: Analytic | expr = sqrt(1.4*R_const[K*mol/J]/0.02897*T); args = T; argunit = K; fununit = m/s
      an1: Analytic | funcname = alpha_p; expr = -1/rho(pA,T)*d(rho(pA,T),T); args = {pA, T}; argunit = Pa,K; fununit = 1/K
      an2: Analytic "Analytic 2a" | funcname = muB; expr = 0.6*eta(T); args = T; argunit = K; fununit = Pa*s
    RefractiveIndex
      n = 1
      ki = 0
    NonlinearModel
      BA = (def.gamma+1)/2
    idealGas
      Rs = R_const/Mn
      heatcapacity = Cp(T)
      ratioofspecificheat = 1.4
      molarmass = 0.02897
      Cp: Piecewise | arg = T; pieces = {200.0, 1600.0, 1047.63657-0.372589265*T^1+9.45304214E-4*T^2-6.02409443E-7*T^3+1.2858961E-10*T^4}; argunit = K; fununit = J/(kg*K)
  mat2: Common "Substrate" on domains 2, 3
    def "Basic"
      relpermittivity = 3.38
      relpermeability = 1
      electricconductivity = 0
  mat3: Common "Steel AISI 4340" on boundaries 1-5, 24
    def "Basic"
      relpermeability = 1
      electricconductivity = 4.032e6[S/m]
      thermalexpansioncoefficient = 12.3e-6[1/K]
      heatcapacity = 475[J/(kg*K)]
      relpermittivity = 1
      density = 7850[kg/m^3]
      thermalconductivity = 44.5[W/(m*K)]
    Enu "Young's modulus and Poisson's ratio"
      youngsmodulus = 205e9[Pa]
      poissonsratio = 0.28

Physics
  emw: ElectromagneticWaves "Electromagnetic Waves, Frequency Domain" on all domains
    dependent variable E = {Ex, Ey, Ez}
    BackgroundField.SolveFor = fullField
    BackgroundField.WaveType = LinearPolByAngle
    BackgroundField.Eb = {0, -1, 0}
    BackgroundField.angleRoll = 0
    wee1: WaveEquationElectric (default)
    pec1: PerfectElectricConductor (default)
    init1: init "Initial Values 1" (default)
    pec2: PerfectElectricConductor on boundaries 9, 14, 15, 17, 20
    lport1: LumpedPort on boundaries 13 | PortExcitation = off
    imp1: Impedance "Impedance Boundary Condition box" on boundaries 1-5, 24 | Es = {0, 0, 0}
    imp2: Impedance "Impedance Boundary Condition drive" on boundaries 1, 3, 4, 24 | Es = {0, 1*exp(i*emw.k0*x), 0}

Mesh
  mesh1 "Mesh 1" (physics-controlled)
    size: MeshSizeDefault | hauto = 6

Studies
  std1 "Study 1"
    param: Parametric "Parametric Sweep" (disabled)
      sweeptype = filled
      pname = {boxX, boxY, boxZ}
      plistarr = {"30, 47", "52, -26", "12, 75"}
      punit = {mm, mm, mm}
    freq: Frequency "Frequency Domain" | punit = GHz; plist = 4

Solver configurations
  sol1 "Solution 1" (study std1)
    v1: Variables "Dependent Variables 1"
    s1: Stationary "Stationary Solver 1" | stol = 0.01
      p1: Parametric | pname = freq; plistarr = 4; punit = GHz; pcontinuationmode = no
      fc1: FullyCoupled | linsolver = i1
      i1: Iterative "Suggested Iterative Solver (emw)" | itrestart = 300; prefuntype = right
        mg1: Multigrid | iter = 1
  sol2 "Parametric Solutions 1" (study std1)

Datasets
  dset1: Solution | solution = sol1
  dset2: Solution | solution = sol2

Derived values
  gev1: EvalGlobal "lpv" | data = dset1; table = tbl1; expr = abs(emw.Vport_1); unit = V
  gev2: EvalGlobal "af" (disabled) | data = dset2; table = tbl2; expr = 20*log10(Point Evaluation 1/abs(emw.Vport_1))

Tables
  rp1: Table "Directivity"
    // Radiation pattern
    θ (deg) | φ (deg) | Directivity | Directivity (dB)
    12.1348 | 348 | 1.5261 | 1.83583
  tbl1: Table
    // Global Evaluation 1
    freq (GHz) | abs(emw.Vport_1) (V) | abs(emw.Vport_1) (V) | abs(emw.Vport_1) (V)
    4 | 0.0126257 | 0.0126257 | 0.0230433
  tbl2: Table
    // af
    r_sphere (mm) | freq (GHz) | 20*log10(1/abs(emw.Vport_1))
    100 | 4 | 37.8965
    150 | 4 | 33.3802
    200 | 4 | 30.3279
    250 | 4 | 28.0928
    300 | 4 | 26.3482
    400 | 4 | 23.6352
  rp2: Table "Directivity 1"
    // Radiation pattern
    θ (deg) | φ (deg) | Directivity | Directivity (dB)
    28.6364 | 176 | 3.0785 | 4.88339
  tbl3: Table
    // E avg/V
    boxX (mm) | boxY (mm) | boxZ (mm) | freq (GHz) | Point average: AF
    30 | 52 | 12 | 4 | 49.6289
    30 | 52 | 75 | 4 | 44.8865
    30 | -26 | 12 | 4 | 40.5303
    30 | -26 | 75 | 4 | 42.3461
    47 | 52 | 12 | 4 | 40.8827
    47 | 52 | 75 | 4 | 40.7667
    47 | -26 | 12 | 4 | 38.5017
    47 | -26 | 75 | 4 | 42.1009
  tbl4: Table
    // Point Evaluation 1
    boxX (mm) | boxY (mm) | boxZ (mm) | freq (GHz) | Point average: Electric field norm (V/m)
    30 | 52 | 12 | 4 | 0.802915
    30 | 52 | 75 | 4 | 1.49484
    30 | -26 | 12 | 4 | 1.68249
    30 | -26 | 75 | 4 | 1.49159
    47 | 52 | 12 | 4 | 0.683046
    47 | 52 | 75 | 4 | 1.53394
    47 | -26 | 12 | 4 | 1.28868
    47 | -26 | 75 | 4 | 2.45909

Plots
  pg1: PlotGroup3D "Electric Field (emw)" | data = dset1
    mslc1: Multislice | expr = emw.Ey; xnumber = 3; ynumber = 3; multiplanezmethod = coord; zcoord = thickness/2
      sel1: Selection on domains 1
  pg2: PlotGroup1D "S-parameter (emw)" | data = dset1; ylabel = S-parameter (dB)
    glob1: Global | expr = emw.S11dB; descr = S11; xdata = expr; xdataexpr = freq
  pg3: SmithGroup "Smith Plot (emw)" | data = dset1
    rgr1: ReflectionGraph | expr = emw.S11; descr = S11; title = Reflection Graph: S-parameter, Color: Frequency (GHz)
      col1: Color "Color Expression 1" | expr = emw.freq/1e9
  pg4: PolarGroup "2D Far Field (emw)" | data = dset1
    rp1: RadiationPattern | expr = emw.normEfar; phidisc = 100
  pg5: PlotGroup3D "3D Far Field (emw)" | data = dset1
    rp1: RadiationPattern
      expr = emw.normEfar
      thetadisc = 90
      phidisc = 90
      directivity = on
      directivityexpr = emw.normEfar^2
      table = rp1
  pg6: PlotGroup1D "1D Plot Group 6" | data = dset1
    glob1: Global | expr = emw.VSWR_1; descr = Voltage standing wave ratio
  pg7: PlotGroup3D "3D Plot Group 7" | data = dset1
    iso1: Isosurface | expr = 20*log10(emw.normE+0.1)
      sel1: Selection on domains 1, 2
      filt1: Filter | expr = y>0 && z<0
  pg8: PlotGroup1D "1D Plot Group 8" | data = none
    tblp1: Table "Table Graph 1" | table = tbl1
  pg9: PlotGroup1D "AF vs sphere size" | data = none
    tblp1: Table "Table Graph 1" | table = tbl2; xaxisdata = 1; plotcolumninput = manual; plotcolumns = 3
  pg10: PlotGroup3D "Electric Field (emw) 1" | data = dset2
    mslc1: Multislice | expr = emw.normE
  pg11: PolarGroup "2D Far Field (emw) 1" | data = dset2
    rp1: RadiationPattern | expr = emw.normEfar; phidisc = 180
  pg12: PlotGroup3D "3D Far Field (emw) 1" | data = dset2
    rp1: RadiationPattern
      expr = emw.normEfar
      thetadisc = 45
      phidisc = 45
      directivity = on
      directivityexpr = emw.normEfar^2
      table = rp2