// COMSOL Multiphysics 5.6.0.401 model "vivaldiDemo2.mph"
// Vivaldi Antenna
// modeldescr_rf/vivaldi_antenna
// A tapered slot antenna, also known as a Vivaldi antenna, is useful for wideband applications. In this example, an exponential function is used for the taper profile. The objective is to compute the far-field pattern and the impedance of the structure. Good matching is observed over a wide frequency band.
// Outline of the model tree

Parameters
  thickness = 60[mil]  // Substrate thickness
  w_slot = 0.5[mm]  // Slot with

Coordinate systems
  pml1: PML "Perfectly Matched Layer 1" on domains 1-4, 8-11 | ScalingType = Spherical

Geometry
  geom1 "Geometry 1" (3D, length unit mm)
    blk1: Block "Substrate" | base = center; size = {110, 80, thickness}
    blk2: Block "Feed line" | pos = {-26, -20+w_slot/4, 0}; base = center; size = {3.2, 40+w_slot/2, thickness}
    wp1: WorkPlane | quickz = thickness/2; unite = on
      pc1: ParametricCurve | parmax = 70; coord = {s-15, exp(0.044*s)-1+w_slot/2}
      mir1: Mirror | input = pc1; keep = on; axis = {0, 1}
      r1: Rectangle | pos = {-35, -w_slot/2}; size = {20, w_slot}
      c1: Circle | pos = {-40.5, 0}; r = 12
      uni1: Union | input = c1, r1; intbnd = off; edge = all
    sph1: Sphere "PML" | layername = Layer 1; layer = 30; r = 150
    fin: Finalize "Form Union"

Materials
  mat1: Common "Air" on all domains
    def "Basic"
      thermalexpansioncoefficient = alpha_p(pA,T)
      molarmass = 0.02897[kg/mol]
      bulkviscosity = muB(T)
      relpermeability = 1
      relpermittivity = 1
      dynamicviscosity = eta(T)
      ratioofspecificheat = 1.4
      electricconductivity = 0[S/m]
      heatcapacity = Cp(T)
      density = rho(pA,T)
      thermalconductivity = k(T)
      soundspeed = cs(T)
      eta: Piecewise | arg = T; pieces = {200.0, 1600.0, -8.38278E-7+8.35717342E-8*T^1-7.69429583E-11*T^2+4.6437266E-14*T^3-1.06585607E-17*T^4}; argunit = K; fununit = Pa*s
      Cp: Piecewise | arg = T; pieces = {200.0, 1600.0, 1047.63657-0.372589265*T^1+9.45304214E-4*T^2-6.02409443E-7*T^3+1.2858961E-10*T^4}; argunit = K; fununit = J/(kg*K)
      rho: Analytic | expr = pA*0.02897/R_const[K*mol/J]/T; args = {pA, T}; argunit = Pa,K; fununit = kg/m^3
      k: Piecewise | arg = T; pieces = {200.0, 1600.0, -0.00227583562+1.15480022E-4*T^1-7.90252856E-8*T^2+4.11702505E-11*T^3-7.43864331E-15*T^4}; argunit = K; fununit = W/(m*K)
      cs: Analytic | expr = sqrt(1.4*R_const[K*mol/J]/0.02897*T); args = T; argunit = K; fununit = m/s
      an1: Analytic | funcname = alpha_p; expr = -1/rho(pA,T)*d(rho(pA,T),T); args = {pA, T}; argunit = Pa,K; fununit = 1/K
      an2: Analytic "Analytic 2a" | funcname = muB; expr = 0.6*eta(T); args = T; argunit = K; fununit = Pa*s
    RefractiveIndex
      n = 1
      ki = 0
    NonlinearModel
      BA = (def.gamma+1)/2
    idealGas
      Rs = R_const/Mn
      heatcapacity = Cp(T)
      ratioofspecificheat = 1.4
      molarmass = 0.02897
      Cp: Piecewise | arg = T; pieces = {200.0, 1600.0, 1047.63657-0.372589265*T^1+9.45304214E-4*T^2-6.02409443E-7*T^3+1.2858961E-10*T^4}; argunit = K; fununit = J/(kg*K)
  mat2: Common "Substrate" on domains 6, 7
    def "Basic"
      relpermittivity = 3.38
      relpermeability = 1
      electricconductivity = 0

Physics
  emw: ElectromagneticWaves "Electromagnetic Waves, Frequency Domain" on all domains
    dependent variable E = {Ex, Ey, Ez}
    wee1: WaveEquationElectric (default)
    pec1: PerfectElectricConductor (default)
    init1: init "Initial Values 1" (default)
    pec2: PerfectElectricConductor on boundaries 16, 21, 22, 24, 27
    ffd1: FarFieldDomain on domains 5
      ffc1: FarFieldCalculation on boundaries 9-12, 35, 36, 40, 43
    lport1: LumpedPort on boundaries 20

Mesh
  mesh1 "Mesh 1" (physics-controlled)
    size: MeshSizeDefault | hauto = 6

Studies
  std1 "Study 1"
    freq: Frequency "Frequency Domain" | punit = GHz; plist = 4

Solver configurations
  sol1 "Solution 1" (study std1)
    v1: Variables "Dependent Variables 1"
    s1: Stationary "Stationary Solver 1" | stol = 0.01
      p1: Parametric | pname = freq; plistarr = 4; punit = GHz; pcontinuationmode = no
      fc1: FullyCoupled | linsolver = i1
      i1: Iterative "Suggested Iterative Solver (emw)" | itrestart = 300; prefuntype = right
        mg1: Multigrid | iter = 1

Datasets
  dset1: Solution | solution = sol1

Derived values
  gev1: EvalGlobal "Global Evaluation 1"
    data = dset1
    table = tbl1
    expr = emw.VSWR_1
    unit = 1
    descr = Voltage standing wave ratio

Tables
  rp1: Table "Directivity"
    // Radiation pattern
    θ (deg) | φ (deg) | Directivity | Directivity (dB)
    93.0337 | 360 | 6.10865 | 7.85945
  tbl1: Table
    // Global Evaluation 1
    freq (GHz) | Voltage standing wave ratio (1)
    3.5 | 1.2155
    3.57143 | 1.33706
    3.64286 | 1.48224
    3.71429 | 1.62573
    3.78571 | 1.74485
    3.85714 | 1.822
    3.92857 | 1.84948
    4 | 1.83103
    4.07143 | 1.77915
    4.14286 | 1.71042
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  rp2: Table "Directivity 1"
    // Radiation pattern
    θ (deg) | φ (deg) | Directivity | Directivity (dB)
    93.0337 | 360 | 6.10865 | 7.85945

Plots
  pg1: PlotGroup3D "Electric Field (emw)" | data = dset1
    mslc1: Multislice | expr = emw.Ey; xnumber = 3; ynumber = 3; multiplanezmethod = coord; zcoord = thickness/2
      sel1: Selection on domains 5
  pg2: PlotGroup1D "S-parameter (emw)" | data = dset1; ylabel = S-parameter (dB)
    glob1: Global | expr = emw.S11dB; unit = 1; descr = S11; xdata = expr; xdataexpr = freq
  pg3: SmithGroup "Smith Plot (emw)" | data = dset1
    rgr1: ReflectionGraph
      expr = emw.S11
      unit = 1
      descr = S11
      title = Reflection Graph: S-parameter, Color: Frequency (GHz)
      col1: Color "Color Expression 1" | expr = emw.freq/1e9
  pg4: PolarGroup "2D Far Field (emw)" | data = dset1
    rp1: RadiationPattern | expr = emw.normEfar; phidisc = 100
  pg5: PlotGroup3D "3D Far Field (emw)" | data = dset1
    rp1: RadiationPattern
      expr = emw.normEfar
      thetadisc = 90
      phidisc = 90
      directivity = on
      directivityexpr = emw.normEfar^2
      table = rp1
  pg6: PlotGroup1D "1D Plot Group 6" | data = dset1
    glob1: Global | expr = emw.VSWR_1; descr = Voltage standing wave ratio
  pg7: PlotGroup3D "3D Plot Group 7" | data = dset1
    iso1: Isosurface | expr = 20*log10(emw.normE+0.1)
      sel1: Selection on domains 5, 6
      filt1: Filter | expr = y>0 && z<0
  pg8: PlotGroup1D "1D Plot Group 8" | data = none
    tblp1: Table "Table Graph 1" | table = tbl1
  pg9: PlotGroup3D "gain dBi" | data = dset1
    rp1: RadiationPattern | expr = emw.gaindBEfar; descr = Far-field gain, dBi; table = rp2