// COMSOL Multiphysics 5.4.0.388 model "empty_box_4.8.21.mph"
// Outline of the model tree

Coordinate systems
  pml1: PML "Perfectly Matched Layer 1" on no domains | ScalingType = Spherical

Geometry
  geom1 "Geometry 1" (3D, length unit m)
    imp1: Import (disabled)
      type = cad
      filename = C:\Users\phys-simulation\Desktop\DarkRadioSimulations\3D Models\Bicon Antenna\bicon_arm_nate.ipt
    imp2: Import (disabled)
      type = cad
      filename = C:\Users\phys-simulation\Desktop\DarkRadioSimulations\3D Models\Bicon Antenna\bicon_arm_nate.ipt
    mir1: Mirror (disabled) | input = imp2; pos = {-.04412, 0, 0}; axis = {1, 0, 0}
    imp3: Import (disabled)
      type = cad
      filename = C:\Users\phys-simulation\Desktop\DarkRadioSimulations\REU_19\bicon_room_lowres\Room Model\full.stp
    del1: Delete "Delete panel" (disabled)
      input = imp3.Solid1(52) domains 1; imp3.Solid1(55) domains 1; imp3.Solid1(53) domains 1; imp3.Solid1(54) domains 1; imp3.Solid1(57) domains 1; imp3.Solid1(48) domains 1; imp3.Solid1(50) domains 1; imp3.Solid1(49) domains 1; imp3.Solid1(51) domains 1; imp3.Solid1(45) domains 1; imp3.Solid1(42) domains 1; imp3.Solid1(46) domains 1; imp3.Solid1(43) domains 1; imp3.Solid1(47) domains 1; imp3.Solid1(44) domains 1; imp3.Solid1(2) domains 1; imp3.Solid1(6) domains 1; imp3.Solid1(7) domains 1; imp3.Solid1(8) domains 1; imp3.Solid1(13) domains 1; imp3.Solid1(26) domains 1; imp3.Solid1(15) domains 1; imp3.Solid1(56) domains 1; imp3.Solid1(9) domains 1; imp3.Solid1(16) domains 1; imp3.Solid1(14) domains 1; imp3.Solid1(27) domains 1; imp3.Solid1(25) domains 1; imp3.Solid1(11) domains 1; imp3.Solid1(12) domains 1; imp3.Solid1(28) domains 1; imp3.Solid1(5) domains 1; imp3.Solid1(10) domains 1; imp3.Solid1(1) domains 1
    del2: Delete "Delete screws" (disabled)
      input = imp3.Solid2(29) domains 1; imp3.Solid2(18) domains 1; imp3.Solid2(11) domains 1; imp3.Solid2(24) domains 1; imp3.Solid2(10) domains 1; imp3.Solid2(22) domains 1; imp3.Solid2(25) domains 1; imp3.Solid2(13) domains 1; imp3.Solid2(9) domains 1; imp3.Solid2(21) domains 1; imp3.Solid2(30) domains 1; imp3.Solid2(15) domains 1; imp3.Solid2(7) domains 1; imp3.Solid2(23) domains 1; imp3.Solid2(27) domains 1; imp3.Solid2(16) domains 1; imp3.Solid2(17) domains 1; imp3.Solid2(26) domains 1; imp3.Solid2(19) domains 1; imp3.Solid2(12) domains 1; imp3.Solid2(8) domains 1; imp3.Solid2(20) domains 1; imp3.Solid2(28) domains 1; imp3.Solid2(14) domains 1; imp3.Solid1(21) domains 1; imp3.Solid1(20) domains 1; imp3.Solid1(19) domains 1; imp3.Solid1(23) domains 1; imp3.Solid1(18) domains 1; imp3.Solid1(17) domains 1; imp3.Solid1(22) domains 1; imp3.Solid1(24) domains 1
    del3: Delete "Delete Electrical" (disabled)
      input = imp3.Solid2(35) domains 1; imp3.Solid1(36) domains 1; imp3.Solid1(29) domains 1; imp3.Solid2(33) domains 1; imp3.Solid1(30) domains 1; imp3.Solid2(32) domains 1; imp3.Solid1(39) domains 1; imp3.Solid1(31) domains 1; imp3.Solid1(35) domains 1; imp3.Solid2(31) domains 1; imp3.Solid1(32) domains 1; imp3.Solid1(38) domains 1; imp3.Solid1(33) domains 1; imp3.Solid1(37) domains 1; imp3.Solid1(34) domains 1; imp3.Solid2(34) domains 1; imp3.Solid1(41) domains 1
    del4: Delete "Delete Entities 4" (disabled) | input = imp3.Solid1(3), imp3.Solid3
    blk1: Block | pos = {-.04412, 0, 0}; base = center; size = {10[ft], 8[ft], 12[ft]}
    sph1: Sphere (disabled) | layername = Layer 1; layer = .2; r = 2
    rev1: Revolve (disabled)
      revolvefrom = faces
      inputface = mir1(1) boundaries 1
      angle2 = 90
      pos = {0, -.003}
      axis = {1, 0}
      revaxis = {{0, 1}, {-.003, 0}}
    rev2: Revolve (disabled)
      revolvefrom = faces
      inputface = imp1(1) boundaries 1
      angle2 = 90
      pos = {0, .003}
      axis = {-1, 0}
      revaxis = {{0, -1}, {.003, 0}}
    dif1: Difference (disabled)
      input = blk1, del1, del2, del3
      input2 = imp3.Solid1(4), imp3.Solid1(40), imp3.Solid2(1), imp3.Solid2(2), imp3.Solid2(3), imp3.Solid2(4), imp3.Solid2(5), imp3.Solid2(6), rev1, rev2
    ext1: Extrude (disabled)
      extrudefrom = faces
      inputface = dif1 183
      specify = vertices
      distance = .0005
      vertex = dif1 329
    fin: Finalize "Form Union"

Materials
  mat1: Common "Air" on domains 1
    def "Basic"
      thermalexpansioncoefficient = alpha_p(pA,T)
      molarmass = 0.02897
      bulkviscosity = muB(T)
      relpermeability = 1
      relpermittivity = 1
      dynamicviscosity = eta(T)
      ratioofspecificheat = 1.4
      electricconductivity = 0[S/m]
      heatcapacity = Cp(T)
      density = rho(pA,T)
      thermalconductivity = k(T)
      soundspeed = cs(T)
      eta: Piecewise | arg = T; pieces = {200.0, 1600.0, -8.38278E-7+8.35717342E-8*T^1-7.69429583E-11*T^2+4.6437266E-14*T^3-1.06585607E-17*T^4}; argunit = K; fununit = Pa*s
      Cp: Piecewise | arg = T; pieces = {200.0, 1600.0, 1047.63657-0.372589265*T^1+9.45304214E-4*T^2-6.02409443E-7*T^3+1.2858961E-10*T^4}; argunit = K; fununit = J/(kg*K)
      rho: Analytic | expr = pA*0.02897/R_const[K*mol/J]/T; args = {pA, T}; dermethod = manual; argders = {{pA, d(pA*0.02897/R_const/T,pA)}, {T, d(pA*0.02897/R_const/T,T)}}; argunit = Pa,K; fununit = kg/m^3
      k: Piecewise | arg = T; pieces = {200.0, 1600.0, -0.00227583562+1.15480022E-4*T^1-7.90252856E-8*T^2+4.11702505E-11*T^3-7.43864331E-15*T^4}; argunit = K; fununit = W/(m*K)
      cs: Analytic | expr = sqrt(1.4*R_const[K*mol/J]/0.02897*T); args = T; dermethod = manual; argunit = K; fununit = m/s
      an1: Analytic | funcname = alpha_p; expr = -1/rho(pA,T)*d(rho(pA,T),T); args = {pA, T}; argunit = Pa,K; fununit = 1/K
      an2: Analytic "Analytic 2a" | funcname = muB; expr = 0.6*eta(T); args = T; argunit = K; fununit = Pa*s
    RefractiveIndex
      n = 1
      ki = 0
    NonlinearModel
      BA = (def.gamma+1)/2
  mat2: Common "Aluminum" on no boundaries
    def "Basic"
      relpermeability = 1
      heatcapacity = 900[J/(kg*K)]
      thermalconductivity = 238[W/(m*K)]
      electricconductivity = 3.774e7[S/m]
      relpermittivity = 1
      thermalexpansioncoefficient = 23e-6[1/K]
      density = 2700[kg/m^3]
    Enu "Young's modulus and Poisson's ratio"
      youngsmodulus = 70e9[Pa]
      poissonsratio = 0.33
    Murnaghan
      l = -2.5e11[Pa]
      m = -3.3e11[Pa]
      n = -3.5e11[Pa]
    Lame "Lamé parameters"
      lambLame = 5.1e10[Pa]
      muLame = 2.6e10[Pa]
  mat3: Common "Steel AISI 4340" on boundaries 1-6
    def "Basic"
      relpermeability = 1
      electricconductivity = 5.9e6[S/m]
      thermalexpansioncoefficient = 12.3e-6[1/K]
      heatcapacity = 475[J/(kg*K)]
      relpermittivity = 1
      density = 7850[kg/m^3]
      thermalconductivity = 44.5[W/(m*K)]
    Enu "Young's modulus and Poisson's ratio"
      youngsmodulus = 205e9[Pa]
      poissonsratio = 0.28

Physics
  emw: ElectromagneticWaves "Electromagnetic Waves, Frequency Domain" on all domains
    dependent variable E = {Ex, Ey, Ez}
    BackgroundField.SolveFor = fullField
    BackgroundField.WaveType = LinearPolByAngle
    BackgroundField.Eampl = 1[V/m]
    BackgroundField.anglePitch = pi/2
    MeshControl.EnableMeshControl = 1
    MeshControl.SizeControlParameter = Frequency
    MeshControl.PhysicsControlledMeshMaximumFrequency = 300[MHz]
    wee1: WaveEquationElectric (default)
    pec1: PerfectElectricConductor (default)
    init1: init "Initial Values 1" (default)
    imp1: Impedance "Impedance Boundary Condition 1" (disabled) on no boundaries
    imp2: Impedance "Impedance Boundary Condition 2" on boundaries 1-6 | Es = {1, 0, 0}
    sctr1: Scattering "Scattering Boundary Condition 1" (disabled) on no boundaries
    lport1: LumpedPort (disabled) on no boundaries
      PortType = UserDefined
      PortExcitation = off
      Zref = 180[ohm]
      hPort = 0.003702872474
      wPort = pi*.005
      ahPort = {1, 0, 0}
    ffd1: FarFieldDomain (disabled) on domains 1
      ffc1: FarFieldCalculation on no boundaries

Mesh
  mesh1 "Mesh 1"
    size: MeshSizeDefault | hmax = 0.59960; hmin = 0.017990; hcurve = 0.6; hnarrow = 0.5; hgrad = 1.5; custom = on
    size1: Size (disabled) on no boundaries
      hmax = 0.0031240
      hmin = 9.3720E-5
      hcurve = 0.6
      hnarrow = 0.5
      hgrad = 1.5
      custom = on
    map1: Map "Mapped 1" on no boundaries
      dis1: Distribution on no edges
    map2: Map "Mapped 2" on no boundaries
      dis1: Distribution on no edges | numelem = 4
    map3: Map "Mapped 3" on no boundaries
      dis1: Distribution on no edges | numelem = 3
    conv1: Convert on no boundaries
    ftri1: FreeTri "Free Triangular 1" on no boundaries | yscale = 2; zscale = 2
      size1: Size on no boundaries
    ftet1: FreeTet "Free Tetrahedral 1" on domains 1 | smoothcontrol = off; optcurved = on
      size1: Size on domains 1 | hmin = 0.0658

Studies
  std1 "Study 1"
    freq: Frequency "Frequency Domain" | punit = MHz; plist = range(274[MHz],(276[MHz]-(274[MHz]))/49,276[MHz])

Solver configurations
  sol1 "Solution 1" (study std1)
    v1: Variables "Dependent Variables 1"
    s1: Stationary "Stationary Solver 1" | stol = 0.01
      p1: Parametric
        pname = freq
        plistarr = range(274[MHz],(276[MHz]-(274[MHz]))/49,276[MHz])
        punit = MHz
        pcontinuationmode = no
      fc1: FullyCoupled | linsolver = i1
      i1: Iterative "Suggested Iterative Solver (emw)" | itrestart = 300; prefuntype = right
        mg1: Multigrid | iter = 1

Datasets
  dset1: Solution | solution = sol1
  mesh1: Mesh | mesh = mesh1

Derived values
  gev1: EvalGlobal "S-Parameter (emw)" | data = dset1; table = tbl1; expr = emw.S11dB
  gev2: EvalGlobal "Lumped Port Voltage" | data = dset1; table = tbl2; expr = emw.Vport_1; descr = Lumped port voltage

Tables
  tbl1: Table "Table 1: S-Parameter"
    freq (GHz) | S11 (1)
    0.075 | -1.7335
  tbl2: Table "Table 2: Lumped Port Voltage"
    // Global Evaluation 2 (emw.Vport_1)
    freq (MHz) | Lumped port voltage (V)
    25 | -4.42557e-05-0.000101546i
    25.5 | -4.85357e-05-0.000103899i
    26 | -5.23732e-05-0.000105974i
    26.5 | -5.61792e-05-0.000107589i
    27 | -5.99934e-05-0.000108899i
    27.5 | -6.30873e-05-0.000109476i
    28 | -6.65794e-05-0.000109904i
    28.5 | -6.94758e-05-0.000108702i
    29 | -7.34721e-05-0.000109788i
    29.5 | -7.62761e-05-0.000108987i
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
Plots
  pg1: PlotGroup3D "Electric Field (emw)" | data = dset1
    mslc1: Multislice | expr = emw.normE
  pg2: PlotGroup3D "3D Plot Group 2: Mesh quality" | data = mesh1
    mesh1: Mesh | meshdomain = volume; elemtype2 = quad
  pg3: PlotGroup3D "3D Plot Group 3: Electric field" | data = dset1
    slc1: Slice | expr = emw.normE; quickznumber = 1; quickxnumber = 1; quickynumber = 3; shift = 1.524
    arwv1: ArrowVolume | expr = {emw.Ex, emw.Ey, emw.Ez}; arrowlength = normalized
  pg4: PlotGroup3D "3D Plot Group 3: Current Density" | data = dset1
    slc1: Slice
      expr = emw.normJ
      descr = Current density norm
      quickplane = zx
      quickznumber = 1
      quickxnumber = 1
      quickynumber = 1
      shift = -0.05
    arwv1: ArrowVolume | expr = {emw.Jx, emw.Jy, emw.Jz}; descr = Current density; arrowlength = normalized
    arws1: ArrowSurface (disabled) | expr = {emw.Ex, emw.Ey, emw.Ez}; arrowlength = normalized
      sel1: Selection
  pg6: PlotGroup1D "1D Plot Group 6: Lumped port voltage" | data = none
    tblp1: Table "Table Graph 1" | table = tbl2
  pg7: PlotGroup3D "3D Plot Group 7" | data = dset1
    rp1: RadiationPattern | expr = emw.normEfar

Exports
  tbl1: Table
    table = tbl2
    filename = C:\Users\phys-simulation\Desktop\DarkRadioSimulations\REU_19\bicon_room_lowres\bicon_room_lowres_LPV_551pts_redo.txt