// COMSOL Multiphysics 5.4.0.388 model "lpInBox.mph"
// Outline of the model tree
// Components: comp1 "Component 1", comp2 "Component 2"

Parameters
  Length = .65[m]
  Radius = 3[cm]
  L0 = 4*Length
  f0 = c_const/L0
  tickleX = 0 [m]
  tickleY = 0 [m]
  tickleZ = 1.65[m]
  tickleRad = 2[mm]
  tickleGap = tickleRad
  tickleArm = .1[m]

Selections
  sel1: Explicit "Antenna Boundaries" [comp1] on no boundaries
  sel2: Explicit "Feed Point" [comp1] on no boundaries
  sel3: Explicit "air" [comp1] on domains 1
  sel4: Explicit "tickler feed" [comp1] on boundaries 11-14
  sel5: Explicit "Antenna Boundaries" [comp2] on no boundaries
  sel6: Explicit "Feed Point" [comp2] on no boundaries
  sel7: Explicit "air" [comp2] on domains 1
  sel8: Explicit "tickler" [comp2] on no domains

Coordinate systems
  pml1: PML "Perfectly Matched Layer 1" [geom1] on no domains | ScalingType = Spherical

Geometry
  geom1 "Geometry 1" [comp1] (3D, length unit m)
    cyl1: Cylinder (disabled) | pos = {Radius/2, 0, 0}; axistype = x; r = Radius; h = Length
    mir1: Mirror (disabled) | input = cyl1; keep = on; axis = {1, 0, 0}
    cyl2: Cylinder (disabled) | pos = {-Radius/2, 0, 0}; axistype = x; r = Radius; h = Radius
    cyl3: Cylinder | pos = {tickleGap/2, tickleY, tickleZ}; axistype = x; r = .002; h = .1
    mir2: Mirror | input = cyl3; keep = on; axis = {1, 0, 0}
    cyl4: Cylinder | pos = {-tickleGap/2, tickleY, tickleZ}; axistype = x; r = tickleRad; h = tickleGap
    blk1: Block | base = center; size = {10[ft], 8[ft], 12[ft]}
    dif1: Difference | input = blk1; input2 = cyl1, cyl2, cyl3, cyl4, mir1, mir2
    fin: Finalize "Form Union"
  geom2 "Geometry 2" [comp2] (3D, length unit m)
    cyl1: Cylinder (disabled) | pos = {Radius/2, 0, 0}; axistype = x; r = Radius; h = Length
    mir1: Mirror (disabled) | keep = on; axis = {1, 0, 0}
    cyl2: Cylinder (disabled) | pos = {-Radius/2, 0, 0}; axistype = x; r = Radius; h = Radius
    cyl3: Cylinder | pos = {.002/2, 0, 1.6}; axistype = x; r = .002; h = .1
    mir2: Mirror | input = cyl3; keep = on; axis = {1, 0, 0}
    cyl4: Cylinder | pos = {-.001, 0, 1.6}; axistype = x; r = .002; h = .002
    blk1: Block | base = center; size = {10[ft], 8[ft], 12[ft]}
    dif1: Difference | input = blk1; input2 = cyl3, cyl4, mir2
    fin: Finalize "Form Union"

Materials
  mat1: Common "Air" [comp1] on all domains
    def "Basic"
      thermalexpansioncoefficient = alpha_p(pA,T)
      molarmass = 0.02897
      bulkviscosity = muB(T)
      relpermeability = 1
      relpermittivity = 1
      dynamicviscosity = eta(T)
      ratioofspecificheat = 1.4
      electricconductivity = 0[S/m]
      heatcapacity = Cp(T)
      density = rho(pA,T)
      thermalconductivity = k(T)
      soundspeed = cs(T)
      eta: Piecewise | arg = T; pieces = {200.0, 1600.0, -8.38278E-7+8.35717342E-8*T^1-7.69429583E-11*T^2+4.6437266E-14*T^3-1.06585607E-17*T^4}; argunit = K; fununit = Pa*s
      Cp: Piecewise | arg = T; pieces = {200.0, 1600.0, 1047.63657-0.372589265*T^1+9.45304214E-4*T^2-6.02409443E-7*T^3+1.2858961E-10*T^4}; argunit = K; fununit = J/(kg*K)
      rho: Analytic | expr = pA*0.02897/R_const[K*mol/J]/T; args = {pA, T}; dermethod = manual; argders = {{pA, d(pA*0.02897/R_const/T,pA)}, {T, d(pA*0.02897/R_const/T,T)}}; argunit = Pa,K; fununit = kg/m^3
      k: Piecewise | arg = T; pieces = {200.0, 1600.0, -0.00227583562+1.15480022E-4*T^1-7.90252856E-8*T^2+4.11702505E-11*T^3-7.43864331E-15*T^4}; argunit = K; fununit = W/(m*K)
      cs: Analytic | expr = sqrt(1.4*R_const[K*mol/J]/0.02897*T); args = T; dermethod = manual; argunit = K; fununit = m/s
      an1: Analytic | funcname = alpha_p; expr = -1/rho(pA,T)*d(rho(pA,T),T); args = {pA, T}; argunit = Pa,K; fununit = 1/K
      an2: Analytic "Analytic 2a" | funcname = muB; expr = 0.6*eta(T); args = T; argunit = K; fununit = Pa*s
    RefractiveIndex
      n = 1
      ki = 0
    NonlinearModel
      BA = (def.gamma+1)/2
  mat2: Common "Aluminum" [comp1] on boundaries 6-19
    def "Basic"
      relpermeability = 1
      heatcapacity = 900[J/(kg*K)]
      thermalconductivity = 238[W/(m*K)]
      electricconductivity = 3.774e7[S/m]
      relpermittivity = 1
      thermalexpansioncoefficient = 23e-6[1/K]
      density = 2700[kg/m^3]
    Enu "Young's modulus and Poisson's ratio"
      youngsmodulus = 70e9[Pa]
      poissonsratio = 0.33
    Murnaghan
      l = -2.5e11[Pa]
      m = -3.3e11[Pa]
      n = -3.5e11[Pa]
    Lame "Lamé parameters"
      lambLame = 5.1e10[Pa]
      muLame = 2.6e10[Pa]
  mat3: Common "Air" [comp2] on all domains
    // same settings as mat1
  mat4: Common "Aluminum" [comp2] on boundaries 6-19
    // same settings as mat2

Physics
  emw: ElectromagneticWaves "Electromagnetic Waves, Frequency Domain" [geom1] on no domains
    dependent variable E = {Ex, Ey, Ez}
    MeshControl.EnableMeshControl = 1
    MeshControl.SizeControlParameter = Wavelength
    MeshControl.PhysicsControlledMeshMinimumWavelength = L0
    wee1: WaveEquationElectric (default)
    pec1: PerfectElectricConductor (default)
    init1: init "Initial Values 1" (default)
    imp1: Impedance "Impedance Boundary Condition 1" on boundaries 6-19
    lport1: LumpedPort (disabled) on no boundaries
      PortType = UserDefined
      PortExcitation = off
      hPort = Radius
      wPort = 2*pi*Radius
      ahPort = {0, 0, 1}
    lport2: LumpedPort "tickle port" on selection sel4
      PortType = UserDefined
      PortExcitation = on
      hPort = .002
      wPort = 2*pi*.002
      ahPort = {1, 0, 0}
    tpn1: TwoPortNetwork on no boundaries
      tpnp1: TwoPortNetworkPort1 on no boundaries
      tpnp2: TwoPortNetworkPort2 on no boundaries
  emw2: ElectromagneticWaves "Electromagnetic Waves, Frequency Domain" [geom2] on all domains
    dependent variable E = {Ex, Ey, Ez}
    wee1: WaveEquationElectric (default)
      DisplacementFieldModel = RelativePermittivity
      ConstitutiveRelationH = RelativePermeability
    pec1: PerfectElectricConductor (default) | constraintType = symmetricConstraint; constraintMethod = elemental
    init1: init "Initial Values 1" (default)
    imp1: Impedance "Impedance Boundary Condition 1" on boundaries 6-19 | DisplacementFieldModel = RelativePermittivity
    lport2: LumpedPort "tickle port" (disabled) on boundaries 11-14
      PortName = 2
      PortType = UserDefined
      PortExcitation = on
      V0 = 1[V]
      Zref = 50[ohm]
      I0 = 1[A]
      TerminalType = Cable
      hPort = .002
      wPort = 2*pi*.002
      ahPort = {1, 0, 0}

Mesh
  mesh1 "Mesh 1" [geom1] (physics-controlled)
  mesh2 "Mesh 1" [geom2] (physics-controlled)

Studies
  std1 "Study 1"
    param: Parametric "Parametric Sweep" (disabled) | pname = tickleZ; plistarr = 1.65, 1, .3; punit = m
    freq: Frequency "Frequency Domain" | punit = MHz; plist = range(30,270/249,300); solve for = {emw}; useparam = on
  std2 "Study 2"
    freq: Frequency "Frequency Domain"
      punit = GHz
      plist = .1[GHz]
      solve for = {emw2}
      mesh = {geom1, nomesh, geom2, mesh2}

Solver configurations
  sol1 "Solution 1" (study std1)
    v1: Variables "Dependent Variables 1"
    s1: Stationary "Stationary Solver 1" | stol = 0.01
      p1: Parametric | pname = freq; plistarr = range(30,270/249,300); punit = MHz; pcontinuationmode = no
      fc1: FullyCoupled | linsolver = i1
      i1: Iterative "Suggested Iterative Solver (emw)" | itrestart = 300; prefuntype = right
        mg1: Multigrid | iter = 1
  sol2 "Parametric Solutions 1" (study std1)
  sol6 "Solution 6" (study std2)

Datasets
  dset1: Solution | solution = sol1
  cpt1: CutPoint3D | data = dset1; pointx = 0; pointy = 0; pointz = 0
  dset2: Solution | solution = sol2
  dset3: Solution | solution = sol2
  dset4: Solution | solution = sol6
  dset5: Solution | solution = sol6

Derived values
  gev1: EvalGlobal "S-Parameter (emw)" | data = dset1; table = tbl1; expr = emw.S11dB
  int1: IntSurface "Surface Integration 1"
    data = dset1
    table = tbl4
    expr = emw.Qsrh
    unit = W
    descr = Surface resistive losses
  gev2: EvalGlobal "Global Evaluation 2" | data = dset1; table = tbl5; expr = emw.Pport_1; descr = Lumped port power
  gev3: EvalGlobal "AF" | data = dset2; table = tbl6; tablecols = level2; expr = 20*log10(abs(1/emw.Vport_1))
  pev1: EvalPoint "Ex center" | data = cpt1; table = tbl7; expr = 20*log10(abs(emw.Ex))
  pev2: EvalPoint "E norm center" | data = cpt1; table = tbl10; expr = 20*log10(abs(emw.normE))

Tables
  tbl1: Table
    freq (GHz) | S11 (1)
    0.0749481 | -6.38771
  rp1: Table "Directivity"
    // Radiation pattern
    θ (deg) | φ (deg) | Directivity | Directivity (dB)
    90 | 296 | 1.69485 | 2.29132
  tbl5: Table
    // Global Evaluation 2 (emw.Pport_1)
    freq (GHz) | Lumped port power (W) | Lumped port power (W)
    0.0749481 | 0.00770168 | 0.00770168
  tbl6: Table
    // Global Evaluation 3 (abs(emw.Vport_1))
    freq (MHz) | tickleZ=1.65, 20*log10(abs(1/emw.Vport_1)) | tickleZ=1, 20*log10(abs(1/emw.Vport_1)) | tickleZ=0.3, 20*log10(abs(1/emw.Vport_1))
    30 | 198.107 | 185.717 | 162.777
    35.5102 | 194.462 | 182.568 | 159.827
    41.0204 | 191.177 | 179.803 | 157.304
    46.5306 | 188.009 | 177.393 | 155.108
    52.0408 | 184.812 | 175.399 | 153.195
    57.551 | 181.361 | 173.871 | 151.592
    63.0612 | 176.435 | 175.763 | 150.664
    68.5714 | 164.888 | 154.605 | 145.769
    74.0816 | 189.23 | 158.866 | 144.605
    79.5918 | 175.033 | 157.839 | 143.373
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  tbl7: Table "Ex table"
    // Point Evaluation 1 ()
    freq (MHz) | 20*log10(abs(emw.Ex)), Point: (0, 0, 0)
    30 | -79.5372
    31.0843 | -80.0553
    32.1687 | -80.6561
    33.253 | -81.3602
    34.3373 | -82.1972
    35.4217 | -83.2107
    36.506 | -84.4693
    37.5904 | -86.089
    38.6747 | -88.2907
    39.759 | -91.5841
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  tbl10: Table
    // E norm center (20*log10(abs(emw.normE)))
    freq (MHz) | 20*log10(abs(emw.normE)), Point: (0, 0, 0)
    30 | -80.7228
    31.0843 | -81.1805
    32.1687 | -81.707
    33.253 | -82.3182
    34.3373 | -83.0358
    35.4217 | -83.891
    36.506 | -84.9295
    37.5904 | -86.2236
    38.6747 | -87.8955
    39.759 | -90.1775
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
Plots
  pg1: PlotGroup3D "Electric Field (emw)" | data = dset1
    mslc1: Multislice | expr = emw.normE
  pg2: PolarGroup "2D Far Field (emw)" | data = dset1
    rp1: RadiationPattern | expr = emw.normEfar; phidisc = 180; refdir = {0, 1, 0}
  pg4: PlotGroup3D "3D Plot Group 4" | data = dset1
    surf1: Surface | expr = emw.Qsrh; descr = Surface resistive losses
  pg5: PlotGroup1D "1D Plot Group 5" | data = none
    tblp1: Table "Table Graph 1" | table = tbl6; xaxisdata = auto
  pg6: PlotGroup1D "1D Plot Group 6" | data = none
    tblp1: Table "Table Graph 1" | table = tbl7
  pg8: PlotGroup3D "Electric Field (emw) 1" | data = dset2
    mslc1: Multislice | expr = emw.normE
  pg9: PlotGroup1D "S-Parameter (emw)" | data = dset2; ylabel = S-parameter (dB)
    glob1: Global | expr = emw.S22dB; unit = 1; descr = S22; xdata = expr; xdataexpr = tickleZ
  pg10: SmithGroup "Smith Plot (emw)" | data = dset2
    rgr1: ReflectionGraph
      expr = emw.S22
      unit = 1
      descr = S22
      title = Reflection Graph: S-parameter, Color: Frequency (GHz)
      col1: Color "Color Expression 1" | expr = emw.freq/1e9
  pg11: PlotGroup1D "1D Plot Group 11" | data = none
    tblp1: Table "Table Graph 1" | table = tbl10