// COMSOL Multiphysics 5.4.0.388 model "lpPlayground.mph"
// Outline of the model tree

Parameters
  Length = 1[m]
  Radius = 2[cm]
  L0 = 4*Length
  f0 = c_const/L0

Selections
  sel1: Explicit "Antenna Boundaries" on boundaries 13, 14, 18, 19, 28, 30, 39, 41
  sel2: Explicit "Feed Point" on boundaries 16, 17, 29, 40
  sel3: Explicit "air" on domains 5

Coordinate systems
  pml1: PML "Perfectly Matched Layer 1" on domains 1-4, 6-9 | ScalingType = Spherical

Geometry
  geom1 "Geometry 1" (3D, length unit m)
    cyl1: Cylinder | pos = {0, 0, Radius/2}; r = Radius; h = Length
    mir1: Mirror | input = cyl1; keep = on
    cyl2: Cylinder | pos = {0, 0, -Radius/2}; r = Radius; h = Radius
    sph1: Sphere | layername = Layer 1; layer = 0.2; r = L0
    dif1: Difference | input = sph1; input2 = cyl1, cyl2, mir1
    fin: Finalize "Form Union"

Materials
  mat1: Common "Air" on all domains
    def "Basic"
      thermalexpansioncoefficient = alpha_p(pA,T)
      molarmass = 0.02897
      bulkviscosity = muB(T)
      relpermeability = 1
      relpermittivity = 1
      dynamicviscosity = eta(T)
      ratioofspecificheat = 1.4
      electricconductivity = 0[S/m]
      heatcapacity = Cp(T)
      density = rho(pA,T)
      thermalconductivity = k(T)
      soundspeed = cs(T)
      eta: Piecewise | arg = T; pieces = {200.0, 1600.0, -8.38278E-7+8.35717342E-8*T^1-7.69429583E-11*T^2+4.6437266E-14*T^3-1.06585607E-17*T^4}; argunit = K; fununit = Pa*s
      Cp: Piecewise | arg = T; pieces = {200.0, 1600.0, 1047.63657-0.372589265*T^1+9.45304214E-4*T^2-6.02409443E-7*T^3+1.2858961E-10*T^4}; argunit = K; fununit = J/(kg*K)
      rho: Analytic | expr = pA*0.02897/R_const[K*mol/J]/T; args = {pA, T}; dermethod = manual; argders = {{pA, d(pA*0.02897/R_const/T,pA)}, {T, d(pA*0.02897/R_const/T,T)}}; argunit = Pa,K; fununit = kg/m^3
      k: Piecewise | arg = T; pieces = {200.0, 1600.0, -0.00227583562+1.15480022E-4*T^1-7.90252856E-8*T^2+4.11702505E-11*T^3-7.43864331E-15*T^4}; argunit = K; fununit = W/(m*K)
      cs: Analytic | expr = sqrt(1.4*R_const[K*mol/J]/0.02897*T); args = T; dermethod = manual; argunit = K; fununit = m/s
      an1: Analytic | funcname = alpha_p; expr = -1/rho(pA,T)*d(rho(pA,T),T); args = {pA, T}; argunit = Pa,K; fununit = 1/K
      an2: Analytic "Analytic 2a" | funcname = muB; expr = 0.6*eta(T); args = T; argunit = K; fununit = Pa*s
    RefractiveIndex
      n = 1
      ki = 0
    NonlinearModel
      BA = (def.gamma+1)/2
  mat2: Common "Aluminum" on boundaries 6, 13, 14, 18, 19, 28, 30, 39, 41
    def "Basic"
      relpermeability = 1
      heatcapacity = 900[J/(kg*K)]
      thermalconductivity = 238[W/(m*K)]
      electricconductivity = 3.774e7[S/m]
      relpermittivity = 1
      thermalexpansioncoefficient = 23e-6[1/K]
      density = 2700[kg/m^3]
    Enu "Young's modulus and Poisson's ratio"
      youngsmodulus = 70e9[Pa]
      poissonsratio = 0.33
    Murnaghan
      l = -2.5e11[Pa]
      m = -3.3e11[Pa]
      n = -3.5e11[Pa]
    Lame "Lamé parameters"
      lambLame = 5.1e10[Pa]
      muLame = 2.6e10[Pa]

Physics
  emw: ElectromagneticWaves "Electromagnetic Waves, Frequency Domain" on all domains
    dependent variable E = {Ex, Ey, Ez}
    BackgroundField.SolveFor = fullField
    BackgroundField.WaveType = userdef
    BackgroundField.anglePitch = pi/2
    MeshControl.EnableMeshControl = 1
    MeshControl.SizeControlParameter = Wavelength
    MeshControl.PhysicsControlledMeshMinimumWavelength = L0
    wee1: WaveEquationElectric (default)
    pec1: PerfectElectricConductor (default)
    init1: init "Initial Values 1" (default)
    imp1: Impedance "Impedance Boundary Condition 1" on selection sel1
    sctr1: Scattering "Scattering Boundary Condition 1" on boundaries 5-8, 24, 25, 33, 38 | IncidentField = EField
    lport1: LumpedPort on selection sel2
      PortType = UserDefined
      PortExcitation = on
      hPort = Radius
      wPort = 2*pi*Radius
      ahPort = {0, 0, 1}
    ffd1: FarFieldDomain on domains 5
      ffc1: FarFieldCalculation on boundaries 9-12, 26, 27, 34, 37
    lelement1: LumpedElement on no boundaries | PortType = UserDefined
    port1: Port on no boundaries

Mesh
  mesh1 "Mesh 1" (physics-controlled)

Studies
  std1 "Study 1"
    freq: Frequency "Frequency Domain" | punit = MHz; plist = 75,85,100

Solver configurations
  sol1 "Solution 1" (study std1)
    v1: Variables "Dependent Variables 1"
    s1: Stationary "Stationary Solver 1" | stol = 0.01
      p1: Parametric | pname = freq; plistarr = 75,85,100; punit = MHz; pcontinuationmode = no
      fc1: FullyCoupled | linsolver = i1
      i1: Iterative "Suggested Iterative Solver (emw)" | itrestart = 300; prefuntype = right
        mg1: Multigrid | iter = 1

Datasets
  dset1: Solution on selection sel3 | solution = sol1

Derived values
  gev1: EvalGlobal "S-Parameter (emw)" | data = dset1; table = tbl1; expr = emw.S11dB
  int1: IntSurface "Surface Integration 1" on boundaries 6, 13, 14, 18, 19, 28, 30, 39, 41
    data = dset1
    table = tbl4
    expr = emw.Qsrh
    unit = W
    descr = Surface resistive losses
  gev2: EvalGlobal "Global Evaluation 2"
    data = dset1
    table = tbl5
    expr = emw.Pport_1
    unit = W
    descr = Lumped port power
  gev3: EvalGlobal "lpv" | data = dset1; table = tbl7; expr = {, 20*log10(abs(emw.Vport_1))}
  gev4: EvalGlobal "Global Evaluation 4"
    data = dset1
    table = tbl8
    expr = emw.VSWR_1
    unit = 1
    descr = Voltage standing wave ratio

Tables
  tbl1: Table
    freq (GHz) | S11 (1)
    0.0749481 | -6.38771
  rp1: Table "Directivity"
    // Radiation pattern
    θ (deg) | φ (deg) | Directivity | Directivity (dB)
    90 | 296 | 1.69485 | 2.29132
  tbl5: Table
    // Global Evaluation 2 (emw.Pport_1)
    freq (GHz) | Lumped port power (W) | Lumped port power (W)
    0.0749481 | 0.00770168 | 0.00770168
  tbl7: Table
    // Global Evaluation 3 (, emw.Vport_1)
    freq (MHz) | 20*log10(abs(emw.Vport_1))
    75 | 3.18748
    85 | 4.54633
    100 | 5.21329
  tbl8: Table
    // Global Evaluation 4 (emw.VSWR_1)
    freq (MHz) | Voltage standing wave ratio (1)
    75 | 2.80464
    85 | 5.72834
    100 | 10.3845

Plots
  pg1: PlotGroup3D "Electric Field (emw)" | data = dset1
    mslc1: Multislice | expr = emw.normE
    arwv1: ArrowVolume | expr = {emw.Ex, emw.Ey, emw.Ez}; xnumber = 20; ynumber = 20; znumber = 1
    arwv2: ArrowVolume | expr = {emw.Hx, emw.Hy, emw.Hz}; descr = Magnetic field; xnumber = 20; ynumber = 20; znumber = 1
    arwv3: ArrowVolume
      expr = {emw.Poavx, emw.Poavy, emw.Poavz}
      descr = Power flow, time average
      xnumber = 20
      ynumber = 20
      znumber = 1
  pg2: PolarGroup "2D Far Field (emw)" | data = dset1
    rp1: RadiationPattern | expr = emw.normEfar; phidisc = 180; refdir = {0, 1, 0}
  pg3: PlotGroup3D "3D Far Field (emw)" | data = dset1
    rp1: RadiationPattern | expr = emw.normEfar; thetadisc = 45; phidisc = 45; directivity = on; table = rp1
  pg4: PlotGroup3D "3D Plot Group 4" | data = dset1
    surf1: Surface | expr = emw.Qsrh; descr = Surface resistive losses
  pg5: PlotGroup1D "1D Plot Group 5" | data = none
    tblp1: Table "Table Graph 1" | table = tbl7