// COMSOL Multiphysics 5.6.0.401 model "biconRoom_Q_4.12.22.mph"
// Outline of the model tree

Parameters
  Radius = .0025[m]

Selections
  sel1: Explicit "Antenna Boundaries" on boundaries 6-57, 62-113
  sel2: Explicit "Feed Point" on boundaries 58-61

Geometry
  geom1 "Geometry 1" (3D, length unit m)
    imp1: Import
      type = cad
      filename = C:\Users\phys-simulation\Desktop\DarkRadioSimulations\3D Models\Bicon Antenna\bicon_arm_no_trans_line.ipt
      knit = surface
    mov1: Move | input = imp1; displx = .044018772; disply = 0; displz = 0
    mir1: Mirror | input = mov1; keep = on; axis = {1, 0, 0}
    cyl1: Cylinder | pos = {-(0.004/2), 0, 0}; axistype = x; r = Radius; h = 0.004
    ext1: Extrude
      extrudefrom = faces
      inputface = mir1(1) boundaries 1
      specify = vertices
      distance = .015
      vertex = cyl1(1) points 7
    ext2: Extrude
      extrudefrom = faces
      inputface = mov1(1) boundaries 1
      specify = vertices
      distance = 1
      vertex = cyl1(1) points 2
    blk1: Block | base = center; size = {3.048, 2.4384, 3.6576}
    mov2: Move | input = blk1
    dif1: Difference | input = mov2; input2 = cyl1, ext1, ext2
    fin: Finalize "Form Union"

Materials
  mat1: Common "Air" on all domains
    def "Basic"
      thermalexpansioncoefficient = alpha_p(pA,T)
      molarmass = 0.02897
      bulkviscosity = muB(T)
      relpermeability = 1
      relpermittivity = 1
      dynamicviscosity = eta(T)
      ratioofspecificheat = 1.4
      electricconductivity = 0[S/m]
      heatcapacity = Cp(T)
      density = rho(pA,T)
      thermalconductivity = k(T)
      soundspeed = cs(T)
      eta: Piecewise | arg = T; pieces = {200.0, 1600.0, -8.38278E-7+8.35717342E-8*T^1-7.69429583E-11*T^2+4.6437266E-14*T^3-1.06585607E-17*T^4}; argunit = K; fununit = Pa*s
      Cp: Piecewise | arg = T; pieces = {200.0, 1600.0, 1047.63657-0.372589265*T^1+9.45304214E-4*T^2-6.02409443E-7*T^3+1.2858961E-10*T^4}; argunit = K; fununit = J/(kg*K)
      rho: Analytic | expr = pA*0.02897/R_const[K*mol/J]/T; args = {pA, T}; dermethod = manual; argders = {{pA, d(pA*0.02897/R_const/T,pA)}, {T, d(pA*0.02897/R_const/T,T)}}; argunit = Pa,K; fununit = kg/m^3
      k: Piecewise | arg = T; pieces = {200.0, 1600.0, -0.00227583562+1.15480022E-4*T^1-7.90252856E-8*T^2+4.11702505E-11*T^3-7.43864331E-15*T^4}; argunit = K; fununit = W/(m*K)
      cs: Analytic | expr = sqrt(1.4*R_const[K*mol/J]/0.02897*T); args = T; dermethod = manual; argunit = K; fununit = m/s
      an1: Analytic | funcname = alpha_p; expr = -1/rho(pA,T)*d(rho(pA,T),T); args = {pA, T}; argunit = Pa,K; fununit = 1/K
      an2: Analytic "Analytic 2a" | funcname = muB; expr = 0.6*eta(T); args = T; argunit = K; fununit = Pa*s
    RefractiveIndex
      n = 1
      ki = 0
    NonlinearModel
      BA = (def.gamma+1)/2
  mat2: Common "Aluminum" on selection sel1
    def "Basic"
      relpermeability = 1
      heatcapacity = 900[J/(kg*K)]
      thermalconductivity = 238[W/(m*K)]
      electricconductivity = 3.56e7[S/m]
      relpermittivity = 1
      thermalexpansioncoefficient = 23e-6[1/K]
      density = 2700[kg/m^3]
    Enu "Young's modulus and Poisson's ratio"
      youngsmodulus = 70e9[Pa]
      poissonsratio = 0.33
    Murnaghan
      l = -2.5e11[Pa]
      m = -3.3e11[Pa]
      n = -3.5e11[Pa]
    Lame "Lamé parameters"
      lambLame = 5.1e10[Pa]
      muLame = 2.6e10[Pa]
  mat3: Common "Structural steel" on boundaries 1-5, 114
    def "Basic"
      relpermeability = 1000
      heatcapacity = 475[J/(kg*K)]
      thermalconductivity = 44.5[W/(m*K)]
      electricconductivity = 10e6[S/m]
      relpermittivity = 1
      thermalexpansioncoefficient = 12.3e-6[1/K]
      density = 7850[kg/m^3]
    Enu "Young's modulus and Poisson's ratio"
      youngsmodulus = 200e9[Pa]
      poissonsratio = 0.30
    Murnaghan
      l = -3.0e11[Pa]
      m = -6.2e11[Pa]
      n = -7.2e11[Pa]
    Lame "Lamé parameters"
      lambLame = 1.15e11[Pa]
      muLame = 7.69e10[Pa]

Physics
  emw: ElectromagneticWaves "Electromagnetic Waves, Frequency Domain" on all domains
    dependent variable E = {Ex, Ey, Ez}
    BackgroundField.SolveFor = fullField
    BackgroundField.WaveType = LinearPolByAngle
    BackgroundField.anglePitch = pi/2
    MeshControl.SizeControlParameter = Frequency
    MeshControl.PhysicsControlledMeshMaximumFrequency = 300[MHz]
    wee1: WaveEquationElectric (default)
    pec1: PerfectElectricConductor (default)
    init1: init "Initial Values 1" (default)
    lport1: LumpedPort on selection sel2
      PortType = UserDefined
      PortExcitation = off
      Zref = 180[ohm]
      hPort = 0.004
      wPort = 2*pi*Radius
      ahPort = {1, 0, 0}
    imp1: Impedance "Impedance Boundary Condition 1" on selection sel1
    imp2: Impedance "Impedance Boundary Condition 2" on boundaries 1-5, 114 | Es = {1, 0, 0}

Mesh
  mesh1 "Mesh 1" (physics-controlled)

Studies
  std1 "Study 1"
    freq: Frequency "Frequency Domain" | punit = MHz; plist = range(118,1.11111111111,128)
  std2 "Study 2"
    eig: Eigenfrequency | neigs = 10; eigunit = MHz; shift = 75[MHz]; conrad = 1

Solver configurations
  sol1 "Solution 1" (study std1)
    v1: Variables "Dependent Variables 1"
    s1: Stationary "Stationary Solver 1" | stol = 0.01
      p1: Parametric | pname = freq; plistarr = range(118,1.11111111111,128); punit = MHz; pcontinuationmode = no
      fc1: FullyCoupled | linsolver = i1
      i1: Iterative "Suggested Iterative Solver (emw)" | itrestart = 300; prefuntype = right
        mg1: Multigrid | iter = 1
  sol2 "Solution 2" (study std2)
    v1: Variables "Dependent Variables 1"
    e1: Eigenvalue "Eigenvalue Solver 1" | eigref = 75[MHz]
      d1: Direct "Suggested Direct Solver (emw)" | linsolver = pardiso

Datasets
  dset1: Solution | solution = sol1
  dset2: Solution | solution = sol2
  cpt1: CutPoint3D | data = dset1; method = regulargrid; regulargridx = 6; regulargridy = 6; regulargridz = 6

Derived values
  gev1: EvalGlobal "lpv" | data = dset1; table = tbl9; expr = abs(emw.Vport_1); unit = V; descr = LPV
  gev3: EvalGlobal "lpv dB" | data = dset1; table = tbl4; expr = 20*log10(abs(emw.Vport_1))
  gev2: EvalGlobal "AF" | data = dset1; table = tbl3; expr = 20*log10(1/(abs(emw.Vport_1))); descr = Antenna Factor
  gev4: EvalGlobal "Eigenfrequencies (emw)" | data = dset2; table = tbl6; expr = {emw.freq, emw.Qfactor}; unit = {GHz, }
  gev5: EvalGlobal "Global Evaluation 5" | data = dset2; table = tbl7; expr = emw.Qfactor; descr = Quality factor
  pev1: EvalPoint "Average E"
    data = cpt1
    table = tbl8
    expr = {abs(emw.Ex), abs(emw.Ey), abs(emw.Ez), emw.normE}
    unit = {V/m, V/m, V/m, V/m}
    descr = {, , , Electric field norm}
    summethod = average

Tables
  tbl1: Table
    // Global Evaluation 1 (emw.Vport_1)
    freq (MHz) | LPV (V)
    50 | 1.59546
    50.0901 | 1.59546
    50.1802 | 1.59546
    50.2703 | 1.59546
    50.3604 | 1.59546
    50.4505 | 1.59546
    50.5405 | 1.59546
    50.6306 | 1.59546
    50.7207 | 1.59546
    50.8108 | 1.66
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  tbl3: Table
    // AF (10*log10(1/(abs(emw.Vport_1))))
    freq (MHz) | Antenna Factor
    50 | -4.05771
    50.0901 | -4.05771
    50.1802 | -4.05771
    50.2703 | -4.05771
    50.3604 | -4.05771
    50.4505 | -4.05771
    50.5405 | -4.05771
    50.6306 | -4.05771
    50.7207 | -4.05771
    50.8108 | -4.40215
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  tbl4: Table
    // lpv dB (20*log10(abs(emw.Vport_1)))
    freq (MHz) | 20*log10(abs(emw.Vport_1))
    30 | -5.9973
    30.5411 | -5.9973
    31.0822 | -5.51046
    31.6232 | -5.51046
    32.1643 | -4.99397
    32.7054 | -4.99397
    33.2465 | -4.48274
    33.7876 | -4.48274
    34.3287 | -3.97875
    34.8697 | -3.69297
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  tbl6: Table
    Eigenfrequency (MHz) | Frequency (GHz) | Quality factor (1)
    63.3265+0.0201372i | 0.0633265 | 1572.38
    70.9915+5.28173i | 0.0709915 | 6.72048
    77.8239+0.0221717i | 0.0778239 | 1755.03
    79.5729+54.0221i | 0.0795729 | 0.736485
    88.389+0.0326584i | 0.088389 | 1353.24
    88.7059+0.0317617i | 0.0887059 | 1396.43
    95.5527+0.0242794i | 0.0955527 | 1967.77
    102.748+0.0252824i | 0.102748 | 2032.01
    105.838+0.0267552i | 0.105838 | 1977.89
    112.278+0.0346845i | 0.112278 | 1618.56
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  tbl8: Table
    // Average E
    freq (MHz) | Point average: abs(emw.Ex) (V/m) | Point average: abs(emw.Ey) (V/m) | Point average: abs(emw.Ez) (V/m) | Point average: Electric field norm (V/m)
    50 | 1.69405 | 0.108537 | 0.11459 | 1.71435
    50.0901 | 1.69405 | 0.108537 | 0.11459 | 1.71435
    50.1802 | 1.69405 | 0.108537 | 0.11459 | 1.71435
    50.2703 | 1.69405 | 0.108537 | 0.11459 | 1.71435
    50.3604 | 1.69405 | 0.108537 | 0.11459 | 1.71435
    50.4505 | 1.69405 | 0.108537 | 0.11459 | 1.71435
    50.5405 | 1.69405 | 0.108537 | 0.11459 | 1.71435
    50.6306 | 1.69405 | 0.108537 | 0.11459 | 1.71435
    50.7207 | 1.69405 | 0.108537 | 0.11459 | 1.71435
    50.8108 | 1.72653 | 0.112042 | 0.118195 | 1.74746
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  tbl9: Table
    // lpv
    freq (MHz) | LPV (V) | LPV (V)
    118 | 0.677653 | 2.1359
    119.111 | 0.718716 | 2.01426
    120.222 | 0.759013 | 1.80133
    121.333 | 0.795787 | 1.41658
    122.444 | 0.781381 | 0.706174
    123.556 | 0.902532 | 0.58193
    124.667 | 0.928818 | 2.26288
    125.778 | 0.947545 | 3.44582
    126.889 | 0.933505 | 3.9908
    128 | 0.834892 | 4.26373

Plots
  pg1: PlotGroup3D "Electric Field (emw)" | data = dset1
    mslc1: Multislice | expr = emw.normE
  pg2: PolarGroup "2D Far Field (emw)" | data = dset1
    rp1: RadiationPattern | expr = emw.normEfar; phidisc = 180
  pg3: PlotGroup3D "3D Far Field (emw)" | data = dset1
    rp1: RadiationPattern | expr = emw.normEfar; thetadisc = 45; phidisc = 45; directivity = on
  pg4: PlotGroup1D "1D Plot Group 4" | data = none
    tblp1: Table "Table Graph 1" | table = tbl1
  pg5: PlotGroup1D "1D Plot Group 5" | data = none
    tblp1: Table "Table Graph 1" | table = tbl3
  pg6: PlotGroup1D "1D Plot Group 6" | data = none
    tblp1: Table "Table Graph 1" | table = tbl4
  pg7: PlotGroup3D "Electric Field (emw) 1" | data = dset2
    mslc1: Multislice | expr = emw.normE
  pg8: PlotGroup1D "1D Plot Group 8" | data = none
    tblp1: Table "Table Graph 1" | table = tbl6
  pg9: PlotGroup1D "1D Plot Group 9" | data = none
    tblp1: Table "Table Graph 1" | table = tbl8
  pg10: PlotGroup1D "1D Plot Group 10" | data = none
    tblp1: Table "Table Graph 1" | table = tbl9

Exports
  tbl1: Table "AF" | table = tbl3; filename = C:\Users\phys-simulation\Desktop\Vasco\Bicon\Analysis\bicon4mmAFRerun.txt
  tbl2: Table | table = tbl1; filename = C:\Users\phys-simulation\Desktop\Vasco\biconInBox\analysis\biconInBoxlpv.txt
  data1: Data | data = dset1