// COMSOL Multiphysics 5.6.0.401 model "emptyRoomFreq_itteratePermandCond.mph"
// Outline of the model tree

Parameters
  Radius = .0025[m]
  boxX = 0
  boxY = 0
  boxZ = 0
  boxAxisX = 1
  boxAxisY = 0
  boxAxisZ = 0
  boxTheta = 0  // deg
  perm = 0

Selections
  sel1: Explicit "Antenna Boundaries" on no boundaries
  sel2: Explicit "Feed Point" on no boundaries

Geometry
  geom1 "Geometry 1" (3D, length unit m)
    imp1: Import (disabled)
      type = cad
      filename = C:\Users\phys-simulation\Desktop\DarkRadioSimulations\3D Models\Bicon Antenna\bicon_arm_no_trans_line.ipt
      knit = surface
    mov1: Move (disabled) | input = imp1; displx = .044018772; disply = 0; displz = 0
    mir1: Mirror (disabled) | input = mov1; keep = on; axis = {1, 0, 0}
    cyl1: Cylinder (disabled) | pos = {-(0.004/2), 0, 0}; axistype = x; r = Radius; h = 0.004
    ext1: Extrude (disabled)
      extrudefrom = faces
      inputface = mir1(1) boundaries 1
      specify = vertices
      distance = .015
      vertex = cyl1(1) points 7
    ext2: Extrude (disabled)
      extrudefrom = faces
      inputface = mov1(1) boundaries 1
      specify = vertices
      distance = 1
      vertex = cyl1(1) points 2
    blk1: Block
      pos = {.3, 0, 0}
      rot = 45
      axis = {boxX, 1, 0}
      axistype = cartesian
      base = center
      size = {3.048, 2.4384, 3.6576}
    dif1: Difference (disabled) | input = blk1; input2 = cyl1, ext1, ext2
    fin: Finalize "Form Union"

Materials
  mat1: Common "Air" on all domains
    def "Basic"
      thermalexpansioncoefficient = alpha_p(pA,T)
      molarmass = 0.02897
      bulkviscosity = muB(T)
      relpermeability = 1
      relpermittivity = 1
      dynamicviscosity = eta(T)
      ratioofspecificheat = 1.4
      electricconductivity = 0[S/m]
      heatcapacity = Cp(T)
      density = rho(pA,T)
      thermalconductivity = k(T)
      soundspeed = cs(T)
      eta: Piecewise | arg = T; pieces = {200.0, 1600.0, -8.38278E-7+8.35717342E-8*T^1-7.69429583E-11*T^2+4.6437266E-14*T^3-1.06585607E-17*T^4}; argunit = K; fununit = Pa*s
      Cp: Piecewise | arg = T; pieces = {200.0, 1600.0, 1047.63657-0.372589265*T^1+9.45304214E-4*T^2-6.02409443E-7*T^3+1.2858961E-10*T^4}; argunit = K; fununit = J/(kg*K)
      rho: Analytic | expr = pA*0.02897/R_const[K*mol/J]/T; args = {pA, T}; dermethod = manual; argders = {{pA, d(pA*0.02897/R_const/T,pA)}, {T, d(pA*0.02897/R_const/T,T)}}; argunit = Pa,K; fununit = kg/m^3
      k: Piecewise | arg = T; pieces = {200.0, 1600.0, -0.00227583562+1.15480022E-4*T^1-7.90252856E-8*T^2+4.11702505E-11*T^3-7.43864331E-15*T^4}; argunit = K; fununit = W/(m*K)
      cs: Analytic | expr = sqrt(1.4*R_const[K*mol/J]/0.02897*T); args = T; dermethod = manual; argunit = K; fununit = m/s
      an1: Analytic | funcname = alpha_p; expr = -1/rho(pA,T)*d(rho(pA,T),T); args = {pA, T}; argunit = Pa,K; fununit = 1/K
      an2: Analytic "Analytic 2a" | funcname = muB; expr = 0.6*eta(T); args = T; argunit = K; fununit = Pa*s
    RefractiveIndex
      n = 1
      ki = 0
    NonlinearModel
      BA = (def.gamma+1)/2
  mat2: Common "Aluminum" on selection sel1
    def "Basic"
      relpermeability = 1
      heatcapacity = 900[J/(kg*K)]
      thermalconductivity = 238[W/(m*K)]
      electricconductivity = 3.56e7[S/m]
      relpermittivity = 1
      thermalexpansioncoefficient = 23e-6[1/K]
      density = 2700[kg/m^3]
    Enu "Young's modulus and Poisson's ratio"
      youngsmodulus = 70e9[Pa]
      poissonsratio = 0.33
    Murnaghan
      l = -2.5e11[Pa]
      m = -3.3e11[Pa]
      n = -3.5e11[Pa]
    Lame "Lamé parameters"
      lambLame = 5.1e10[Pa]
      muLame = 2.6e10[Pa]
  mat3: Common "Structural steel" on boundaries 1-6
    def "Basic"
      relpermeability = 1
      heatcapacity = 475[J/(kg*K)]
      thermalconductivity = 44.5[W/(m*K)]
      electricconductivity = perm[S/m]
      relpermittivity = 1
      thermalexpansioncoefficient = 12.3e-6[1/K]
      density = 7850[kg/m^3]
    Enu "Young's modulus and Poisson's ratio"
      youngsmodulus = 200e9[Pa]
      poissonsratio = 0.30
    Murnaghan
      l = -3.0e11[Pa]
      m = -6.2e11[Pa]
      n = -7.2e11[Pa]
    Lame "Lamé parameters"
      lambLame = 1.15e11[Pa]
      muLame = 7.69e10[Pa]

Physics
  emw: ElectromagneticWaves "Electromagnetic Waves, Frequency Domain" on all domains
    dependent variable E = {Ex, Ey, Ez}
    BackgroundField.SolveFor = fullField
    BackgroundField.WaveType = LinearPolByAngle
    BackgroundField.anglePitch = pi/2
    MeshControl.SizeControlParameter = Frequency
    MeshControl.PhysicsControlledMeshMaximumFrequency = 300[MHz]
    wee1: WaveEquationElectric (default)
    pec1: PerfectElectricConductor (default)
    init1: init "Initial Values 1" (default)
    lport1: LumpedPort (disabled) on selection sel2
      PortType = UserDefined
      PortExcitation = off
      Zref = 180[ohm]
      hPort = 0.004
      wPort = 2*pi*Radius
      ahPort = {1, 0, 0}
    imp1: Impedance "Impedance Boundary Condition 1" (disabled) on selection sel1
    imp2: Impedance "Impedance Boundary Condition 2" on boundaries 1-6 | Es = {1, 1, 1}

Mesh
  mesh1 "Mesh 1" (physics-controlled)

Studies
  std1 "Study 1"
    param: Parametric "Parametric Sweep" | pname = perm; plistarr = 1, 10, 100, 1000, 10000, 100000
    freq: Frequency "Frequency Domain" | punit = MHz; plist = 73.7

Solver configurations
  sol1 "Solution 1" (study std1)
    v1: Variables "Dependent Variables 1"
    s1: Stationary "Stationary Solver 1"
      fc1: FullyCoupled | linsolver = i1
      i1: Iterative "Suggested Iterative Solver (emw)" | itrestart = 300; prefuntype = right
        mg1: Multigrid | iter = 1
  sol2 "Parametric Solutions 1" (study std1)

Datasets
  dset1: Solution | solution = sol1
  cpt1: CutPoint3D | data = dset2; method = file; filename = /drBigBoy/darkRadio/comsolSimulations/playground/points.txt
  dset2: Solution | solution = sol2

Derived values
  gev1: EvalGlobal "lpv" | data = dset1; table = tbl1; expr = abs(emw.Vport_1); descr = LPV
  gev3: EvalGlobal "lpv dB" | data = dset1; table = tbl4; expr = 20*log10(abs(emw.Vport_1))
  gev2: EvalGlobal "AF" | data = dset1; table = tbl3; expr = 20*log10(1/(abs(emw.Vport_1))); descr = Antenna Factor
  pev1: EvalPoint "Point Evaluation 1"
    data = cpt1
    table = tbl5
    expr = emw.normE
    unit = V/m
    descr = Electric field norm
    summethod = average

Tables
  tbl1: Table
    // Global Evaluation 1 (emw.Vport_1)
    freq (MHz) | LPV (V)
    30 | 0.507808
    30.5411 | 0.507808
    31.0822 | 0.537449
    31.6232 | 0.537449
    32.1643 | 0.57039
    32.7054 | 0.57039
    33.2465 | 0.605114
    33.7876 | 0.605114
    34.3287 | 0.64148
    34.8697 | 0.64148
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  tbl3: Table
    // AF (10*log10(1/(abs(emw.Vport_1))))
    freq (MHz) | Antenna Factor
    30 | 5.9973
    30.5411 | 5.9973
    31.0822 | 5.51046
    31.6232 | 5.51046
    32.1643 | 4.99397
    32.7054 | 4.99397
    33.2465 | 4.48274
    33.7876 | 4.48274
    34.3287 | 3.97875
    34.8697 | 3.69297
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  tbl4: Table
    // lpv dB (20*log10(abs(emw.Vport_1)))
    freq (MHz) | 20*log10(abs(emw.Vport_1))
    30 | -5.9973
    30.5411 | -5.9973
    31.0822 | -5.51046
    31.6232 | -5.51046
    32.1643 | -4.99397
    32.7054 | -4.99397
    33.2465 | -4.48274
    33.7876 | -4.48274
    34.3287 | -3.97875
    34.8697 | -3.69297
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  tbl5: Table
    // Point Evaluation 1
    perm | Point average: Electric field norm (V/m)
    1 | 27.4416
    10 | 81.25
    100 | 311.181
    1000 | 558.164
    10000 | 456.059
    100000 | 418.925

Plots
  pg1: PlotGroup3D "Electric Field (emw)" | data = dset1
    mslc1: Multislice | expr = emw.normE
  pg2: PolarGroup "2D Far Field (emw)" | data = dset1
    rp1: RadiationPattern | expr = emw.normEfar; phidisc = 180
  pg3: PlotGroup3D "3D Far Field (emw)" | data = dset1
    rp1: RadiationPattern | expr = emw.normEfar; thetadisc = 45; phidisc = 45; directivity = on
  pg4: PlotGroup1D "1D Plot Group 4" | data = none
    tblp1: Table "Table Graph 1" | table = tbl1
  pg5: PlotGroup1D "1D Plot Group 5" | data = none
    tblp1: Table "Table Graph 1" | table = tbl3
  pg6: PlotGroup1D "1D Plot Group 6" | data = none
    tblp1: Table "Table Graph 1" | table = tbl4
  pg7: PlotGroup3D "Electric Field (emw) 1" | data = dset2
    mslc1: Multislice | expr = emw.normE
  pg8: PlotGroup1D "1D Plot Group 8" | data = none
    tblp1: Table "Table Graph 1" | table = tbl5

Exports
  tbl1: Table "AF" | table = tbl3; filename = C:\Users\phys-simulation\Desktop\Vasco\Bicon\Analysis\bicon4mmAFRerun.txt
  tbl2: Table | table = tbl1; filename = C:\Users\phys-simulation\Desktop\Vasco\biconInBox\analysis\biconInBoxlpv.txt