// COMSOL Multiphysics 5.6.0.401 model "emptyRoom_Q_4.12.22.mph"
// Outline of the model tree

Selections
  sel1: Explicit "walls" on boundaries 1-6

Geometry
  geom1 "Geometry 1" (3D, length unit m)
    blk1: Block | base = center; size = {3.048, 2.4384, 3.6576}
    fin: Finalize "Form Union"

Materials
  mat1: Common "Air"
    def "Basic"
      thermalexpansioncoefficient = alpha_p(pA,T)
      molarmass = 0.02897
      bulkviscosity = muB(T)
      relpermeability = 1
      relpermittivity = 1
      dynamicviscosity = eta(T)
      ratioofspecificheat = 1.4
      electricconductivity = 0[S/m]
      heatcapacity = Cp(T)
      density = rho(pA,T)
      thermalconductivity = k(T)
      soundspeed = cs(T)
      eta: Piecewise | arg = T; pieces = {200.0, 1600.0, -8.38278E-7+8.35717342E-8*T^1-7.69429583E-11*T^2+4.6437266E-14*T^3-1.06585607E-17*T^4}; argunit = K; fununit = Pa*s
      Cp: Piecewise | arg = T; pieces = {200.0, 1600.0, 1047.63657-0.372589265*T^1+9.45304214E-4*T^2-6.02409443E-7*T^3+1.2858961E-10*T^4}; argunit = K; fununit = J/(kg*K)
      rho: Analytic | expr = pA*0.02897/R_const[K*mol/J]/T; args = {pA, T}; dermethod = manual; argders = {{pA, d(pA*0.02897/R_const/T,pA)}, {T, d(pA*0.02897/R_const/T,T)}}; argunit = Pa,K; fununit = kg/m^3
      k: Piecewise | arg = T; pieces = {200.0, 1600.0, -0.00227583562+1.15480022E-4*T^1-7.90252856E-8*T^2+4.11702505E-11*T^3-7.43864331E-15*T^4}; argunit = K; fununit = W/(m*K)
      cs: Analytic | expr = sqrt(1.4*R_const[K*mol/J]/0.02897*T); args = T; dermethod = manual; argunit = K; fununit = m/s
      an1: Analytic | funcname = alpha_p; expr = -1/rho(pA,T)*d(rho(pA,T),T); args = {pA, T}; argunit = Pa,K; fununit = 1/K
      an2: Analytic "Analytic 2a" | funcname = muB; expr = 0.6*eta(T); args = T; argunit = K; fununit = Pa*s
    RefractiveIndex
      n = 1
      ki = 0
    NonlinearModel
      BA = (def.gamma+1)/2
  mat2: Common "Air" on all domains
    // same settings as mat1
  mat3: Common "Structural steel" on selection sel1
    def "Basic"
      relpermeability = 1000
      heatcapacity = 475[J/(kg*K)]
      thermalconductivity = 44.5[W/(m*K)]
      electricconductivity = 5.9e6[S/m]
      relpermittivity = 1
      thermalexpansioncoefficient = 12.3e-6[1/K]
      density = 7850[kg/m^3]
    Enu "Young's modulus and Poisson's ratio"
      youngsmodulus = 200e9[Pa]
      poissonsratio = 0.30
    Murnaghan
      l = -3.0e11[Pa]
      m = -6.2e11[Pa]
      n = -7.2e11[Pa]
    Lame "Lamé parameters"
      lambLame = 1.15e11[Pa]
      muLame = 7.69e10[Pa]

Physics
  emw: ElectromagneticWaves "Electromagnetic Waves, Frequency Domain" on all domains
    dependent variable E = {Ex, Ey, Ez}
    BackgroundField.SolveFor = fullField
    BackgroundField.WaveType = LinearPolByAngle
    wee1: WaveEquationElectric (default)
    pec1: PerfectElectricConductor (default)
    init1: init "Initial Values 1" (default)
    imp1: Impedance "Impedance Boundary Condition 1" on selection sel1 | Es = {1, 1, 1}

Mesh
  mesh1 "Mesh 1" (physics-controlled)
    size: MeshSizeDefault | hauto = 9

Studies
  std1 "Study 1"
    freq: Frequency "Frequency Domain" | punit = MHz; plist = range(30,270/499,300)
  std2 "Study 2"
    eig: Eigenfrequency | neigs = 100; eigunit = MHz; shift = 150[MHz]; conrad = 1

Solver configurations
  sol1 "Solution 1" (study std1)
    v1: Variables "Dependent Variables 1"
    s1: Stationary "Stationary Solver 1" | stol = 0.005
      p1: Parametric | pname = freq; plistarr = range(30,270/499,300); punit = MHz; pcontinuationmode = no
      fc1: FullyCoupled | linsolver = i1
      i1: Iterative "Suggested Iterative Solver (emw)" | itrestart = 300; prefuntype = right
        mg1: Multigrid | iter = 1
  sol2 "Solution 2" (study std2)
    v1: Variables "Dependent Variables 1"
    e1: Eigenvalue "Eigenvalue Solver 1" | eigref = 150[MHz]
      d1: Direct "Suggested Direct Solver (emw)" | linsolver = pardiso

Datasets
  dset1: Solution | solution = sol1
  cpt1: CutPoint3D | data = dset1; pointx = 0; pointy = 0; pointz = 0
  cpt2: CutPoint3D | data = dset1; pointx = 0; pointy = 0; pointz = 0.3
  ps1: ParSurface "Parameterized Surface 1"
    data = dset1
    parmax1 = 0.05
    parmax2 = 2*pi
    expry = s1*sin(s2)
    exprz = s1*cos(s2)
  ps2: ParSurface "Parameterized Surface 2"
    data = dset1
    parmax1 = .275
    parmax2 = 2*pi
    expry = s1*sin(s2)
    exprz = s1*cos(s2)
  cpt3: CutPoint3D | data = dset1; pointx = 0; pointy = 1; pointz = 0
  ps3: ParSurface "Parameterized Surface 3"
    data = dset1
    parmax1 = 0.3
    parmax2 = 2*pi
    expry = s1*sin(s2)
    exprz = s1*cos(s2)
  dset2: Solution | solution = sol2

Derived values
  pev1: EvalPoint "Point Evaluation 1"
    data = cpt1
    table = tbl1
    expr = {abs(emw.Ex), emw.normE}
    unit = {V/m, V/m}
    descr = {, Electric field norm}
  pev2: EvalPoint "Point Evaluation 2"
    data = cpt2
    table = tbl2
    expr = emw.normE
    unit = V/m
    descr = Electric field norm
  av1: AvSurface "Surface Average 1" | data = ps1; table = tbl3; expr = emw.normE; unit = V/m; descr = Electric field norm
  av2: AvSurface "Surface Average 2" | data = ps2; table = tbl4; expr = emw.normE; unit = V/m; descr = Electric field norm
  pev3: EvalPoint "Point Evaluation 3" | data = cpt3; table = tbl5; expr = abs(emw.Ez); unit = V/m
  av3: AvSurface "Surface Average 3" | data = ps3; table = tbl6; expr = emw.normE
  gev1: EvalGlobal "Eigenfrequencies (emw)"
    data = dset2
    table = tbl7
    expr = {emw.freq, 10*log10(emw.Qfactor)}
    unit = {MHz, }
  pev4: EvalPoint "Point Evaluation 4" | data = dset2; table = tbl8; expr = emw.damp; unit = Hz; descr = Damping in time

Tables
  tbl1: Table
    // Point Evaluation 1 (emw.normE)
    freq (MHz) | abs(emw.Ex) (V/m), Point: (0, 0, 0) | Electric field norm (V/m), Point: (0, 0, 0)
    30 | 1.28839 | 1.28839
    30.5411 | 1.28839 | 1.28839
    31.0822 | 1.28839 | 1.28839
    31.6232 | 1.28839 | 1.28839
    32.1643 | 1.28839 | 1.28839
    32.7054 | 1.28839 | 1.28839
    33.2465 | 1.28839 | 1.28839
    33.7876 | 1.28839 | 1.28839
    34.3287 | 1.40046 | 1.40046
    34.8697 | 1.40046 | 1.40046
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  tbl2: Table
    // Point Evaluation 2 (emw.normE)
    freq (MHz) | Electric field norm (V/m), Point: (0, 0, 0.3)
    1 | 1.00025
    1.2993 | 1.00025
    1.5986 | 1.00025
    1.8979 | 1.00025
    2.1972 | 1.00025
    2.4965 | 1.00025
    2.7958 | 1.00025
    3.0951 | 1.00025
    3.39439 | 1.00025
    3.69369 | 1.00025
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  tbl3: Table
    // Surface Average 1 (emw.normE)
    freq (MHz) | Electric field norm (V/m)
    1 | 1.00026
    1.2993 | 1.00026
    1.5986 | 1.00026
    1.8979 | 1.00026
    2.1972 | 1.00026
    2.4965 | 1.00026
    2.7958 | 1.00026
    3.0951 | 1.00026
    3.39439 | 1.00026
    3.69369 | 1.00026
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  tbl4: Table
    // Surface Average 2 (emw.normE)
    freq (MHz) | Electric field norm (V/m)
    1 | 1.00025
    1.2993 | 1.00025
    1.5986 | 1.00025
    1.8979 | 1.00025
    2.1972 | 1.00025
    2.4965 | 1.00025
    2.7958 | 1.00025
    3.0951 | 1.00025
    3.39439 | 1.00025
    3.69369 | 1.00025
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  tbl5: Table
    // Point Evaluation 3 (emw.Ex)
    freq (MHz) | abs(emw.normE) (V/m), Point: (0, 1, 0) | abs(emw.Ex) (V/m), Point: (0, 1, 0) | abs(emw.Ey) (V/m), Point: (0, 1, 0) | abs(emw.Ez) (V/m), Point: (0, 1, 0)
    103.959 | 0.0746128 | 0.0746076 | 0.000531006 | 0.000703895
  tbl6: Table
    // Surface Average 3 (emw.normE)
    freq (MHz) | Electric field norm (V/m)
    30 | 1.28247
    30.5411 | 1.28247
    31.0822 | 1.28247
    31.6232 | 1.28247
    32.1643 | 1.28247
    32.7054 | 1.28247
    33.2465 | 1.28247
    33.7876 | 1.28247
    34.3287 | 1.39208
    34.8697 | 1.39208
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  tbl7: Table
    Eigenfrequency (MHz) | Frequency (MHz) | 10*log10(emw.Qfactor) | Frequency (MHz) | 10*log10(emw.Qfactor)
    64.0155+0.000822739i | 64.0155 | 45.8999 | 63.9903 | 30.9004
    73.8812+0.000931408i | 73.8812 | 45.9836 | 73.8527 | 30.9836
    78.7238+0.000933941i | 78.7238 | 46.2476 | 78.6952 | 31.2472
    88.7527+0.00139627i | 88.7527 | 45.0218 | 88.71 | 30.0207
    88.7528+0.00125314i | 88.7528 | 45.4915 | 88.7144 | 30.4921
    95.5867+0.00099387i | 95.5867 | 46.8204 | 95.5563 | 31.8195
    102.457+0.00101785i | 102.457 | 47.0183 | 102.426 | 32.017
    106.555+0.00112079i | 106.555 | 46.7702 | 106.521 | 31.7691
    113.65+0.00154238i | 113.65 | 45.6635 | 113.603 | 30.652
    113.651+0.00140413i | 113.651 | 46.0713 | 113.608 | 31.0822
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  tbl8: Table
    // Point Evaluation 4
    Eigenfrequency (GHz)
    0.236089+2.208e-06i

Plots
  pg1: PlotGroup3D "Electric Field (emw)" | data = dset1
    mslc1: Multislice | expr = emw.normE; descr = Electric field norm
    slc1: Slice (disabled) | expr = emw.normE
    con1: Contour (disabled) | expr = emw.normE
    mesh1: Mesh (disabled)
    scv1: ScatterVolume (disabled) | expr = {emw.Ex, emw.Ey, emw.Ez}
  pg2: PlotGroup3D "Electric Field (emw) 1" | data = dset2
    mslc1: Multislice | expr = emw.normE
  pg3: PlotGroup1D "1D Plot Group 3" | data = none
    tblp1: Table "Table Graph 1" | table = tbl7; plotcolumninput = manual; plotcolumns = 5

Exports
  tbl1: Table
    table = tbl1
    filename = C:\Users\phys-simulation\Desktop\DarkRadioSimulations\comsolSimulationsV2\biconRoomNoRes\analysis\EfieldInBoxCutPoint.txt
  tbl2: Table
    table = tbl2
    filename = C:\Users\phys-simulation\Desktop\Vasco\EfieldInBox\analysis\EfieldInBoxNormOffCenter.txt
  tbl3: Table
    table = tbl3
    filename = C:\Users\phys-simulation\Desktop\Vasco\EfieldInBox\analysis\surfaceEfieldAverageEmptyBox.txt
  tbl4: Table
    table = tbl4
    filename = C:\Users\phys-simulation\Desktop\Vasco\EfieldInBox\analysis\surfaceAvg27cm5EmptyBox.txt
  tbl7: Table
    table = tbl6
    filename = C:\Users\phys-simulation\Desktop\DarkRadioSimulations\comsolSimulationsV2\biconRoomNoRes\analysis\surfaceAvg300cmEmptyBox.txt
  tbl8: Table
    table = tbl1
    filename = C:\Users\phys-simulation\Desktop\Vasco\biconInBox\analysis\EfieldInBoxCutPoint.txt