// COMSOL Multiphysics 5.6.0.401 model "freespace_bicon_frame_antenna_changeDimention_11_14_23.mph"
// Modeling a Biconical Antenna for EMI/EMC Testing
// modeldescr_rf/biconical_frame_antenna
// Biconical antennas are popular for very high frequency (VHF) measurement because they support a wide frequency range. They are also useful for electromagnetic compatibility (EMC) testing where the antenna can be used as an RF source in susceptibility or immunity test. This example simulates a biconical antenna made of lightweight hexagonal frames that are preferred over solid cones for fabrication. The simulation includes the computation of far-field radiation pattern and voltage standing wave ratio (VSWR).
// Outline of the model tree

Coordinate systems
  pml1: PML "Perfectly Matched Layer 1" on domains 1-4, 8-11 | ScalingType = Spherical

Geometry
  geom1 "Geometry 1" (3D, length unit m)
    wp1: WorkPlane | quickz = 2[cm]; unite = on
      r1: Rectangle | pos = {-1[cm], 0}; size = {2[cm], 2[cm]/2*sqrt(3)}
    wp2: WorkPlane | quickz = 50[cm]; unite = on
      r1: Rectangle | pos = {-1[cm], 0}; size = {2[cm], 25.65[cm]}
    copy1: Copy | input = wp1; keep = on; displx = 0; disply = 0; displz = 0.634
    loft1: Loft | profile = wp1, wp2
    loft2: Loft | startprofile = loft1(1) boundaries 4; endprofile = copy1(1) boundaries 1
    del1: Delete "Delete Entities 1" | input = loft2(1) boundaries 1, 4, 10, 11
    rot1: Rotate | input = del1; rot = {0, 60, 120, 180, 240, 300}
    del2: Delete "Delete Entities 2"
      input = rot1(1) boundaries 4; rot1(3) boundaries 4; rot1(4) boundaries 4; rot1(5) boundaries 4; rot1(6) boundaries 4
    cyl1: Cylinder | pos = {0, 0, 2.5[mm]}; r = 5[mm]; h = 17.5[mm]
    rot2: Rotate
      contributeto = csel1
      input = cyl1, del2(1), rot1(2), del2(2), del2(3), del2(4), del2(5)
      axistype = x
      rot = {0, 180}
    wp3: WorkPlane | quickplane = zx; unite = on
      r1: Rectangle | pos = {-2.5[mm], -5[mm]}; size = {5[mm], 10[mm]}
    sph1: Sphere | layername = Layer 1; layer = 0.3; r = 1.2
    fin: Finalize "Form Union"

Materials
  mat1: Common "Air" on all domains
    def "Basic"
      thermalexpansioncoefficient = alpha_p(pA,T)
      molarmass = 0.02897[kg/mol]
      bulkviscosity = muB(T)
      relpermeability = 1
      relpermittivity = 1
      dynamicviscosity = eta(T)
      ratioofspecificheat = 1.4
      electricconductivity = 0[S/m]
      heatcapacity = Cp(T)
      density = rho(pA,T)
      thermalconductivity = k(T)
      soundspeed = cs(T)
      eta: Piecewise | arg = T; pieces = {200.0, 1600.0, -8.38278E-7+8.35717342E-8*T^1-7.69429583E-11*T^2+4.6437266E-14*T^3-1.06585607E-17*T^4}; argunit = K; fununit = Pa*s
      Cp: Piecewise | arg = T; pieces = {200.0, 1600.0, 1047.63657-0.372589265*T^1+9.45304214E-4*T^2-6.02409443E-7*T^3+1.2858961E-10*T^4}; argunit = K; fununit = J/(kg*K)
      rho: Analytic | expr = pA*0.02897/R_const[K*mol/J]/T; args = {pA, T}; argunit = Pa,K; fununit = kg/m^3
      k: Piecewise | arg = T; pieces = {200.0, 1600.0, -0.00227583562+1.15480022E-4*T^1-7.90252856E-8*T^2+4.11702505E-11*T^3-7.43864331E-15*T^4}; argunit = K; fununit = W/(m*K)
      cs: Analytic | expr = sqrt(1.4*R_const[K*mol/J]/0.02897*T); args = T; argunit = K; fununit = m/s
      an1: Analytic | funcname = alpha_p; expr = -1/rho(pA,T)*d(rho(pA,T),T); args = {pA, T}; argunit = Pa,K; fununit = 1/K
      an2: Analytic "Analytic 2a" | funcname = muB; expr = 0.6*eta(T); args = T; argunit = K; fununit = Pa*s
    RefractiveIndex
      n = 1
      ki = 0
    NonlinearModel
      BA = (def.gamma+1)/2
    idealGas
      Rs = R_const/Mn
      heatcapacity = Cp(T)
      ratioofspecificheat = 1.4
      molarmass = 0.02897
      Cp: Piecewise | arg = T; pieces = {200.0, 1600.0, 1047.63657-0.372589265*T^1+9.45304214E-4*T^2-6.02409443E-7*T^3+1.2858961E-10*T^4}; argunit = K; fununit = J/(kg*K)

Physics
  emw: ElectromagneticWaves "Electromagnetic Waves, Frequency Domain" on all domains
    dependent variable E = {Ex, Ey, Ez}
    BackgroundField.SolveFor = scatteredField
    BackgroundField.WaveType = LinearPolByAngle
    BackgroundField.Eampl = 0[V/m]
    wee1: WaveEquationElectric (default)
    pec1: PerfectElectricConductor (default)
    init1: init "Initial Values 1" (default)
    pec2: PerfectElectricConductor on selection geom1_csel1_bnd
    lport1: LumpedPort on boundaries 83 | PortExcitation = on; Zref = 50[ohm]
    ffd1: FarFieldDomain on domains 5
      ffc1: FarFieldCalculation on boundaries 9-12, 109, 110, 120, 143

Mesh
  mesh1 "Mesh 1" (physics-controlled)

Studies
  std1 "Study 1"
    freq: Frequency "Frequency Domain" | punit = MHz; plist = range(40,5,70) range(70,.5,85) range(85,5,400)

Solver configurations
  sol1 "Solution 1" (study std1)
    v1: Variables "Dependent Variables 1"
    s1: Stationary "Stationary Solver 1" | stol = 0.01
      p1: Parametric
        pname = freq
        plistarr = range(40,5,70) range(70,.5,85) range(85,5,400)
        punit = MHz
        pcontinuationmode = no
      fc1: FullyCoupled | linsolver = i1
      i1: Iterative "Suggested Iterative Solver (emw)" | itrestart = 300; prefuntype = right
        mg1: Multigrid | iter = 1

Datasets
  dset1: Solution on domains 5 | solution = sol1

Derived values
  gev1: EvalGlobal "AF" | data = dset1; table = tbl18; expr = 20*log10(1/abs(emw.Vport_1))
  gev2: EvalGlobal "VSWR" | data = dset1; table = tbl19; expr = emw.VSWR_1; unit = 1; descr = Voltage standing wave ratio
  gev3: EvalGlobal "s11" | data = dset1; table = tbl20; expr = emw.S11dB; descr = S11
  gev4: EvalGlobal "z port" | data = dset1; table = tbl21; expr = {real(emw.Zport_1), imag(emw.Zport_1)}
  gev5: EvalGlobal "Global Evaluation 5"
    data = dset1
    table = tbl22
    expr = emw.EIRP
    descr = Effective isotropic radiated power

Tables
  rp1: Table "Directivity"
    // Radiation pattern
    θ (deg) | φ (deg) | Directivity | Directivity (dB)
    90 | 112 | 1.53355 | 1.85698
  tbl1: Table "AF no bar"
    // Global Evaluation 1
    freq (MHz) | 20*log10(1/abs(emw.Vport_1))
    40 | 10.8567
    41 | 10.5073
    42 | 10.1644
    43 | 9.82583
    44 | 9.49187
    45 | 9.16316
    46 | 8.84045
    47 | 8.52458
    48 | 8.21891
    49 | 7.91982
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  tbl3: Table "AF with horozontal bar"
    // Global Evaluation 1
    freq (MHz) | 20*log10(1/abs(emw.Vport_1))
    40 | 10.8522
    50 | 7.65652
    60 | 5.62534
    70 | 5.58574
    80 | 6.80637
    90 | 8.24226
    100 | 9.51998
    110 | 10.5858
    120 | 11.4648
    130 | 12.1942
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  tbl4: Table "AF both bars"
    // Global Evaluation 1
    freq (MHz) | 20*log10(1/abs(emw.Vport_1))
    40 | 10.7886
    50 | 7.5937
    60 | 5.58578
    70 | 5.58227
    80 | 6.82081
    90 | 8.25997
    100 | 9.53611
    110 | 10.5985
    120 | 11.4724
    130 | 12.1946
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  tbl5: Table "AF both bars 180Ohms + 5.6"
    // Global Evaluation 1
    freq (MHz) | 20*log10(1/abs(emw.Vport_1)) + 5.6
    40 | 9.92213
    50 | 8.86331
    60 | 8.29863
    70 | 8.11073
    80 | 8.19966
    90 | 8.48001
    100 | 8.88607
    110 | 9.36817
    120 | 9.89006
    130 | 10.4282
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  tbl6: Table "AF both bars 180ohms Correct dimentions"
    // Global Evaluation 1
    freq (MHz) | 20*log10(1/abs(emw.Vport_1)) + 5.6
    40 | 11.2397
    50 | 9.78304
    60 | 8.88599
    70 | 8.45743
    80 | 8.39454
    90 | 8.58891
    100 | 8.94626
    110 | 9.39605
    120 | 9.89194
    130 | 10.4012
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  tbl7: Table "AF 136 ohms correct dimentions + 4.3dB"
    // Global Evaluation 1
    freq (MHz) | 20*log10(1/abs(emw.Vport_1)) + 4.3
    40 | 11.2965
    50 | 9.37213
    60 | 8.14794
    70 | 7.62707
    80 | 7.68003
    90 | 8.09211
    100 | 8.67769
    110 | 9.31861
    120 | 9.95514
    130 | 10.5572
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  tbl8: Table "AF 50 ohms correct dimentions"
    // Global Evaluation 1
    freq (MHz) | 20*log10(1/abs(emw.Vport_1))
    40 | 13.6162
    45 | 11.9307
    50 | 10.302
    55 | 8.77375
    60 | 7.45052
    65 | 6.48616
    70 | 6.01677
    75 | 6.05796
    80 | 6.48648
    85 | 7.13163
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  tbl9: Table "AF 50 ohms fine tune dimentions"
    // Global Evaluation 1
    freq (MHz) | 20*log10(1/abs(emw.Vport_1))
    40 | 13.8259
    50 | 10.5285
    60 | 7.65795
    70 | 6.12131
    80 | 6.48528
    90 | 7.8198
    100 | 9.24531
    110 | 10.4887
    120 | 11.521
    130 | 12.3705
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  tbl10: Table "50Ohms fine tune height"
    // Global Evaluation 1
    freq (MHz) | 20*log10(1/abs(emw.Vport_1))
    40 | 14.1936
    50 | 10.9012
    60 | 7.97474
    70 | 6.26635
    80 | 6.47237
    90 | 7.76671
    100 | 9.20626
    110 | 10.4738
    120 | 11.5283
    130 | 12.3959
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  tbl11: Table "AF 180ohms correct dimentions plus 5.6dB"
    // AF
    freq (MHz) | 20*log10(1/abs(emw.Vport_1)) + 5.6
    40 | 11.596
    50 | 10.0779
    60 | 9.11578
    70 | 8.6272
    80 | 8.51704
    90 | 8.67812
    100 | 9.01336
    110 | 9.44969
    120 | 9.93528
    130 | 10.4382
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  tbl12: Table "VSWR 50, 180, 160 ohms"
    // Global Evaluation 2
    freq (MHz) | Voltage standing wave ratio (1) | Voltage standing wave ratio (1) | Voltage standing wave ratio (1)
    40 | 54.4707 | 28.7648 | 28.869
    50 | 20.8304 | 16.6893 | 15.9787
    60 | 7.07827 | 9.78089 | 8.99178
    70 | 2.44403 | 6.12281 | 5.484
    80 | 1.1713 | 4.15024 | 3.68947
    90 | 1.83753 | 3.0288 | 2.72122
    100 | 2.66247 | 2.3533 | 2.16972
    110 | 3.38037 | 1.92605 | 1.84435
    120 | 3.93999 | 1.64794 | 1.6527
    130 | 4.33944 | 1.46892 | 1.5466
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  tbl13: Table "AF big range high res 50 ohms"
    // AF
    freq (MHz) | 20*log10(1/abs(emw.Vport_1))
    10 | 27.8365
    12.5 | 25.9096
    15 | 24.3423
    17.5 | 22.9734
    20 | 21.756
    22.5 | 20.6434
    25 | 19.6035
    27.5 | 18.6239
    30 | 17.6859
    32.5 | 16.7799
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  tbl14: Table "AF 160Ohms plus 0"
    // AF
    freq (MHz) | 20*log10(1/abs(emw.Vport_1))
    40 | 6.52219
    50 | 4.82274
    60 | 3.73294
    70 | 3.20109
    80 | 3.12537
    90 | 3.36477
    100 | 3.78854
    110 | 4.30254
    120 | 4.84992
    130 | 5.39497
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  tbl15: Table "AF 100ohms plus 0"
    // AF
    freq (MHz) | 20*log10(1/abs(emw.Vport_1))
    40 | 9.15524
    50 | 6.70006
    60 | 4.94119
    70 | 4.11073
    80 | 4.17331
    90 | 4.78236
    100 | 5.60029
    110 | 6.43645
    120 | 7.2164
    130 | 7.91511
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  tbl16: Table "AF 80ohms plus 0"
    // AF
    freq (MHz) | 20*log10(1/abs(emw.Vport_1))
    40 | 10.6604
    50 | 7.88269
    60 | 5.74501
    70 | 4.68701
    80 | 4.80758
    90 | 5.624
    100 | 6.64207
    110 | 7.62716
    120 | 8.50549
    130 | 9.26743
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  tbl17: Table "AF 60 ohms plus 0"
    // AF
    freq (MHz) | 20*log10(1/abs(emw.Vport_1))
    40 | 12.7766
    50 | 9.65577
    60 | 7.02258
    70 | 5.59001
    80 | 5.77174
    90 | 6.87552
    100 | 8.15445
    110 | 9.3186
    120 | 10.3104
    130 | 11.1411
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  tbl18: Table "AF 40ohms plus 0"
    // AF
    freq (MHz) | 20*log10(1/abs(emw.Vport_1))
    40 | 15.9847
    50 | 12.5269
    60 | 9.27839
    70 | 7.20785
    80 | 7.42812
    90 | 8.9579
    100 | 10.5843
    110 | 11.9658
    120 | 13.0872
    130 | 13.9935
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  tbl19: Table
    // VSWR
    freq (MHz) | Voltage standing wave ratio (1)
    40 | 53.9783
    45 | 34.1473
    50 | 20.7243
    55 | 12.2079
    60 | 7.07305
    65 | 4.10504
    70 | 2.44946
    70 | 2.44946
    70.5 | 2.33255
    71 | 2.22262
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  tbl20: Table
    // s11
    freq (MHz) | S11 (1)
    40 | -0.327931
    50 | -0.851603
    60 | -2.50022
    70 | -7.59701
    80 | -22.2449
    90 | -10.6055
    100 | -6.86219
    110 | -5.29642
    120 | -4.50463
    130 | -4.07174
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  tbl21: Table
    // Global Evaluation 4
    freq (MHz) | real(emw.Zport_1) (Ω) | imag(emw.Zport_1) (Ω)
    40 | 12.4821 | -174.417
    50 | 15.4702 | -114.411
    60 | 21.3454 | -68.2904
    70 | 30.4479 | -29.9936
    80 | 43.535 | 3.23105
    90 | 61.6433 | 32.2341
    100 | 85.8095 | 56.2952
    110 | 116.423 | 73.132
    120 | 152.072 | 79.245
    130 | 188.363 | 71.4312
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
Plots
  pg1: PlotGroup3D "Electric Field (emw)" | data = dset1
    mslc1: Multislice | expr = 20*log10(emw.normE); ynumber = 0; znumber = 0
    arwv1: ArrowVolume
      expr = {emw.Ex, emw.Ey, emw.Ez}
      xnumber = 1
      ynumber = 21
      znumber = 21
      arrowlength = normalized
      col1: Color "Color Expression 1" | expr = 20*log10(emw.normE)
  pg2: PlotGroup1D "S-parameter (emw)" | data = dset1; ylabel = S-parameter (dB)
    glob1: Global | expr = emw.S11dB; unit = 1; descr = S11; xdata = expr; xdataexpr = freq
  pg3: SmithGroup "Smith Plot (emw)" | data = dset1
    rgr1: ReflectionGraph
      expr = emw.S11
      unit = 1
      descr = S11
      title = Reflection Graph: S-parameter, Color: Frequency (GHz)
      col1: Color "Color Expression 1" | expr = emw.freq/1e9
  pg4: PolarGroup "2D Far Field (emw)" | data = dset1; rmin = -20; rmax = 2
    rp1: RadiationPattern | expr = emw.gaindBEfar; descr = Far-field gain, dBi; phidisc = 180
  pg5: PlotGroup3D "3D Far Field (emw)" | data = dset1
    rp1: RadiationPattern
      expr = emw.normEfar
      thetadisc = 45
      phidisc = 45
      directivity = on
      directivityexpr = emw.normEfar^2
      table = rp1
  pg6: PlotGroup1D "VSWR" | data = dset1
    glob1: Global | expr = emw.VSWR_1; descr = Voltage standing wave ratio
  pg7: PlotGroup3D "3D Plot Group 7" | data = dset1
    iso1: Isosurface | expr = 20*log10(emw.normE+0.1)
      filt1: Filter | expr = x>0
  pg8: PlotGroup1D "1D Plot Group 8" | data = none
    tblp1: Table "AF no bars" | table = tbl1
  pg9: PlotGroup1D "1D Plot Group 9" | data = none
    tblp1: Table "Table Graph 1" | table = tbl3
  pg10: PlotGroup1D "1D Plot Group 10" | data = none
    tblp1: Table "Table Graph 1" | table = tbl4
  pg11: PlotGroup1D "1D Plot Group 11" | data = none
    tblp1: Table "Table Graph 1" | table = tbl5
  pg12: PlotGroup1D "1D Plot Group 12" | data = none
    tblp1: Table "Table Graph 1" | table = tbl6
  pg13: PlotGroup1D "1D Plot Group 13" | data = none
    tblp1: Table "Table Graph 1" | table = tbl7
  pg14: PlotGroup1D "1D Plot Group 14" | data = none
    tblp1: Table "Table Graph 1" | table = tbl8
  pg15: PlotGroup1D "1D Plot Group 15" | data = none
    tblp1: Table "Table Graph 1" | table = tbl9
  pg16: PlotGroup1D "1D Plot Group 16" | data = none; title = VSWR Bicon Free Space; ylabel = VSWR (1:)
    tblp1: Table "VSWR" | table = tbl12; legends = {50 ohms, 180 ohms, 160 ohms (from kraus)}
  pg17: PlotGroup1D "1D Plot Group 17" | data = none
    tblp1: Table "Table Graph 1" | table = tbl19
  pg18: PlotGroup1D "1D Plot Group 18" | data = none
    tblp1: Table "Table Graph 1" | table = tbl20
  pg19: PlotGroup1D "1D Plot Group 19" | data = none
    tblp1: Table "Table Graph 1" | table = tbl21; xaxisdata = 2; plotcolumninput = manual; plotcolumns = 3
  pg20: PlotGroup2D "2D Plot Group 20" | data = none
    tbls1: TableSurface | table = tbl21; tablechanged = on
  pg21: SmithGroup "Smith Plot Group 21" | data = dset1
    igr1: ImpedanceGraph | expr = emw.Zport_1