// COMSOL Multiphysics 5.6.0.401 model "noresRoom_modestir_v1_bicon_frame_antenna_10_4_23.mph"
// Modeling a Biconical Antenna for EMI/EMC Testing
// modeldescr_rf/biconical_frame_antenna
// Biconical antennas are popular for very high frequency (VHF) measurement because they support a wide frequency range. They are also useful for electromagnetic compatibility (EMC) testing where the antenna can be used as an RF source in susceptibility or immunity test. This example simulates a biconical antenna made of lightweight hexagonal frames that are preferred over solid cones for fabrication. The simulation includes the computation of far-field radiation pattern and voltage standing wave ratio (VSWR).
// Outline of the model tree

Parameters
  boxX = 0[m]
  boxY = 0[m]
  boxZ = 0[m]
  alpha = 90
  beta = 125
  gamma = 90
  positionIdx = 0

Coordinate systems
  pml1: PML "Perfectly Matched Layer 1" on no domains | ScalingType = Spherical

Geometry
  geom1 "Geometry 1" (3D, length unit m)
    wp1: WorkPlane | quickz = 2[cm]; unite = on
      r1: Rectangle | pos = {-1[cm], 0}; size = {2[cm], 2[cm]/2*sqrt(3)}
    wp2: WorkPlane | quickz = 50[cm]; unite = on
      r1: Rectangle | pos = {-1[cm], 0}; size = {2[cm], 25.65[cm]}
    copy1: Copy | input = wp1; keep = on; displx = 0; disply = 0; displz = 0.634
    loft1: Loft | profile = wp1, wp2
    loft2: Loft | startprofile = loft1(1) boundaries 4; endprofile = copy1(1) boundaries 1
    del1: Delete "Delete Entities 1" | input = loft2(1) boundaries 1, 4, 10, 11
    rot1: Rotate | input = del1; rot = {0, 60, 120, 180, 240, 300}
    del2: Delete "Delete Entities 2"
      input = rot1(1) boundaries 4; rot1(3) boundaries 4; rot1(4) boundaries 4; rot1(5) boundaries 4; rot1(6) boundaries 4
    cyl1: Cylinder | pos = {0, 0, 2.5[mm]}; r = 5[mm]; h = 17.5[mm]
    rot2: Rotate
      contributeto = csel1
      input = cyl1, del2(1), rot1(2), del2(2), del2(3), del2(4), del2(5)
      axistype = x
      rot = {0, 180}
    wp3: WorkPlane | quickplane = zx; unite = on
      r1: Rectangle | pos = {-2.5[mm], -5[mm]}; size = {5[mm], 10[mm]}
    rot3: Rotate | contributeto = csel1; input = rot2, wp3; axistype = y; rot = 90
    blk1: Block | base = center; size = {3.0697, 2.4566, 3.684}
    mov1: Move "Move box" | input = blk1; displx = boxX; disply = boxY; displz = boxZ
    rot4: Rotate "Rotate box" | input = mov1; specify = eulerang; rot = 0; eulerang = {alpha, beta, gamma}
    dif1: Difference | input = rot4; input2 = rot3
    fin: Finalize "Form Union"

Materials
  mat1: Common "Air" on all domains
    def "Basic"
      thermalexpansioncoefficient = alpha_p(pA,T)
      molarmass = 0.02897[kg/mol]
      bulkviscosity = muB(T)
      relpermeability = 1
      relpermittivity = 1
      dynamicviscosity = eta(T)
      ratioofspecificheat = 1.4
      electricconductivity = 0[S/m]
      heatcapacity = Cp(T)
      density = rho(pA,T)
      thermalconductivity = k(T)
      soundspeed = cs(T)
      eta: Piecewise | arg = T; pieces = {200.0, 1600.0, -8.38278E-7+8.35717342E-8*T^1-7.69429583E-11*T^2+4.6437266E-14*T^3-1.06585607E-17*T^4}; argunit = K; fununit = Pa*s
      Cp: Piecewise | arg = T; pieces = {200.0, 1600.0, 1047.63657-0.372589265*T^1+9.45304214E-4*T^2-6.02409443E-7*T^3+1.2858961E-10*T^4}; argunit = K; fununit = J/(kg*K)
      rho: Analytic | expr = pA*0.02897/R_const[K*mol/J]/T; args = {pA, T}; argunit = Pa,K; fununit = kg/m^3
      k: Piecewise | arg = T; pieces = {200.0, 1600.0, -0.00227583562+1.15480022E-4*T^1-7.90252856E-8*T^2+4.11702505E-11*T^3-7.43864331E-15*T^4}; argunit = K; fununit = W/(m*K)
      cs: Analytic | expr = sqrt(1.4*R_const[K*mol/J]/0.02897*T); args = T; argunit = K; fununit = m/s
      an1: Analytic | funcname = alpha_p; expr = -1/rho(pA,T)*d(rho(pA,T),T); args = {pA, T}; argunit = Pa,K; fununit = 1/K
      an2: Analytic "Analytic 2a" | funcname = muB; expr = 0.6*eta(T); args = T; argunit = K; fununit = Pa*s
    RefractiveIndex
      n = 1
      ki = 0
    NonlinearModel
      BA = (def.gamma+1)/2
    idealGas
      Rs = R_const/Mn
      heatcapacity = Cp(T)
      ratioofspecificheat = 1.4
      molarmass = 0.02897
      Cp: Piecewise | arg = T; pieces = {200.0, 1600.0, 1047.63657-0.372589265*T^1+9.45304214E-4*T^2-6.02409443E-7*T^3+1.2858961E-10*T^4}; argunit = K; fununit = J/(kg*K)
  mat2: Common "Structural steel" on boundaries 1-4, 35, 135
    def "Basic"
      relpermeability = 1000
      heatcapacity = 475[J/(kg*K)]
      thermalconductivity = 44.5[W/(m*K)]
      electricconductivity = 5.9e6[S/m]
      relpermittivity = 1000
      thermalexpansioncoefficient = 12.3e-6[1/K]
      density = 7850[kg/m^3]
    Enu "Young's modulus and Poisson's ratio"
      youngsmodulus = 200e9[Pa]
      poissonsratio = 0.30
    Murnaghan
      l = -3.0e11[Pa]
      m = -6.2e11[Pa]
      n = -7.2e11[Pa]
    Lame "Lamé parameters"
      lambLame = 1.15e11[Pa]
      muLame = 7.69e10[Pa]
  mat3: Common "Aluminum" (disabled) on no boundaries
    def "Basic"
      relpermeability = 1
      heatcapacity = 900[J/(kg*K)]
      thermalconductivity = 238[W/(m*K)]
      electricconductivity = 3.774e7[S/m]
      relpermittivity = 1
      thermalexpansioncoefficient = 23e-6[1/K]
      density = 2700[kg/m^3]
    Enu "Young's modulus and Poisson's ratio"
      youngsmodulus = 70e9[Pa]
      poissonsratio = 0.33
    Murnaghan
      l = -2.5e11[Pa]
      m = -3.3e11[Pa]
      n = -3.5e11[Pa]
    Lame "Lamé parameters"
      lambLame = 5.1e10[Pa]
      muLame = 2.6e10[Pa]

Physics
  emw: ElectromagneticWaves "Electromagnetic Waves, Frequency Domain" on all domains
    dependent variable E = {Ex, Ey, Ez}
    BackgroundField.SolveFor = fullField
    BackgroundField.WaveType = LinearPolByAngle
    BackgroundField.Eampl = 1[V/m]
    BackgroundField.anglePitch = pi/2
    wee1: WaveEquationElectric (default)
    pec1: PerfectElectricConductor (default)
    init1: init "Initial Values 1" (default)
    pec2: PerfectElectricConductor on selection geom1_csel1_bnd
    lport1: LumpedPort on boundaries 79 | PortExcitation = off; Zref = 50[ohm]; TerminalType = Cable
    imp1: Impedance "wall drive" on boundaries 1-3 | Es = {1, 1, 1}
    imp2: Impedance "wall no drive" on boundaries 4, 35, 135 | Es = {0, 0, 0}

Mesh
  mesh1 "Mesh 1" (physics-controlled)

Studies
  std1 "Study 1"
    param: Parametric "Parametric Sweep"
      pname = {positionIdx, boxX, boxY, boxZ, alpha, beta, gamma}
      plistarr = {"0,1,2,3,4,5,6,7,8,9,10,11,12,13,14,15,16,17", "13.5,13.5,13.5,13.5,13.5,13.5,-31.5,-31.5,-31.5,-31.5,-31.5,-31.5,-66.5,-66.5,-66.5,-66.5,-66.5,-66.5", "18.8,12.8,-8.2,35.8,-0.2,-12.2,17.8,25.8,6.8,22.8,8.8,2.8,-8.2,32.8,-1.2,-15.2,31.8,10.8", "15.8,15.8,45.8,45.8,95.8,95.8,15.8,15.8,45.8,45.8,95.8,95.8,15.8,15.8,45.8,45.8,95.8,95.8", "90.0,-40.0,90.0,45.0,45.0,90.0,90.0,-45.0,-22.5,90.0,22.5,45.0,22.5,90.0,-15.0,105.0,105.0,90.0", "125,0,90,45,0,0,0,-45,0,0,0,0,45,90,0,90,90,125", "90.0,-60.0,90.0,45.0,45.0,90.0,90.0,-45.0,-22.5,90.0,22.5,45.0,22.5,90.0,-15.0,105.0,105.0,90.0"}
      punit = {, cm, cm, cm, , , }
    freq: Frequency "Frequency Domain" | punit = MHz; plist = range(61.5,0.05,63.5)

Solver configurations
  sol1 "Solution 1" (study std1)
    v1: Variables "Dependent Variables 1"
    s1: Stationary "Stationary Solver 1" | stol = 0.01
      p1: Parametric | pname = freq; plistarr = range(61.5,0.05,63.5); punit = MHz; pcontinuationmode = no
      fc1: FullyCoupled | linsolver = i1
      i1: Iterative "Suggested Iterative Solver (emw)" | itrestart = 300; prefuntype = right
        mg1: Multigrid | iter = 1
  sol2 "Parametric Solutions 1" (study std1)
  sol3 "Parametric Solutions 2" (study std1)
  sol4 "Parametric Solutions 3" (study std1)

Datasets
  dset1: Solution on domains 1 | solution = sol1
  dset2: Solution | solution = sol2
  dset3: Solution | solution = sol3
  dset4: Solution | solution = sol4
  cpt1: CutPoint3D "Cut Point all"
    data = dset4
    method = regulargrid
    regulargridx = 4
    regulargridy = 4
    regulargridz = 4
  cpt2: CutPoint3D "Cut Point near"
    data = dset4
    method = file
    filename = /drBigBoy/darkRadio/comsolSimulations/run1A_simulation_10_3_23/cutPoints_dx0p1_dtheta90deg_r0p5.txt

Derived values
  gev1: EvalGlobal "AF" (disabled) | data = dset4; table = tbl3; expr = 20*log10(1/abs(emw.Vport_1))
  gev2: EvalGlobal "VSWR" (disabled) | data = dset1; table = new; expr = emw.VSWR_1; descr = Voltage standing wave ratio
  gev4: EvalGlobal "LPV" | data = dset4; table = tbl4; expr = abs(emw.Vport_1); unit = V
  pev1: EvalPoint "E all" | data = cpt1; table = tbl5; expr = {abs(emw.Ex), abs(emw.Ey), abs(emw.Ez), abs(emw.normE)}
  pev2: EvalPoint "E near" | data = cpt2; table = tbl6; expr = {abs(emw.Ex), abs(emw.Ey), abs(emw.Ez), abs(emw.normE)}

Tables
  tbl1: Table
    // AF
    freq (MHz) | 20*log10(1/abs(emw.Vport_1))
    60 | -3.17929
    60.1 | -3.31641
    60.2 | -3.47527
    60.3 | -3.63084
    60.4 | -3.78307
    60.5 | -3.93254
    60.6 | -4.08373
    60.7 | -4.23554
    60.8 | -4.38819
    60.9 | -4.54074
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  tbl2: Table
    // AF
    freq (MHz) | 20*log10(1/abs(emw.Vport_1))
    62.7 | -8.7276
    62.705 | -8.79704
    62.71 | -8.81559
    62.715 | -8.94891
    62.72 | -9.0485
    62.725 | -9.14055
    62.73 | -9.24119
    62.735 | -9.35133
    62.74 | -9.47033
    62.745 | -9.59881
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  tbl3: Table
    // AF
    posIdx | boxX (cm) | boxY (cm) | boxZ (cm) | alpha | beta | gamma | freq (MHz) | 20*log10(1/abs(emw.Vport_1))
    0 | 13.5 | 18.8 | 15.8 | 90 | 125 | 90 | 61.5 | -4.82566
    0 | 13.5 | 18.8 | 15.8 | 90 | 125 | 90 | 61.55 | -4.87841
    0 | 13.5 | 18.8 | 15.8 | 90 | 125 | 90 | 61.6 | -4.98395
    0 | 13.5 | 18.8 | 15.8 | 90 | 125 | 90 | 61.65 | -5.02705
    0 | 13.5 | 18.8 | 15.8 | 90 | 125 | 90 | 61.7 | -5.14799
    0 | 13.5 | 18.8 | 15.8 | 90 | 125 | 90 | 61.75 | -5.18781
    0 | 13.5 | 18.8 | 15.8 | 90 | 125 | 90 | 61.8 | -5.31478
    0 | 13.5 | 18.8 | 15.8 | 90 | 125 | 90 | 61.85 | -5.40061
    0 | 13.5 | 18.8 | 15.8 | 90 | 125 | 90 | 61.9 | -5.48482
    0 | 13.5 | 18.8 | 15.8 | 90 | 125 | 90 | 61.95 | -5.57163
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
Plots
  pg1: PlotGroup3D "Electric Field (emw)" | data = dset4
    mslc1: Multislice | expr = 20*log10(emw.Ez); ynumber = 0; znumber = 0
    arwv1: ArrowVolume
      expr = {emw.Ex, emw.Ey, emw.Ez}
      xnumber = 1
      ynumber = 21
      znumber = 21
      arrowlength = normalized
      col1: Color "Color Expression 1" | expr = 20*log10(emw.normE)
  pg2: PlotGroup1D "S-parameter (emw)" | data = dset1; ylabel = S-parameter (dB)
    glob1: Global | expr = emw.S11dB; descr = S11; xdata = expr; xdataexpr = freq
  pg3: SmithGroup "Smith Plot (emw)" | data = dset1
    rgr1: ReflectionGraph | expr = emw.S11; descr = S11; title = Reflection Graph: S-parameter, Color: Frequency (GHz)
      col1: Color "Color Expression 1" | expr = emw.freq/1e9
  pg4: PolarGroup "2D Far Field (emw)" | data = dset1; rmin = -20; rmax = 2
    rp1: RadiationPattern | expr = emw.gaindBEfar; descr = Far-field gain, dBi; phidisc = 180
  pg5: PlotGroup3D "3D Far Field (emw)" | data = dset1
    rp1: RadiationPattern
      expr = emw.normEfar
      thetadisc = 45
      phidisc = 45
      directivity = on
      directivityexpr = emw.normEfar^2
      table = rp1
  pg6: PlotGroup1D "VSWR" | data = dset1
    glob1: Global | expr = emw.VSWR_1; descr = Voltage standing wave ratio
  pg7: PlotGroup3D "3D Plot Group 7" | data = dset1
    iso1: Isosurface | expr = 20*log10(emw.normE+0.1)
      filt1: Filter | expr = x>0
  pg8: PlotGroup1D "1D Plot Group 8" | data = none
    tblp1: Table "Table Graph 1" | table = tbl1
  pg9: PlotGroup1D "1D Plot Group 9" | data = none
    tblp1: Table "Table Graph 1" | table = tbl2
  pg10: PlotGroup1D "1D Plot Group 10" | data = none
    tblp1: Table "Table Graph 1" | table = tbl3