// COMSOL Multiphysics 5.6.0.401 model "2dipoleInBox_8.7.21.mph"
// Outline of the model tree

Parameters
  Length = .65[m]
  Radius = 3[cm]
  L0 = 4*Length
  f0 = c_const/L0
  portN = (3.6576/2 - .6) [m]
  portW = -(3.048/2 - .6) [m]
  portV = -(2.4384/2 - .57) [m]

Selections
  sel1: Explicit "Antenna Boundaries" on no boundaries
  sel2: Explicit "Feed Point" on no boundaries
  sel3: Explicit "air" on domains 1
  sel4: Explicit "tickler" on no domains

Coordinate systems
  pml1: PML "Perfectly Matched Layer 1" on no domains | ScalingType = Spherical

Geometry
  geom1 "Geometry 1" (3D, length unit m)
    cyl1: Cylinder "Cylinder (recieve)" | pos = {Radius/2, 0, 0}; axistype = x; r = Radius; h = Length
    mir1: Mirror | input = cyl1; keep = on; axis = {1, 0, 0}
    cyl2: Cylinder | pos = {-Radius/2, 0, 0}; axistype = x; r = Radius; h = Radius
    cyl3: Cylinder "Cylinder 3 (tickle)" | pos = {portW + .001/2, portV, portN}; axistype = x; r = .001; h = .15
    mir2: Mirror | input = cyl3; keep = on; pos = {portW, portV, portN}; axis = {1, 0, 0}
    cyl4: Cylinder | pos = {portW - .0005, portV, portN}; axistype = x; r = .001; h = .001
    blk1: Block | base = center; size = {10[ft], 8[ft], 12[ft]}
    dif1: Difference | input = blk1; input2 = cyl1, cyl2, cyl3, cyl4, mir1, mir2
    fin: Finalize "Form Union"

Materials
  mat1: Common "Air" on all domains
    def "Basic"
      thermalexpansioncoefficient = alpha_p(pA,T)
      molarmass = 0.02897
      bulkviscosity = muB(T)
      relpermeability = 1
      relpermittivity = 1
      dynamicviscosity = eta(T)
      ratioofspecificheat = 1.4
      electricconductivity = 0[S/m]
      heatcapacity = Cp(T)
      density = rho(pA,T)
      thermalconductivity = k(T)
      soundspeed = cs(T)
      eta: Piecewise | arg = T; pieces = {200.0, 1600.0, -8.38278E-7+8.35717342E-8*T^1-7.69429583E-11*T^2+4.6437266E-14*T^3-1.06585607E-17*T^4}; argunit = K; fununit = Pa*s
      Cp: Piecewise | arg = T; pieces = {200.0, 1600.0, 1047.63657-0.372589265*T^1+9.45304214E-4*T^2-6.02409443E-7*T^3+1.2858961E-10*T^4}; argunit = K; fununit = J/(kg*K)
      rho: Analytic | expr = pA*0.02897/R_const[K*mol/J]/T; args = {pA, T}; dermethod = manual; argders = {{pA, d(pA*0.02897/R_const/T,pA)}, {T, d(pA*0.02897/R_const/T,T)}}; argunit = Pa,K; fununit = kg/m^3
      k: Piecewise | arg = T; pieces = {200.0, 1600.0, -0.00227583562+1.15480022E-4*T^1-7.90252856E-8*T^2+4.11702505E-11*T^3-7.43864331E-15*T^4}; argunit = K; fununit = W/(m*K)
      cs: Analytic | expr = sqrt(1.4*R_const[K*mol/J]/0.02897*T); args = T; dermethod = manual; argunit = K; fununit = m/s
      an1: Analytic | funcname = alpha_p; expr = -1/rho(pA,T)*d(rho(pA,T),T); args = {pA, T}; argunit = Pa,K; fununit = 1/K
      an2: Analytic "Analytic 2a" | funcname = muB; expr = 0.6*eta(T); args = T; argunit = K; fununit = Pa*s
    RefractiveIndex
      n = 1
      ki = 0
    NonlinearModel
      BA = (def.gamma+1)/2
  mat2: Common "Aluminum" on boundaries 6-10, 15-24, 29-33
    def "Basic"
      relpermeability = 1
      heatcapacity = 900[J/(kg*K)]
      thermalconductivity = 238[W/(m*K)]
      electricconductivity = 3.774e7[S/m]
      relpermittivity = 1
      thermalexpansioncoefficient = 23e-6[1/K]
      density = 2700[kg/m^3]
    Enu "Young's modulus and Poisson's ratio"
      youngsmodulus = 70e9[Pa]
      poissonsratio = 0.33
    Murnaghan
      l = -2.5e11[Pa]
      m = -3.3e11[Pa]
      n = -3.5e11[Pa]
    Lame "Lamé parameters"
      lambLame = 5.1e10[Pa]
      muLame = 2.6e10[Pa]
  mat3: Common "Structural steel" on boundaries 1-5, 34
    def "Basic"
      relpermeability = 1
      heatcapacity = 475[J/(kg*K)]
      thermalconductivity = 44.5[W/(m*K)]
      electricconductivity = 5.9e6[S/m]
      relpermittivity = 1
      thermalexpansioncoefficient = 12.3e-6[1/K]
      density = 7850[kg/m^3]
    Enu "Young's modulus and Poisson's ratio"
      youngsmodulus = 200e9[Pa]
      poissonsratio = 0.30
    Murnaghan
      l = -3.0e11[Pa]
      m = -6.2e11[Pa]
      n = -7.2e11[Pa]
    Lame "Lamé parameters"
      lambLame = 1.15e11[Pa]
      muLame = 7.69e10[Pa]

Physics
  emw: ElectromagneticWaves "Electromagnetic Waves, Frequency Domain" on all domains
    dependent variable E = {Ex, Ey, Ez}
    MeshControl.SizeControlParameter = Wavelength
    MeshControl.PhysicsControlledMeshMinimumWavelength = L0
    MeshControl.EnableMeshControl = true
    wee1: WaveEquationElectric (default)
    pec1: PerfectElectricConductor (default)
    init1: init "Initial Values 1" (default)
    imp1: Impedance "Impedance Boundary Condition 1" on boundaries 1-34
    lport1: LumpedPort on boundaries 25-28
      PortType = UserDefined
      PortExcitation = off
      hPort = Radius
      wPort = 2*pi*Radius
      ahPort = {1, 0, 0}
    lport2: LumpedPort "tickle port" on boundaries 11-14
      PortType = UserDefined
      PortExcitation = on
      hPort = .001
      wPort = 2*pi*.001
      ahPort = {1, 0, 0}
      SourceType = Power
      P0 = .001[W]

Mesh
  mesh1 "Mesh 1" (physics-controlled)

Studies
  std1 "Study 1"
    freq: Frequency "Frequency Domain" | punit = MHz; plist = range(50,1.00401606426,300); useparam = on

Solver configurations
  sol1 "Solution 1" (study std1)
    v1: Variables "Dependent Variables 1"
    s1: Stationary "Stationary Solver 1" | stol = 0.01
      p1: Parametric | pname = freq; plistarr = range(50,1.00401606426,300); punit = MHz; pcontinuationmode = no
      fc1: FullyCoupled | linsolver = i1
      i1: Iterative "Suggested Iterative Solver (emw)" | itrestart = 300; prefuntype = right
        mg1: Multigrid | iter = 1

Datasets
  dset1: Solution on selection sel3 | solution = sol1
  cpt1: CutPoint3D | data = dset1; pointx = 0; pointy = 0; pointz = 0

Derived values
  gev1: EvalGlobal "S-Parameter (emw)" | data = dset1; table = tbl1; expr = emw.S11dB
  int1: IntSurface "Surface Integration 1"
    data = dset1
    table = tbl4
    expr = emw.Qsrh
    unit = W
    descr = Surface resistive losses
  gev2: EvalGlobal "Global Evaluation 2"
    data = dset1
    table = tbl5
    expr = emw.Pport_1
    unit = W
    descr = Lumped port power
  gev3: EvalGlobal "V recieve" | data = dset1; table = tbl6; expr = abs(emw.Vport_1)
  gev5: EvalGlobal "Power recieve dBm" | data = dset1; table = tbl11; expr = 10 * log10( (abs(emw.Vport_1))^2 /50/.001)
  pev1: EvalPoint "Ex center" | data = cpt1; table = tbl7; expr = 20*log10(abs(emw.Ex))
  pev2: EvalPoint "E norm center" | data = cpt1; table = tbl8; expr = 20*log10(abs(emw.normE))
  gev4: EvalGlobal "Global Evaluation 4"
    data = dset1
    table = tbl10
    expr = emw.VSWR_2
    unit = 1
    descr = Voltage standing wave ratio

Tables
  tbl1: Table
    freq (GHz) | S11 (1)
    0.0749481 | -6.38771
  rp1: Table "Directivity"
    // Radiation pattern
    θ (deg) | φ (deg) | Directivity | Directivity (dB)
    90 | 296 | 1.69485 | 2.29132
  tbl5: Table
    // Global Evaluation 2 (emw.Pport_1)
    freq (GHz) | Lumped port power (W) | Lumped port power (W)
    0.0749481 | 0.00770168 | 0.00770168
  tbl6: Table
    // Global Evaluation 3 (abs(emw.Vport_1))
    freq (MHz) | abs(emw.Vport_1) (V)
    200 | 0.0029264
  tbl7: Table "Ex table"
    // Point Evaluation 1 ()
    freq (MHz) | 20*log10(abs(emw.Ex)), Point: (0, 0, 0)
    30 | -79.5372
    31.0843 | -80.0553
    32.1687 | -80.6561
    33.253 | -81.3602
    34.3373 | -82.1972
    35.4217 | -83.2107
    36.506 | -84.4693
    37.5904 | -86.089
    38.6747 | -88.2907
    39.759 | -91.5841
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  tbl8: Table "norm E table"
    // E norm center (20*log10(abs(emw.normE)))
    freq (MHz) | 20*log10(abs(emw.normE)), Point: (0, 0, 0)
    30 | -79.5064
    31.0843 | -80.0202
    32.1687 | -80.6156
    33.253 | -81.3122
    34.3373 | -82.1385
    35.4217 | -83.136
    36.506 | -84.3688
    37.5904 | -85.9423
    38.6747 | -88.0473
    39.759 | -91.0745
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  tbl10: Table
    // Global Evaluation 4 (emw.VSWR_2)
    freq (MHz) | Voltage standing wave ratio (1)
    200 | 27956.9
  tbl11: Table
    // Power recieve dBm
    freq (MHz) | 10 * log10( (abs(emw.Vport_1))^2 /50/.001)
    50 | -73.0461
    51.004 | -72.0387
    52.008 | -71.0052
    53.012 | -69.939
    54.0161 | -68.8359
    55.0201 | -67.6908
    56.0241 | -66.4975
    57.0281 | -65.2485
    58.0321 | -63.934
    59.0361 | -62.5419
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
Plots
  pg1: PlotGroup3D "Electric Field (emw)" | data = dset1
    mslc1: Multislice | expr = emw.normE
    arwv1: ArrowVolume | expr = {emw.Ex, emw.Ey, emw.Ez}
  pg2: PolarGroup "2D Far Field (emw)" | data = dset1
    rp1: RadiationPattern | expr = emw.normEfar; phidisc = 180; refdir = {0, 1, 0}
  pg4: PlotGroup3D "3D Plot Group 4" | data = dset1
    surf1: Surface | expr = emw.Qsrh; descr = Surface resistive losses
  pg5: PlotGroup1D "1D Plot Group 5" | data = none
    tblp1: Table "Table Graph 1" | table = tbl6
  pg6: PlotGroup1D "1D Plot Group 6" | data = none
    tblp1: Table "Table Graph 1" | table = tbl7
    tblp2: Table "norm E" | table = tbl8
  pg7: PlotGroup1D "1D Plot Group 7" | data = none
    tblp1: Table "Table Graph 1" | table = tbl8
  pg8: PlotGroup1D "1D Plot Group 8" | data = none
    tblp1: Table "Table Graph 1" | table = tbl11