// COMSOL Multiphysics 5.6.0.401 model "loopAndDipoleInBox_12.23.21.mph"
// Outline of the model tree

Parameters
  Length = .65[m]
  Radius = 3[cm]
  L0 = 4*Length
  f0 = c_const/L0

Selections
  sel1: Explicit "Antenna Boundaries" on no boundaries
  sel2: Explicit "Feed Point" on no boundaries
  sel3: Explicit "air" on domains 1
  sel4: Explicit "tickler" on no domains

Coordinate systems
  pml1: PML "Perfectly Matched Layer 1" on no domains | ScalingType = Spherical

Geometry
  geom1 "Geometry 1" (3D, length unit m)
    cyl1: Cylinder | pos = {Radius/2, 0, 0}; axistype = x; r = Radius; h = Length
    mir1: Mirror | input = cyl1; keep = on; axis = {1, 0, 0}
    cyl2: Cylinder | pos = {-Radius/2, 0, 0}; axistype = x; r = Radius; h = Radius
    tor1: Torus | pos = {-1.4, -.5, 1.65}; axistype = y; rmaj = .01; rmin = .001; angle = 356; intfaces = on
    rev1: Revolve
      revolvefrom = faces
      inputface = tor1(1) boundaries 21
      angle2 = 4
      pos = {-.01, 0}
      axis = {0, -1}
      pos3 = {-1.4, 0, -1.65}
      revaxis = {{-.01, 0}, {0, -1}}
    cyl3: Cylinder (disabled) | pos = {.002/2, 0, 1.6}; axistype = x; r = .002; h = .1
    mir2: Mirror (disabled) | input = cyl3; keep = on; axis = {1, 0, 0}
    cyl4: Cylinder (disabled) | pos = {-.001, 0, 1.6}; axistype = x; r = .002; h = .002
    blk1: Block | base = center; size = {10[ft], 8[ft], 12[ft]}
    dif1: Difference | input = blk1; input2 = cyl1, cyl2, mir1, rev1
    ext1: Extrude (disabled)
      extrudefrom = faces
      inputface = dif1 18
      specify = vertices
      distance = 1
      vertex = dif1(1) points 20
    fin: Finalize "Form Union"

Materials
  mat1: Common "Air" on all domains
    def "Basic"
      thermalexpansioncoefficient = alpha_p(pA,T)
      molarmass = 0.02897
      bulkviscosity = muB(T)
      relpermeability = 1
      relpermittivity = 1
      dynamicviscosity = eta(T)
      ratioofspecificheat = 1.4
      electricconductivity = 0[S/m]
      heatcapacity = Cp(T)
      density = rho(pA,T)
      thermalconductivity = k(T)
      soundspeed = cs(T)
      eta: Piecewise | arg = T; pieces = {200.0, 1600.0, -8.38278E-7+8.35717342E-8*T^1-7.69429583E-11*T^2+4.6437266E-14*T^3-1.06585607E-17*T^4}; argunit = K; fununit = Pa*s
      Cp: Piecewise | arg = T; pieces = {200.0, 1600.0, 1047.63657-0.372589265*T^1+9.45304214E-4*T^2-6.02409443E-7*T^3+1.2858961E-10*T^4}; argunit = K; fununit = J/(kg*K)
      rho: Analytic | expr = pA*0.02897/R_const[K*mol/J]/T; args = {pA, T}; dermethod = manual; argders = {{pA, d(pA*0.02897/R_const/T,pA)}, {T, d(pA*0.02897/R_const/T,T)}}; argunit = Pa,K; fununit = kg/m^3
      k: Piecewise | arg = T; pieces = {200.0, 1600.0, -0.00227583562+1.15480022E-4*T^1-7.90252856E-8*T^2+4.11702505E-11*T^3-7.43864331E-15*T^4}; argunit = K; fununit = W/(m*K)
      cs: Analytic | expr = sqrt(1.4*R_const[K*mol/J]/0.02897*T); args = T; dermethod = manual; argunit = K; fununit = m/s
      an1: Analytic | funcname = alpha_p; expr = -1/rho(pA,T)*d(rho(pA,T),T); args = {pA, T}; argunit = Pa,K; fununit = 1/K
      an2: Analytic "Analytic 2a" | funcname = muB; expr = 0.6*eta(T); args = T; argunit = K; fununit = Pa*s
    RefractiveIndex
      n = 1
      ki = 0
    NonlinearModel
      BA = (def.gamma+1)/2
  mat2: Common "Aluminum" on boundaries 3, 6-17, 22-39
    def "Basic"
      relpermeability = 1
      heatcapacity = 900[J/(kg*K)]
      thermalconductivity = 238[W/(m*K)]
      electricconductivity = 3.56e7[S/m]
      relpermittivity = 1
      thermalexpansioncoefficient = 23e-6[1/K]
      density = 2700[kg/m^3]
    Enu "Young's modulus and Poisson's ratio"
      youngsmodulus = 70e9[Pa]
      poissonsratio = 0.33
    Murnaghan
      l = -2.5e11[Pa]
      m = -3.3e11[Pa]
      n = -3.5e11[Pa]
    Lame "Lamé parameters"
      lambLame = 5.1e10[Pa]
      muLame = 2.6e10[Pa]
  mat5: Common "Steel AISI 4340" on boundaries 1-5, 40
    def "Basic"
      relpermeability = 1
      electricconductivity = 5.9e6[S/m]
      thermalexpansioncoefficient = 12.3e-6[1/K]
      heatcapacity = 475[J/(kg*K)]
      relpermittivity = 1
      density = 7850[kg/m^3]
      thermalconductivity = 44.5[W/(m*K)]
    Enu "Young's modulus and Poisson's ratio"
      youngsmodulus = 205e9[Pa]
      poissonsratio = 0.28

Physics
  emw: ElectromagneticWaves "Electromagnetic Waves, Frequency Domain" on all domains
    dependent variable E = {Ex, Ey, Ez}
    MeshControl.SizeControlParameter = Wavelength
    MeshControl.PhysicsControlledMeshMinimumWavelength = L0
    MeshControl.EnableMeshControl = true
    wee1: WaveEquationElectric (default)
    pec1: PerfectElectricConductor (default)
    init1: init "Initial Values 1" (default)
    imp1: Impedance "Impedance Boundary Condition 1" on boundaries 1-17, 22-25, 40
    lport1: LumpedPort on boundaries 31-34
      PortType = UserDefined
      PortExcitation = off
      hPort = Radius
      wPort = 2*pi*Radius
      ahPort = {0, 0, 1}
      SourceType = Power
    lport2: LumpedPort "tickle port" on boundaries 18-21
      PortType = UserDefined
      PortExcitation = on
      hPort = .01*4*2*pi/360
      wPort = .01*2*pi
      ahPort = {1, 0, 0}

Mesh
  mesh1 "Mesh 1" (physics-controlled)

Studies
  std1 "Study 1"
    freq: Frequency "Frequency Domain" | punit = MHz; plist = range(30,2.72727272727,300); useparam = on

Solver configurations
  sol1 "Solution 1" (study std1)
    v1: Variables "Dependent Variables 1"
    s1: Stationary "Stationary Solver 1" | stol = 0.01
      p1: Parametric | pname = freq; plistarr = range(30,2.72727272727,300); punit = MHz; pcontinuationmode = no
      fc1: FullyCoupled | linsolver = i1
      i1: Iterative "Suggested Iterative Solver (emw)" | itrestart = 300; prefuntype = right
        mg1: Multigrid | iter = 1

Datasets
  dset1: Solution on selection sel3 | solution = sol1
  cpt1: CutPoint3D | data = dset1; pointx = 0; pointy = .3; pointz = 0
  cpt2: CutPoint3D | data = dset1; pointx = 0; pointy = .6; pointz = .5

Derived values
  gev1: EvalGlobal "S-Parameter (emw)" | data = dset1; table = tbl1; expr = emw.S11dB
  int1: IntSurface "Surface Integration 1"
    data = dset1
    table = tbl4
    expr = emw.Qsrh
    unit = W
    descr = Surface resistive losses
  gev2: EvalGlobal "Global Evaluation 2"
    data = dset1
    table = tbl5
    expr = emw.Pport_1
    unit = W
    descr = Lumped port power
  gev3: EvalGlobal "V recieve" | data = dset1; table = tbl6; expr = 20*log10(abs(emw.Vport_1))
  pev1: EvalPoint "Ex center" | data = cpt1; table = tbl7; expr = 20*log10(abs(emw.Ex))
  pev3: EvalPoint "Ex up left" | data = cpt2; table = tbl7; expr = 20*log10(abs(emw.Ex))
  pev2: EvalPoint "E norm center" | data = cpt1; table = tbl8; expr = 20*log10(abs(emw.normE))
  gev4: EvalGlobal "Global Evaluation 4"
    data = dset1
    table = tbl10
    expr = emw.VSWR_2
    unit = 1
    descr = Voltage standing wave ratio

Tables
  tbl1: Table
    freq (GHz) | S11 (1)
    0.0749481 | -6.38771
  rp1: Table "Directivity"
    // Radiation pattern
    θ (deg) | φ (deg) | Directivity | Directivity (dB)
    90 | 296 | 1.69485 | 2.29132
  tbl5: Table
    // Global Evaluation 2 (emw.Pport_1)
    freq (GHz) | Lumped port power (W) | Lumped port power (W)
    0.0749481 | 0.00770168 | 0.00770168
  tbl6: Table
    // Global Evaluation 3 (abs(emw.Vport_1))
    freq (MHz) | 20*log10(abs(emw.Vport_1))
    30 | -194.079
    32.7273 | -192.14
    35.4545 | -190.237
    38.1818 | -188.354
    40.9091 | -186.475
    43.6364 | -184.586
    46.3636 | -182.671
    49.0909 | -180.715
    51.8182 | -178.699
    54.5455 | -176.602
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  tbl7: Table "Ex table"
    // Point Evaluation 1 ()
    freq (MHz) | 20*log10(abs(emw.Ex)), Point: (0, 0.3, 0) | 20*log10(abs(emw.Ex)), Point: (0, 0.6, 0.5)
    30 | -108.15 | -105.883
    32.7273 | -106.75 | -104.58
    35.4545 | -105.331 | -103.27
    38.1818 | -103.876 | -101.939
    40.9091 | -102.366 | -100.568
    43.6364 | -100.78 | -99.1394
    46.3636 | -99.0953 | -97.6322
    49.0909 | -97.2797 | -96.0183
    51.8182 | -95.2909 | -94.2593
    54.5455 | -93.0667 | -92.2983
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  tbl8: Table "norm E table"
    // E norm center (20*log10(abs(emw.normE)))
    freq (MHz) | 20*log10(abs(emw.normE)), Point: (0, 0, 0)
    30 | -79.5064
    31.0843 | -80.0202
    32.1687 | -80.6156
    33.253 | -81.3122
    34.3373 | -82.1385
    35.4217 | -83.136
    36.506 | -84.3688
    37.5904 | -85.9423
    38.6747 | -88.0473
    39.759 | -91.0745
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  tbl10: Table
    // Global Evaluation 4 (emw.VSWR_2)
    freq (MHz) | Voltage standing wave ratio (1)
    200 | 27956.9

Plots
  pg1: PlotGroup3D "Electric Field (emw)" | data = dset1
    mslc1: Multislice | expr = emw.Ex; unit = V/m
  pg2: PolarGroup "2D Far Field (emw)" | data = dset1
    rp1: RadiationPattern | expr = emw.normEfar; phidisc = 180; refdir = {0, 1, 0}
  pg4: PlotGroup3D "3D Plot Group 4" | data = dset1
    surf1: Surface | expr = emw.Qsrh; descr = Surface resistive losses
  pg5: PlotGroup1D "1D Plot Group 5" | data = none
    tblp1: Table "Table Graph 1" | table = tbl6
    tblp2: Table "Table Graph 2" | table = tbl7
  pg6: PlotGroup1D "1D Plot Group 6" | data = none
    tblp1: Table "Table Graph 1" | table = tbl7
    tblp2: Table "norm E" | table = tbl8
  pg7: PlotGroup1D "1D Plot Group 7" | data = none
    tblp1: Table "Table Graph 1" | table = tbl8
  pg8: PlotGroup1D "1D Plot Group 8" | data = none